**
**   Structure: Flow past Cylinder.
**   Test objective: compressible, inviscous 3D fluid flow.
**   Mach 3.0
**
**   Reference: The Finite Element Method for Fluid Dynamics
**              O.C. Zienkiewicz, R.L. Taylor and P. Nithiarasu
**              6th edition (2005) p 218-219
**
*NODE, NSET=Nall
       1,0.000000000000e+00,-2.500000000000e+00,0.000000000000e+00
       2,0.000000000000e+00,-2.249546760037e+00,0.000000000000e+00
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*ELEMENT, TYPE=F3D8, ELSET=Eall
     1,     1,     2,     3,     4,     5,     6,     7,     8
     2,     5,     6,     7,     8,     9,    10,    11,    12
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** Names based on in
*NSET,NSET=Nin
3479,
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** Names based on out
*NSET,NSET=Nout
81,
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** Names based on farfield
*NSET,NSET=Nfarfield
6733,
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** Names based on wall
*NSET,NSET=Nwall
841,
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*TRANSFORM,NSET=Nwall,TYPE=C
0.,0.,0.,0.,0.,1.
*MATERIAL,NAME=AIR
*CONDUCTIVITY
0.
*FLUID CONSTANTS
3.5,1.d-20,0.079365079
*SPECIFIC GAS CONSTANT
1.
*SOLID SECTION,ELSET=Eall,MATERIAL=AIR
*PHYSICAL CONSTANTS,ABSOLUTE ZERO=0.
*INITIAL CONDITIONS,TYPE=FLUID VELOCITY
Nall,1,1.
Nall,2,0.d0
Nall,3,0.d0
*INITIAL CONDITIONS,TYPE=PRESSURE
Nall,0.079365079
*INITIAL CONDITIONS,TYPE=TEMPERATURE
Nall,0.079365079
*VALUES AT INFINITY
0.079365079,1.,0.079365079,1.,1.
**
***STEP,INCF=200,SHOCK SMOOTHING=0.
*STEP,INCF=20000,SHOCK SMOOTHING=0.5
*CFD,STEADY STATE,COMPRESSIBLE
1.,1.
*BOUNDARY
Nin,11,11,0.079365079
Nin,1,1,1.
Nin,2,2,0.
Nin,8,8,0.079365079
Nall,3,3,0.
Nwall,1,1,0.
Nfarfield,2,2,0.
*NODE FILE,FREQUENCYF=2000
VF,PSF,TSF,TTF,MACH,CP
*END STEP
