**
**   Structure: NACA0012 Airfoil.
**   Test objective: compressible, viscous, laminar, 3D fluid flow.
**
**   Reference: S. Mittal, Finite element commputation of unsteady
**              viscous compressible flows, Comput. Meth. Appl. Mech. Eng.
**              (157), 151-175 (1998).
**
*NODE, NSET=Nall
       1,7.599999999999e-04,-1.412800000000e-01,7.375285278333e-17
       2,-1.580784004032e-02,-1.348329387555e-01,1.626845359814e-16
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*ELEMENT, TYPE=F3D8, ELSET=Eall
     1,     1,     2,     3,     4,     5,     6,     7,     8
     2,     5,     6,     7,     8,     9,    10,    11,    12
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*NSET,NSET=BOU1
463,
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*NSET,NSET=SOLIDSURFACE
41,
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*SURFACE,NAME=AIRFOIL
10, S2
20, S2
30, S2
40, S2
50, S2
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710, S6
** Names based on dum
*NSET,NSET=FREESTREAMSURFACE
463,
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*MATERIAL,NAME=AIR
*CONDUCTIVITY
5.e-4
*FLUID CONSTANTS
1.,5.e-4,293.
*SPECIFIC GAS CONSTANT
0.285714286d0
*SOLID SECTION,ELSET=Eall,MATERIAL=AIR
*PHYSICAL CONSTANTS,ABSOLUTE ZERO=0.
*INITIAL CONDITIONS,TYPE=FLUID VELOCITY
Nall,1,1.d0
Nall,2,0.d0
Nall,3,0.d0
*INITIAL CONDITIONS,TYPE=PRESSURE
Nall,0.98863075
*INITIAL CONDITIONS,TYPE=TEMPERATURE
Nall,3.46020761
*VALUES AT INFINITY
3.46020761,1,0.98863075,1.,1.
**
*STEP,INCF=100000,SHOCK SMOOTHING=0.004
*CFD,STEADY STATE,COMPRESSIBLE
1.,1.
*BOUNDARY
BOU1,11,11,3.46020761
BOU1,1,1,1.
BOU1,2,3,0.
BOU1,8,8,0.98863075
SOLIDSURFACE,1,2,0.
Nall,3,3,0.
*DFLUX
** DFlux based on surface
10, S2, 0.000000e+00
391, S4, 0.000000e+00
20, S2, 0.000000e+00
30, S2, 0.000000e+00
40, S2, 0.000000e+00
50, S2, 0.000000e+00
60, S2, 0.000000e+00
70, S2, 0.000000e+00
80, S2, 0.000000e+00
90, S2, 0.000000e+00
100, S2, 0.000000e+00
701, S6, 0.000000e+00
392, S4, 0.000000e+00
393, S4, 0.000000e+00
394, S4, 0.000000e+00
395, S4, 0.000000e+00
396, S4, 0.000000e+00
397, S4, 0.000000e+00
398, S4, 0.000000e+00
399, S4, 0.000000e+00
400, S4, 0.000000e+00
491, S4, 0.000000e+00
492, S4, 0.000000e+00
493, S4, 0.000000e+00
494, S4, 0.000000e+00
495, S4, 0.000000e+00
496, S4, 0.000000e+00
497, S4, 0.000000e+00
498, S4, 0.000000e+00
499, S4, 0.000000e+00
500, S4, 0.000000e+00
510, S6, 0.000000e+00
501, S6, 0.000000e+00
610, S6, 0.000000e+00
502, S6, 0.000000e+00
503, S6, 0.000000e+00
504, S6, 0.000000e+00
505, S6, 0.000000e+00
506, S6, 0.000000e+00
507, S6, 0.000000e+00
508, S6, 0.000000e+00
509, S6, 0.000000e+00
601, S6, 0.000000e+00
710, S6, 0.000000e+00
602, S6, 0.000000e+00
603, S6, 0.000000e+00
604, S6, 0.000000e+00
605, S6, 0.000000e+00
606, S6, 0.000000e+00
607, S6, 0.000000e+00
608, S6, 0.000000e+00
609, S6, 0.000000e+00
702, S6, 0.000000e+00
703, S6, 0.000000e+00
704, S6, 0.000000e+00
705, S6, 0.000000e+00
706, S6, 0.000000e+00
707, S6, 0.000000e+00
708, S6, 0.000000e+00
709, S6, 0.000000e+00
*SECTION PRINT,SURFACE=AIRFOIL,NAME=S1
DRAG
*NODE FILE,FREQUENCYF=10000
MACH,CP,VF,TSF,PSF,TURB
*EL FILE
SVF
*END STEP
