** m, kg, s
** dyn_visc=kin_visc*rho
** cp=R/(1-1/kappa)
**
*NODE, NSET=Nall
       1,-1.801000000000e-01,-1.290000000000e-02,0.000000000000e+00
       2,-1.840621490655e-01,-1.188880076054e-02,-8.673617379884e-19
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*ELEMENT, TYPE=F3D8, ELSET=Eall
     1,     5,     6,     7,     8,     1,     2,     3,     4
     2,     9,    10,    11,    12,     5,     6,     7,     8
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** Names based on profil
*NSET,NSET=SOLIDSURFACE
1,
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** Names based on in
*NSET,NSET=Nin
6745,
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** Names based on out
*NSET,NSET=Nout
1737,
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** Names based on wall
*NSET,NSET=Nwall
6185,
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*SURFACE,NAME=AIRFOIL
** Surfaces based on profil
*SURFACE, NAME=Sprofil
1, S2
630, S2
11, S2
21, S2
31, S2
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779, S4
*MATERIAL,NAME=AIR
*CONDUCTIVITY
26.3e-3
*FLUID CONSTANTS
1004.85,1.786e-5,288.
*SPECIFIC GAS CONSTANT
287.1
*SOLID SECTION,ELSET=Eall,MATERIAL=AIR
*PHYSICAL CONSTANTS,ABSOLUTE ZERO=0.
*INITIAL CONDITIONS,TYPE=FLUID VELOCITY
Nall,1,90.
Nall,2,0.
Nall,3,0.
*INITIAL CONDITIONS,TYPE=PRESSURE
Nall,1.e5
*INITIAL CONDITIONS,TYPE=TEMPERATURE
Nall,288.
**
*VALUES AT INFINITY
288.,90.,1.e5,1.2,0.25
*NSET,NSET=FREESTREAMSURFACE
Nin,Nwall,Nout
**
***STEP,INCF=50000,SHOCK SMOOTHING=0.00
*STEP,INCF=50000,SHOCK SMOOTHING=0.04
*CFD,COMPRESSIBLE,STEADY STATE
1.,1.
*DFLUX
** DFlux based on profil
1, S2, 0.000000e+00
630, S2, 0.000000e+00
11, S2, 0.000000e+00
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779, S4, 0.000000e+00
*BOUNDARY
Nall,3,3,0.
Nwall,2,2,0.
Nin,11,11,288.
Nin,1,1,90.
Nin,2,2,0.
Nin,8,8,1.e5
SOLIDSURFACE,1,2,0.
*NODE FILE,FREQUENCYF=10000
VF,PSF,PTF,TSF,TTF,MACH,CP
*EL FILE,FREQUENCYF=10000
HFLF,SVF
***SECTION PRINT,SURFACE=AIRFOIL,FREQUENCYF=10000
**DRAG
*END STEP
