** m, kg, s
** dyn_visc=kin_visc*rho
** cp=R/(1-1/kappa)
**
*NODE, NSET=Nall
       1,-9.994603754036e-01,3.408494266859e+00,0.000000000000e+00
       2,-1.207216519676e+00,3.044354159784e+00,0.000000000000e+00
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*ELEMENT, TYPE=F3D6, ELSET=Eall
     1,     1,     2,     3,  1366,  1367,  1368
     2,     2,     4,     3,  1367,  1369,  1368
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** Names based on in
*NSET,NSET=Nin
21,
258,
338,
366,
367,
510,
531,
1386,
1623,
1703,
1731,
1732,
1875,
1896,
** Names based on out
*NSET,NSET=Nout
54,
55,
61,
62,
317,
379,
380,
1419,
1420,
1426,
1427,
1682,
1744,
1745,
** Names based on wall
*NSET,NSET=Nwall
11,
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** Names based on sliding
*NSET,NSET=Nsliding
4,
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** Surfaces based on profil
*SURFACE, NAME=Sprofil
5, S4
1415, S4
1405, S4
13, S4
2505, S4
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2109, S4
** Surfaces based on wall
*SURFACE, NAME=Swall
12, S4
261, S4
32, S4
7, S4
291, S4
401, S4
10, S4
453, S4
356, S4
14, S4
333, S4
73, S4
146, S4
283, S4
343, S4
84, S4
*MATERIAL,NAME=AIR
*CONDUCTIVITY
26.3e-3
*FLUID CONSTANTS
1004.85,1.786e-5,288.
*SPECIFIC GAS CONSTANT
287.1
*SOLID SECTION,ELSET=Eall,MATERIAL=AIR
*PHYSICAL CONSTANTS,ABSOLUTE ZERO=0.
*INITIAL CONDITIONS,TYPE=FLUID VELOCITY
Nall,1,248.
Nall,2,0.
Nall,3,0.
*INITIAL CONDITIONS,TYPE=PRESSURE
Nall,1.e5
*INITIAL CONDITIONS,TYPE=TEMPERATURE
Nall,288.
*VALUES AT INFINITY
288.,248.,1.e5,1.2,0.4
**
***STEP,INCF=100000,SHOCK SMOOTHING=0.005
*STEP,INCF=10000,SHOCK SMOOTHING=0.0
*CFD,COMPRESSIBLE,STEADY STATE
1.e10,1.e10
***DFLUX
**Sprofil,S,0.
**Swall,S,0.
*DFLUX
** DFlux based on dum
12, S4, 0.000000e+00
261, S4, 0.000000e+00
32, S4, 0.000000e+00
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2109, S4, 0.000000e+00
*BOUNDARY
Nall,3,3,0.
Nin,11,11,288.
Nin,1,1,248.
Nin,2,2,0.
Nout,8,8,1.e5
Nwall,1,2,0.
Nsliding,2,2,0.
*NODE FILE,FREQUENCYF=1000
VF,PSF,TSF,TTF,MACH,DTF
*END STEP
