**
**   Structure: cavity.
**   Test objective: incompressible, viscous, laminar, 3D fluid flow
**                   due to buoyancy (free convection)
**
*NODE,NSET=Nall
1,0.00000,0.00000,0.
2376,0.00000,0.00000,1.
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*ELEMENT,TYPE=F3D6,ELSET=Eall
1,1543,1626,1624,3918,4001,3999
2,2375,2374,2372,4750,4749,4747
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*NSET,NSET=Nin
1774,
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*NSET,NSET=Nwall
1,
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*NSET,NSET=N1
1374,
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*NSET,NSET=Nbottom
2,
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*NSET,NSET=Nright
1626,
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*NSET,NSET=Nleft
1,
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*MATERIAL,NAME=WATER
*DENSITY
1.,100.
0.8,1000.
*CONDUCTIVITY
0.00001
*FLUID CONSTANTS
0.02,.25E-2,293.
*SOLID SECTION,ELSET=Eall,MATERIAL=WATER
*INITIAL CONDITIONS,TYPE=FLUID VELOCITY
Nall,1,0.
Nall,2,0.
Nall,3,0.
*INITIAL CONDITIONS,TYPE=PRESSURE
Nall,1.
*INITIAL CONDITIONS,TYPE=TEMPERATURE
Nall,100.
*PHYSICAL CONSTANTS,ABSOLUTE ZERO=0.
**
*STEP,INCF=80000
*CFD,STEADY STATE,FEM
*BOUNDARY
Nin,1,3,0.
Nin,11,11,100.
Nbottom,11,11,100.
Nleft,11,11,1000.
Nright,11,11,100.
1,8,8,100.
2376,8,8,100.
Nwall,1,3,0.
*DLOAD
Eall,GRAV,1.,0.,-1.,0.
*NODE FILE,FREQUENCYF=80000
VF,PS,TS
*EL FILE,FREQUENCYF=80000
SF,HFLF
*END STEP
