**
**   Structure: fluid flow between two cylinders.
**   Test objective: incompressible Couette flow with fixed
**                   wall temperature.
**
*NODE, NSET=Nall
       1,-1.000000000000e+00,0.000000000000e+00,0.000000000000e+00
       2,-9.807852804032e-01,1.950903220161e-01,0.000000000000e+00
       3,-9.807852804032e-01,1.950903220161e-01,1.000000000000e-01
       4,-1.000000000000e+00,0.000000000000e+00,1.000000000000e-01
       5,-8.750000000000e-01,0.000000000000e+00,0.000000000000e+00
       6,-8.581871203528e-01,1.707040317641e-01,-2.220446049250e-16
       7,-8.581871203528e-01,1.707040317641e-01,1.000000000000e-01
       8,-8.750000000000e-01,0.000000000000e+00,1.000000000000e-01
       9,-7.500000000000e-01,0.000000000000e+00,0.000000000000e+00
      10,-7.355889603024e-01,1.463177415121e-01,5.551115123126e-17
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*ELEMENT, TYPE=F3D8, ELSET=Eall
     1,     1,     2,     3,     4,     5,     6,     7,     8
     2,     5,     6,     7,     8,     9,    10,    11,    12
     3,     9,    10,    11,    12,    13,    14,    15,    16
     4,    13,    14,    15,    16,    17,    18,    19,    20
     5,     2,    21,    22,     3,     6,    23,    24,     7
     6,     6,    23,    24,     7,    10,    25,    26,    11
     7,    10,    25,    26,    11,    14,    27,    28,    15
     8,    14,    27,    28,    15,    18,    29,    30,    19
     9,    21,    31,    32,    22,    23,    33,    34,    24
    10,    23,    33,    34,    24,    25,    35,    36,    26
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*NSET,NSET=Nwallin
17,
18,
29,
39,
49,
59,
69,
79,
89,
107,
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*NSET,NSET=Nwallout
1,
2,
21,
31,
41,
51,
61,
71,
81,
91,
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*EQUATION
2
3,1,-1.000000000000,2,1,1.000000000000
*EQUATION
2
3,2,-1.000000000000,2,2,1.000000000000
*EQUATION
2
4,1,-1.000000000000,1,1,1.000000000000
*EQUATION
2
4,2,-1.000000000000,1,2,1.000000000000
*EQUATION
2
7,1,-1.000000000000,6,1,1.000000000000
*EQUATION
2
7,2,-1.000000000000,6,2,1.000000000000
*EQUATION
2
8,1,-1.000000000000,5,1,1.000000000000
*EQUATION
2
8,2,-1.000000000000,5,2,1.000000000000
*EQUATION
2
11,1,-1.000000000000,10,1,1.000000000000
*EQUATION
2
11,2,-1.000000000000,10,2,1.000000000000
*EQUATION
2
12,1,-1.000000000000,9,1,1.000000000000
*EQUATION
2
12,2,-1.000000000000,9,2,1.000000000000
*EQUATION
2
15,1,-1.000000000000,14,1,1.000000000000
*EQUATION
2
15,2,-1.000000000000,14,2,1.000000000000
*EQUATION
2
16,1,-1.000000000000,13,1,1.000000000000
*EQUATION
2
16,2,-1.000000000000,13,2,1.000000000000
*EQUATION
2
19,1,-1.000000000000,18,1,1.000000000000
*EQUATION
2
19,2,-1.000000000000,18,2,1.000000000000
*EQUATION
2
20,1,-1.000000000000,17,1,1.000000000000
*EQUATION
2
20,2,-1.000000000000,17,2,1.000000000000
*EQUATION
2
22,1,-1.000000000000,21,1,1.000000000000
*EQUATION
2
22,2,-1.000000000000,21,2,1.000000000000
*EQUATION
2
24,1,-1.000000000000,23,1,1.000000000000
*EQUATION
2
24,2,-1.000000000000,23,2,1.000000000000
*EQUATION
2
26,1,-1.000000000000,25,1,1.000000000000
*EQUATION
2
26,2,-1.000000000000,25,2,1.000000000000
*EQUATION
2
28,1,-1.000000000000,27,1,1.000000000000
*EQUATION
2
28,2,-1.000000000000,27,2,1.000000000000
*EQUATION
2
30,1,-1.000000000000,29,1,1.000000000000
*EQUATION
2
30,2,-1.000000000000,29,2,1.000000000000
*EQUATION
2
32,1,-1.000000000000,31,1,1.000000000000
*EQUATION
2
32,2,-1.000000000000,31,2,1.000000000000
*EQUATION
2
34,1,-1.000000000000,33,1,1.000000000000
*EQUATION
2
34,2,-1.000000000000,33,2,1.000000000000
*EQUATION
2
36,1,-1.000000000000,35,1,1.000000000000
*EQUATION
2
36,2,-1.000000000000,35,2,1.000000000000
*EQUATION
2
38,1,-1.000000000000,37,1,1.000000000000
*EQUATION
2
38,2,-1.000000000000,37,2,1.000000000000
*EQUATION
2
40,1,-1.000000000000,39,1,1.000000000000
*EQUATION
2
40,2,-1.000000000000,39,2,1.000000000000
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*TRANSFORM,TYPE=C,NSET=Nall
0.,0.,0.,0.,0.,1.
*MATERIAL,NAME=WATER
*DENSITY
1.
*FLUID CONSTANTS
1.,1.
*CONDUCTIVITY
1.
*SOLID SECTION,ELSET=Eall,MATERIAL=WATER
*INITIAL CONDITIONS,TYPE=PRESSURE
Nall,1.
*INITIAL CONDITIONS,TYPE=FLUID VELOCITY
Nall,1,0.
Nall,2,0.
Nall,3,0.
*INITIAL CONDITIONS,TYPE=TEMPERATURE
Nall,1.
*NSET,NSET=Nrad
187,183,179,175,171
*STEP,INCF=1000
*CFD,STEADY STATE,FEM
*BOUNDARY
Nall,3,3,0.
Nwallin,1,1,0.
Nwallin,2,2,2.
Nwallin,8,8,1.
Nwallin,11,11,1.
Nwallout,1,1,0.
Nwallout,2,2,1.
Nwallout,11,11,1.
*NODE FILE,FREQUENCYF=1000
VF,PSF,TSF
*EL FILE,FREQUENCYF=1000
SF,HFLF
*END STEP
