**
**   Structure: two cubes on top of each other.
**   Test objective: massless dynamic contact.
**                   friction; = contact16.inp but
**                   no energy statistics.
**
*NODE, NSET=Nall
       1,1.000000000000e+00,1.000000000000e+00,0.000000000000e+00
       2,1.000000000000e+00,0.000000000000e+00,0.000000000000e+00
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*ELEMENT, TYPE=C3D8, ELSET=Eall
     1,     1,     2,     3,     4,     5,     6,     7,     8,
     2,    21,    22,    23,    24,    25,    26,    27,    28,
*NSET,NSET=Nfix
1,
2,
5,
6,
*BOUNDARY
Nfix,1,3
*SURFACE,NAME=Sslav
2, S3
*SURFACE,NAME=Smast
1, S5
*CONTACT PAIR,INTERACTION=SI1,TYPE=MASSLESS
Sslav,Smast
*SURFACE INTERACTION,NAME=SI1
*SURFACE BEHAVIOR,PRESSURE-OVERCLOSURE=HARD
*FRICTION
0.2
*MATERIAL,NAME=EL
*ELASTIC
210000.,.0
*DENSITY
7.8E-9
*SOLID SECTION,ELSET=Eall,MATERIAL=EL
*NSET,NSET=N1
23
*AMPLITUDE,NAME=A1
0.,0.,5.E-6,1.
*STEP,INC=1000
*DYNAMIC,EXPLICIT
1.E-8,5.E-6,,2.5E-8
*DLOAD
2, P5, 100.000000
*CLOAD,AMPLITUDE=A1
27,1,1.
28,1,1.
*NODE PRINT,NSET=N1,FREQUENCY=1
U
*END STEP
