**
**   Structure: 2d Couette incompressible thermal fluid flow
**   Test objective: CFD Finite Element Method
**                   linear entrance velocity profile between 0. and 1.
**		     moving wall: velocity 1. and temperature 0.
**                   fixed wall: velocity 0 and temperature 0.
**                   pressure at exit 1.
**   Analytical solution: v linear between 0. and 1.
**                        Tmax=0.125
**                        p constant at 1.
**
*NODE, NSET=Nall
       1,0.000000000000e+00,0.000000000000e+00,1.000000000000e-01
       2,0.000000000000e+00,1.000000000000e-01,1.000000000000e-01
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*ELEMENT, TYPE=F3D8, ELSET=Eall
     1,     1,     2,     3,     4,     5,     6,     7,     8
     2,     4,     3,     9,    10,     8,     7,    11,    12
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** Names based on wall
*NSET,NSET=Nwall
1,
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** Names based on unitvel
*NSET,NSET=Nunitvel
221,
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** Names based on in
*NSET,NSET=Nin
2,
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*MATERIAL,NAME=WATER
*DENSITY
1.
*FLUID CONSTANTS
1.,1.
*CONDUCTIVITY
1.
*SOLID SECTION,ELSET=Eall,MATERIAL=WATER
*INITIAL CONDITIONS,TYPE=FLUID VELOCITY
Nall,1,0.
Nall,2,0.
Nall,3,0.
*INITIAL CONDITIONS,TYPE=PRESSURE
Nall,1.
*INITIAL CONDITIONS,TYPE=TEMPERATURE
Nall,0.
*STEP,INCF=400
*CFD,STEADY STATE,FEM
1.,1.,,,
*BOUNDARY
Nall,3,3,0.
Nwall,1,2,0.
Nunitvel,1,1,1.
Nunitvel,2,2,0.
2,1,1,0.1
6,1,1,0.1
45,1,1,0.2
47,1,1,0.2
67,1,1,0.3
69,1,1,0.3
89,1,1,0.4
91,1,1,0.4
111,1,1,0.5
113,1,1,0.5
133,1,1,0.6
135,1,1,0.6
155,1,1,0.7
157,1,1,0.7
177,1,1,0.8
179,1,1,0.8
199,1,1,0.9
201,1,1,0.9
Nin,2,2,0.
42,8,8,1.
44,8,8,1.
41,8,8,1.
43,8,8,1.
65,8,8,1.
66,8,8,1.
87,8,8,1.
88,8,8,1.
109,8,8,1.
110,8,8,1.
131,8,8,1.
132,8,8,1.
153,8,8,1.
154,8,8,1.
175,8,8,1.
176,8,8,1.
197,8,8,1.
198,8,8,1.
219,8,8,1.
220,8,8,1.
241,8,8,1.
242,8,8,1.
Nwall,11,11,0.
Nunitvel,11,11,0.
Nin,11,11,0.
*NODE PRINT,FREQUENCYF=400,NSET=Nall
VF,PSF,TSF
*END STEP
