**
**   Structure: cantilever beam.
**   Test objective: applying a geometric change onto the
**                   surface of a beam; calculating a smooth
**                   change of all nodes in the beam;
**
**                   opt1.equ is generated by test example opt1.inp
**                   here, opt1.equ is included explicitly;
**
**                   opt1.bou is generated by compiling and
**                   running opt1.f;
**
*HEADING
Model: beam     Date: 10-Mar-1998
*NODE
     1,      0.000000,      0.000000,      0.000000
     2,      1.000000,      0.000000,      0.000000
     3,      1.000000,      1.000000,      0.000000
     4,      0.000000,      1.000000,      0.000000
     5,      0.000000,      0.000000,      8.000000
     6,      1.000000,      0.000000,      8.000000
     7,      1.000000,      1.000000,      8.000000
     8,      0.000000,      1.000000,      8.000000
     9,      0.250000,      0.000000,      0.000000
    10,      0.500000,      0.000000,      0.000000
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*ELEMENT, TYPE=C3D20R   , ELSET=Eall
     1,     1,    10,    95,    19,    61,   105,   222,   192,     9,    93,
           94,    20,   104,   220,   221,   193,    62,   103,   219,   190
     2,    10,     2,    13,    95,   105,    34,   134,   222,    11,    12,
           96,    93,   106,   133,   223,   220,   103,    33,   132,   219
     3,    19,    95,    16,     4,   192,   222,   163,    79,    94,    97,
           17,    18,   221,   224,   164,   191,   190,   219,   161,    78
     4,    95,    13,     3,    16,   222,   134,    64,   163,    96,    14,
           15,    97,   223,   135,   162,   224,   219,   132,    63,   161
     5,    61,   105,   222,   192,    59,   109,   228,   196,   104,   220,
          221,   193,   108,   226,   227,   197,    60,   107,   225,   194
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**
**  shape constraints generated by the sensitivity study in opt1.inp
**
**INCLUDE,INPUT=opt1.equ
**SUMMARY OF EQUATIONS FOR MESH-UPDATE
*EQUATION
1
         3,1,1,
1
         3,2,1,
1
         3,3,1,
1
         4,1,1,
1
         4,2,1,
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*MATERIAL,NAME=EL
*ELASTIC
  210000.0,        .3
*DENSITY
7.8E-9
*SOLID SECTION,ELSET=Eall,MATERIAL=EL
**
** thickness changes based on the previous sensitivity run; output of
** compiling and running op1.f
**
*INCLUDE,INPUT=opt1.bou
*STEP
*STATIC
*NODE FILE
U
*END STEP
