**
**   Structure: disk segment
**   Test objective: cyclic symmetry
**                   static pre-loading step with temperature and
**                   centrifugal force
**
*HEADING
Model: segment
*NODE, NSET=Nall
       1,  1.00000e-01,  1.00000e+00, -3.72529e-09
       2,  1.00000e-01,  9.25000e-01, -3.72529e-09
       3,  1.00000e-01,  9.17088e-01,  1.20737e-01
       4,  1.00000e-01,  9.91447e-01,  1.30526e-01
       5,  5.00000e-02,  1.00000e+00, -3.72529e-09
       6,  5.00000e-02,  9.25000e-01, -3.72529e-09
       7,  5.00000e-02,  9.17088e-01,  1.20737e-01
       8,  5.00000e-02,  9.91447e-01,  1.30526e-01
       9,  1.00000e-01,  9.62500e-01, -3.72529e-09
      10,  1.00000e-01,  9.23021e-01,  6.04979e-02
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*ELEMENT, TYPE=C3D20, ELSET=Eall
     1,     1,     2,     3,     4,     5,     6,     7,     8,     9,    10,
          11,    12,    17,    18,    19,    20,    13,    14,    15,    16
     2,     2,    21,    22,     3,     6,    23,    24,     7,    25,    26,
          27,    10,    30,    31,    32,    18,    14,    28,    29,    15
     3,    21,    33,    34,    22,    23,    35,    36,    24,    37,    38,
          39,    26,    42,    43,    44,    31,    28,    40,    41,    29
     4,    33,    45,    46,    34,    35,    47,    48,    36,    49,    50,
          51,    38,    54,    55,    56,    43,    40,    52,    53,    41
     5,    45,    57,    58,    46,    47,    59,    60,    48,    61,    62,
          63,    50,    66,    67,    68,    55,    52,    64,    65,    53
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*MATERIAL,NAME=EL
*ELASTIC
210000.,.3
*DENSITY
7.8E-9
*EXPANSION
12.E-6
*SOLID SECTION,ELSET=Eall,MATERIAL=EL
*NSET,NSET=Nleft
1,
153,
145,
129,
133,
117,
121,
105,
109,
93,
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*NSET,NSET=Nright
523,
612,
600,
590,
593,
583,
586,
576,
579,
569,
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** Names based on out
*NSET,NSET=Nout
1,
4,
5,
8,
12,
13,
16,
20,
153,
156,
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*SURFACE,NAME=left,TYPE=NODE
Nleft
*SURFACE,NAME=right,TYPE=NODE
Nright
*TIE,CYCLIC SYMMETRY,POSITION TOLERANCE=1.,NAME=T1
left,right
*CYCLIC SYMMETRY MODEL,N=12,NGRAPH=1
0.,0.,0.,1.,0.,0.
*INITIAL CONDITIONS,TYPE=TEMPERATURE
Nall,293.
*NSET,NSET=STRESSDOMAIN
Nall
*STEP
*STATIC
*TEMPERATURE
Nout,900.
*DLOAD
Eall,CENTRIF,1.E10,0.,0.,0.,1.,0.,0.
*END STEP
*STEP,PERTURBATION
*FREQUENCY
10
*SELECT CYCLIC SYMMETRY MODES,NMIN=2,NMAX=2
*EL FILE
MAXS
*END STEP
