**
**   Structure: two elements.
**   Test objective: sensitivity: displacements w.r.t. coordinates.
**
*NODE, NSET=NALL
         1,  100.0          ,  0.0            ,  0.0
         2,  0              ,  0.0            ,  0.0
         3,  0.0            ,  100.0          ,  0.0
         4,  100.0          ,  100.0          ,  0.0
         5,  200.0          ,  100.0          ,  0.0
         6,  200.0          ,  0.0            ,  0.0
	 7,  100.0          ,  0.0            ,  -100.0
         8,  100.0          ,  100.0          ,  -100.0
         9,  0.0            ,  100.0          ,  -100.0
        10,  0.0            ,  0.0            ,  -100.0
        11,  200.0          ,  0.0            ,  -100.0
        12,  200.0          ,  100.0          ,  -100.0
*ELEMENT,TYPE=C3D8,ELSET=EALL
         1,         6,         1,         4,         5,        11,         7,         8,
        12
	 2,         1,         2,         3,         4,         7,        10,         9,
         8
*NSET, NSET=DESIGNNODES
      5,
      6,
*DESIGNVARIABLES,TYPE=COORDINATE
DESIGNNODES
*MATERIAL,NAME=EL
*ELASTIC
210000.,.3
*DENSITY
7.8E-9
*SOLID SECTION, ELSET=EALL, MATERIAL=EL
*INITIAL CONDITIONS, TYPE=TEMPERATURE
NALL, 293.15
*BOUNDARY
        2,1,3,0.0
        3,1,3,0.0
        9,1,3,0.0
       10,1,3,0.0
*NSET,NSET=N1
1,2,3,4,5,6,7,8
*STEP
*STATIC
*DLOAD
	 1,   P6,-1000.0
*NODE FILE
U
*END STEP
*STEP
*SENSITIVITY
*DESIGN RESPONSE, NAME=DISP_OBJ
ALL-DISP,N1
*NODE FILE
SEN
*END STEP
