 PNT D001     0.00000        0.00000       15.15000
 PNT D002     0.00000        0.00000       32.57500
 PNT D003     3.10000        0.00000       32.57500
 PNT D004     3.10000        0.00000       17.80000
 PNT D005     3.70000        0.00000       17.80000
 PNT D006     3.70000        0.00000       15.15000
 PNT D007     8.50000        0.00000       13.00000
 PNT D008     9.50000        0.00000       13.00000
 PNT D009     9.50000        0.00000        9.66500
 PNT D00A     3.10000        0.00000        9.66500
 PNT D00B     3.10000        0.00000       15.15000
 PNT D00C     0.00000        0.00000       17.87476
 PNT D00D     4.32299        0.00000        9.66500
 PNT D00R     0.00000        0.00000        0.00000
 PNT D00S     0.00000        0.00000        0.00000
 PNT D00T     3.10000        0.00000        0.00000
 PNT D00U     3.10000        0.00000        0.00000
 PNT D00V     3.70000        0.00000        0.00000
 PNT D00W     3.70000        0.00000        0.00000
 PNT D00X     8.50000        0.00000        0.00000
 PNT D00Y     9.50000        0.00000        0.00000
 PNT D00Z     9.50000        0.00000        0.00000
 PNT D010     3.10000        0.00000        0.00000
 PNT D011     3.10000        0.00000        0.00000
 PNT D012     0.00000        0.00000        0.00000
 PNT D013     4.32299        0.00000        0.00000
 LINE L00E D00C D004 104
 LINE L002 D001 D00B 104
 LINE L003 D00B D00A 104
 LINE L00J D006 D00D 104
 LINE L005 D009 D008 104
 LINE L006 D008 D007 102
 LINE L007 D007 D006 102
 LINE L008 D006 D005 104
 LINE L009 D005 D004 104
 LINE L00A D004 D003 104
 LINE L00B D003 D002 104
 LINE L00C D002 D00C 104
 LINE L00D D00C D001 104
 LINE L00F D004 D00B 104
 LINE L00G D00B D006 104
 LINE L00H D00A D00D 104
 LINE L00I D00D D009 104
 LCMB C001  + L006 + L007
 GSUR A001 + BLEND + L00J + L00I + L005 + C001
 GSUR A002 + BLEND + L003 + L00H - L00J - L00G
 GSUR A003 + BLEND + L00F + L00G + L008 + L009
 GSUR A004 + BLEND + L00D + L002 - L00F - L00E
 GSUR A005 + BLEND + L00C + L00E + L00A + L00B
 SETA E014S1 s A001
 SETA E014S1 s A002
 SETA E014S1 s A003
 SETA E014S1 s A004
 SETA E014S1 s A005
 ELTY all HE20R
 plot p all b
 plus l all k
 plus s all m
 plus b all g
