 PNT D001     0.00000        0.00000       38.00000
 PNT D002     0.00000        0.00000       49.81000
 PNT D003     9.00000        0.00000       49.81000
 PNT D004     9.00000        0.00000       45.08500
 PNT D005     7.00000        0.00000       45.08500
 PNT D006     7.00000        0.00000       37.00000
 PNT D007    12.00000        0.00000       32.50000
 PNT D008    18.30000        0.00000       32.50000
 PNT D009    18.30000        0.00000       25.90000
 PNT D00A    12.00000        0.00000       25.90000
 PNT D00B     2.50000        0.00000       30.00000
 PNT D00C     2.50000        0.00000       38.00000
 LINE L001 D009 D00A 104
 LINE L002 D00A D00B 104
 LINE L003 D00B D00C 104
 LINE L004 D00C D001 104
 LINE L005 D001 D002 104
 LINE L006 D002 D003 104
 LINE L007 D003 D004 104
 LINE L008 D004 D005 104
 LINE L009 D005 D006 104
 LINE L00A D006 D007 104
 LINE L00B D007 D008 104
 LINE L00C D008 D009 104
 LINE L00D D002 D005 104
 LINE L00E D005 D00C 104
 LINE L00F D00B D006 104
 LINE L00G D00A D007 104
 GSUR A001 + BLEND - L005 - L004 - L00E - L00D
 GSUR A002 + BLEND + L00D - L008 - L007 - L006
 GSUR A003 + BLEND + L00E - L003 + L00F - L009
 GSUR A004 + BLEND - L00F - L002 + L00G - L00A
 GSUR A005 + BLEND - L00G - L001 - L00C - L00B
 SETA E015S1 p D001
 SETA E015S1 p D002
 SETA E015S1 p D003
 SETA E015S1 p D004
 SETA E015S1 p D005
 SETA E015S1 p D006
 SETA E015S1 p D007
 SETA E015S1 p D008
 SETA E015S1 p D009
 SETA E015S1 p D00A
 SETA E015S1 p D00B
 SETA E015S1 p D00C
 SETA E015S1 l L001
 SETA E015S1 l L002
 SETA E015S1 l L003
 SETA E015S1 l L004
 SETA E015S1 l L005
 SETA E015S1 l L006
 SETA E015S1 l L007
 SETA E015S1 l L008
 SETA E015S1 l L009
 SETA E015S1 l L00A
 SETA E015S1 l L00B
 SETA E015S1 l L00C
 SETA E015S1 l L00D
 SETA E015S1 l L00E
 SETA E015S1 l L00F
 SETA E015S1 l L00G
 SETA E015S1 s A001
 SETA E015S1 s A002
 SETA E015S1 s A003
 SETA E015S1 s A004
 SETA E015S1 s A005
 plot p all b
 plus l all k
 plus s all m
 plus b all g
