 PNT D001     0.00000        0.00000       41.50000
 PNT D002     0.00000        0.00000       43.00000
 PNT D003   -17.00000        0.00000       43.00000
 PNT D004   -18.00000        0.00000       44.00000
 PNT D005   -18.00000        0.00000       48.00000
 PNT D006   -19.50000        0.00000       48.00000
 PNT D007   -19.50000        0.00000       52.00000
 PNT D008   -26.00000        0.00000       52.00000
 PNT D009   -26.00000        0.00000       49.81000
 PNT D00A   -22.00000        0.00000       49.81000
 PNT D00B   -22.00000        0.00000       44.00000
 PNT D00C   -17.00000        0.00000       44.00000
 PNT D00D   -22.00000        0.00000       45.57917
 PNT D00E   -17.06250        0.00000       41.50000
 PNT D00T     0.00000        0.00000        0.00000
 PNT D00U     0.00000        0.00000        0.00000
 PNT D00V   -17.00000        0.00000        0.00000
 PNT D00W   -18.00000        0.00000        0.00000
 PNT D00X   -18.00000        0.00000        0.00000
 PNT D00Y   -19.50000        0.00000        0.00000
 PNT D00Z   -19.50000        0.00000        0.00000
 PNT D010   -26.00000        0.00000        0.00000
 PNT D011   -26.00000        0.00000        0.00000
 PNT D012   -23.00000        0.00000        0.00000
 PNT D013   -23.00000        0.00000        0.00000
 PNT D014   -17.00000        0.00000        0.00000
 PNT D015   -23.00000        0.00000        0.00000
 PNT D016   -17.06250        0.00000        0.00000
 PNT D00F   -19.50000        0.00000       44.00000
 PNT D00G   -19.50000        0.00000       41.50000
 LINE L00J D003 D00E 104
 LINE L002 D001 D002 104
 LINE L003 D002 D003 108
 LINE L004 D004 D005 104
 LINE L005 D005 D006 104
 LINE L006 D006 D007 104
 LINE L007 D007 D008 104
 LINE L008 D008 D009 104
 LINE L009 D009 D00A 104
 LINE L00E D004 D00D 104
 LINE L00B D003 D004 D00C 108
 LINE L00C D00A D00D 104
 LINE L00D D00D D00B 104
 LINE L00F D00D D006 104
 LINE L00G D00A D007 104
 LINE L00H D00G D00E 104
 LINE L00I D00E D001 108
 LINE L001 D00B D00G D00F 104
 LCMB C003  - L00H - L001 - L00D
 GSUR A001 + BLEND - L002 - L00I - L00J - L003
 GSUR A008 + BLEND - L00B + L00J + C003 - L00E
 GSUR A003 + BLEND - L004 + L00E + L00F - L005
 GSUR A004 + BLEND - L00F - L00C + L00G - L006
 GSUR A005 + BLEND - L00G - L009 - L008 - L007
 SETA E06AS1 s A001
 SETA E06AS1 s A008
 SETA E06AS1 s A003
 SETA E06AS1 s A004
 SETA E06AS1 s A005
 SETA p p D001
 SETA p p D00B
 SETA p p D00E
 SETA p p D00F
 SETA p p D00G
 plot p all b
 plus l all k
 plus s all m
 plus b all g
