***********************************************************************
*HEADING
Compressor of a Turbocharger, cyclic symetrie
***********************************************************************
**                      UNITS
**   Temp(K), Length(MM), Force(N), Density(10**3*KG/MM**3)
***********************************************************************
**
*NODE, NSET=Nall
       1,0.000000000000e+00,-1.689779500000e+01,5.587957000000e+01
       2,-1.523037127527e-07,-1.633762325000e+01,5.596218200000e+01
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*ELEMENT, TYPE=C3D20R, ELSET=Eall
     1,     1,     2,     3,     4,     5,     6,     7,     8,     9,    10,
          11,    12,    17,    18,    19,    20,    13,    14,    15,    16
     2,     4,     3,    21,    22,     8,     7,    23,    24,    11,    25,
          26,    27,    19,    30,    31,    32,    16,    15,    28,    29
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** Names based on SPC
*NSET,NSET=NSPC
1127,
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*BOUNDARY
Nspc,1,3
**MATERIALPARAMETER:
***********************************************************************
**MATERIALPARAMETER AT 293 K
***********************************************************************
*MATERIAL,NAME=C355
*ELASTIC
.75E5,0.3
*DENSITY
2.65E-9
*SOLID SECTION,ELSET=Eall,MATERIAL=C355
**
*INITIAL CONDITIONS, TYPE=TEMPERATURE
Nall, 293.0
**
*STEP
*FREQUENCY,EIGENSOLVER=LANCZOS
10
*NODE PRINT,FREQUENCY=0
*EL PRINT,FREQUENCY=0
*NODE FILE,FREQUENCY=1
U
*EL FILE,FREQUENCY=1,POSITION=AVERAGED AT NODES
S
*END STEP
