 PNT P100  0.000000000000e+00  1.000000000000e+00  0.000000000000e+00
 PNT P200  0.000000000000e+00  2.000000000000e+00  0.000000000000e+00
 PNT P300  0.000000000000e+00  3.000000000000e+00  0.000000000000e+00
 PNT P400  0.000000000000e+00  4.000000000000e+00  0.000000000000e+00
 PNT P101  0.000000000000e+00  1.000000000000e+00  1.000000000000e+00
 PNT P201  0.000000000000e+00  2.000000000000e+00  1.000000000000e+00
 PNT P301  0.000000000000e+00  3.000000000000e+00  1.000000000000e+00
 PNT P401  0.000000000000e+00  4.000000000000e+00  1.000000000000e+00
 PNT P110  1.000000000000e+00  1.000000000000e+00  0.000000000000e+00
 PNT P210  1.000000000000e+00  2.000000000000e+00  0.000000000000e+00
 PNT P310  1.000000000000e+00  3.000000000000e+00  0.000000000000e+00
 PNT P410  1.000000000000e+00  4.000000000000e+00  0.000000000000e+00
 PNT P111  1.000000000000e+00  1.000000000000e+00  1.000000000000e+00
 PNT P211  1.000000000000e+00  2.000000000000e+00  1.000000000000e+00
 PNT P311  1.000000000000e+00  3.000000000000e+00  1.000000000000e+00
 PNT P411  1.000000000000e+00  4.000000000000e+00  1.000000000000e+00
 PNT P120  2.000000000000e+00  1.000000000000e+00  0.000000000000e+00
 PNT P220  2.000000000000e+00  2.000000000000e+00  0.000000000000e+00
 PNT P320  2.000000000000e+00  3.000000000000e+00  0.000000000000e+00
 PNT P420  2.000000000000e+00  4.000000000000e+00  0.000000000000e+00
 PNT P121  2.000000000000e+00  1.000000000000e+00  1.000000000000e+00
 PNT P221  2.000000000000e+00  2.000000000000e+00  1.000000000000e+00
 PNT P321  2.000000000000e+00  3.000000000000e+00  1.000000000000e+00
 PNT P421  2.000000000000e+00  4.000000000000e+00  1.000000000000e+00
 PNT P130  3.000000000000e+00  1.000000000000e+00  0.000000000000e+00
 PNT P230  3.000000000000e+00  2.000000000000e+00  0.000000000000e+00
 PNT P330  3.000000000000e+00  3.000000000000e+00  0.000000000000e+00
 PNT P430  3.000000000000e+00  4.000000000000e+00  0.000000000000e+00
 PNT P131  3.000000000000e+00  1.000000000000e+00  1.000000000000e+00
 PNT P231  3.000000000000e+00  2.000000000000e+00  1.000000000000e+00
 PNT P331  3.000000000000e+00  3.000000000000e+00  1.000000000000e+00
 PNT P431  3.000000000000e+00  4.000000000000e+00  1.000000000000e+00
 VALU vp P
 VALU vx 4.000000e+00
 VALU v2 4
 VALU v3 1
 VALU vy 4
 VALU vz 1
 VALU p1 P430
 VALU p2 P431
 SETA S1 p P100
 SETA S1 p P200
 SETA S1 p P300
 SETA S1 p P400
 SETA S1 p P110
 SETA S1 p P210
 SETA S1 p P310
 SETA S1 p P410
 SETA S1 p P120
 SETA S1 p P220
 SETA S1 p P320
 SETA S1 p P420
 SETA S1 p P130
 SETA S1 p P230
 SETA S1 p P330
 SETA S1 p P430
 SETA S2 p P101
 SETA S2 p P201
 SETA S2 p P301
 SETA S2 p P401
 SETA S2 p P111
 SETA S2 p P211
 SETA S2 p P311
 SETA S2 p P411
 SETA S2 p P121
 SETA S2 p P221
 SETA S2 p P321
 SETA S2 p P421
 SETA S2 p P131
 SETA S2 p P231
 SETA S2 p P331
 SETA S2 p P431
 wpos 1242 570
 init 784 672 1029 =
 0.500000 0.000000 0.000000 0.000000 0.000000 0.000000 0.000000 0.000000 =
 0.875000 -0.437500 -0.207289 0.000000 -0.437500 -0.531250 -0.725512 0.000000 =
 0.207289 0.725512 -0.656250 0.000000 0.000000 0.000000 0.000000 1.000000 =
 0.875000 -0.250000 0.000000 0.414578 0.000000 0.000000 0.000000 =
 1 3 3 3 1 0 1 0
 plot pa S1 r
 plus pa S2 b
 plus pa S2 b
 plus pa S2 b
