*HEADING
    INP B32 element is UNV 22.
*NODE, NSET=NALL
    1, 0.0E+00, 0.0E+00, 0.0E+00
    2, 1.0E+00, 0.0E+00, 0.0E+00
    3, 5.0E-01, 0.0E+00, 0.0E+00
*ELEMENT, TYPE=B32, ELSET=B32
    1, 1, 3, 2,
*NSET, NSET=N1
    1,
*NSET, NSET=N2
    2,
*NSET, NSET=N3
    3,
*MATERIAL, NAME=STEEL
    *ELASTIC
        2e+5, 0.3
*BEAM SECTION, ELSET=B33, MATERIAL=STEEL, SECTION=RECT
    1,2
    0., 0., -1.
*STEP
    *NO ANALYSIS
*END STEP
