**Boat on water
** Contact problem with elastic support
** This is simulation of Winkler base, calculated
** based on linear contact model. Read CGX help for more information
**https://youtu.be/bXWuHN1Waes
**<img src="boat.jpg">


*NODE, NSET=Nall
       1,2.020592000000e+00,1.363384231901e-17,5.000000000000e-01
       2,2.020592000000e+00,1.363384231901e-17,-5.000000000000e-01
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*ELEMENT, TYPE=S6, ELSET=Eall
   322,     19,      9,    317,   1919,   2240,   2241
   323,      9,     34,    317,   1936,   2242,   2240
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** Names based on S6
*ELSET,ELSET=S6
322,
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** Names based on load
*NSET,NSET=load
1,
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** Names based on fix_x_z
*NSET,NSET=fix_x_z
11,
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** Names based on water
*NSET,NSET=water
15,
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*ELSET,ELSET=water
1574,
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** Names based on boat
*NSET,NSET=boat
1,
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*ELSET,ELSET=boat
322,
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** Surfaces based on water
*SURFACE, NAME=water
1767, SPOS
1768, SPOS
1697, SPOS
1644, SPOS
1645, SPOS
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3942, SPOS
** Surfaces based on all
*SURFACE, NAME=all
462, SPOS
553, SPOS
1411, SPOS
434, SPOS
461, SPOS
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3942, SPOS
** Surfaces based on load
*SURFACE, NAME=load
1411, SPOS
1399, SPOS
1407, SPOS
1403, SPOS
1404, SPOS
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1498, SPOS
** Surfaces based on S6
*SURFACE, NAME=S6
** Surfaces based on boat
*SURFACE, NAME=boat
462, SPOS
553, SPOS
1411, SPOS
434, SPOS
461, SPOS
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1571, SPOS
** Surfaces based on fix_x_z
*SURFACE, NAME=fix_x_z
*MATERIAL,NAME=ssteel
*ELASTIC
1.9300E+11,0.29
*DENSITY
8.0000E+03


*SHELL SECTION,MATERIAL=ssteel,ELSET=Eall,,OFFSET=0.0000E+00
3.0000E-03

*BOUNDARY
water,1,1,0
water,2,2,0
water,3,3,0

*BOUNDARY
fix_x_z,1,1,0
fix_x_z,3,3,0

*CONTACT PAIR,INTERACTION=SI1,TYPE=SURFACE TO SURFACE
water,boat
*SURFACE INTERACTION,NAME=SI1
*SURFACE BEHAVIOR,PRESSURE-OVERCLOSURE=Linear
9800,0

*STEP
*STATIC
*CLOAD
load,2,-1.0917E+01

  *NODE FILE
U,
  *EL FILE
S,
*NODE PRINT,NSET=water
RF
*NODE PRINT,NSET=fix_x_z
RF
*END STEP
