** Contact of bolted plates
** This is simulation of friction type of bolted connection
**https://youtu.be/9SJpHRY5GXs
**<img src="onebolt.jpg">

*NODE, NSET=Nall
       1,6.717514000000e-02,3.000000000000e-01,-6.717514000000e-02
       2,1.060660000000e-01,3.500000000000e-01,-1.060660000000e-01
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*ELEMENT, TYPE=C3D10, ELSET=Eall
  3027,   366,  1385,   844,   845, 11208, 11207, 11206, 11209, 11210,  3577
  3028,  1239,  1279,   771,   731,  4944, 11212, 11211, 11213, 11214,  6827
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** Names based on nut
*NSET,NSET=nut
1414,
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** Names based on master
*NSET,NSET=master
1412,
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** Names based on fix
*NSET,NSET=fix
5,
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** Names based on slave
*NSET,NSET=slave
3,
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** Names based on load
*NSET,NSET=load
1416,
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** Names based on head
*NSET,NSET=head
1,
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** Names based on C3D10
*ELSET,ELSET=C3D10
3027,
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** Surfaces based on nut
*SURFACE, NAME=nut
** Surfaces based on head
*SURFACE, NAME=head
** Surfaces based on slave
*SURFACE, NAME=slave
3982, S4
5453, S4
5427, S1
5786, S3
3978, S4
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4854, S1
** Surfaces based on all
*SURFACE, NAME=all
6938, S1
6941, S4
5035, S4
5565, S4
6939, S1
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10511, S2
** Surfaces based on load
*SURFACE, NAME=load
12502, S2
10163, S1
12830, S4
13714, S4
12696, S2
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11889, S1
** Surfaces based on master
*SURFACE, NAME=master
13916, S3
13487, S1
12576, S1
11496, S4
10948, S1
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12778, S3
** Surfaces based on fix
*SURFACE, NAME=fix
3979, S4
5734, S1
3070, S4
3878, S1
4717, S2
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3991, S3
** Surfaces based on C3D10
*SURFACE, NAME=C3D10
*MATERIAL,NAME=steel
*ELASTIC
2.0000E+11,0.28
*DENSITY
7.8500E+03

*SOLID SECTION,MATERIAL=steel,ELSET=Eall

*NODE
101001,0,0,0
*NSET,NSET=DC_1_nut
101001
*ELEMENT,TYPE=DCOUP3D
100001,101001
*ELSET,ELSET=DC_1_nut
100001
*DISTRIBUTING COUPLING,ELSET=DC_1_nut
nut,1

*NODE
101002,0,0,0
*NSET,NSET=DC_2_head
101002
*ELEMENT,TYPE=DCOUP3D
100002,101002
*ELSET,ELSET=DC_2_head
100002
*DISTRIBUTING COUPLING,ELSET=DC_2_head
head,1

*BOUNDARY
fix,1,1,0
fix,2,2,0
fix,3,3,0

*BOUNDARY
load,1,1,0
load,2,2,0
load,3,3,0

*CONTACT PAIR,INTERACTION=SI1,TYPE=SURFACE TO SURFACE
slave,master
*SURFACE INTERACTION,NAME=SI1
*SURFACE BEHAVIOR,PRESSURE-OVERCLOSURE=Linear
10000000000000,0

*FRICTION
0.1,1000000000000

*NODE
102001,0,0,0
102002,0.081317,0.3,-0.024749
102003,0.053033,0.3,-0.053033
102004,0,0,0

*ELEMENT, TYPE=B31, ELSET=Ebolt0
101001,102002,102003

*BEAM SECTION,ELSET=Ebolt0,MATERIAL=steel,SECTION=CIRC
0.024,0.024

*EQUATION
2
101001,1,1.,102002,1,-1.
2
101001,2,1.,102002,2,-1.
2
101001,3,1.,102002,3,-1.
*EQUATION
2
101002,1,1.,102003,1,-1.
2
101002,2,1.,102003,2,-1.
2
101002,3,1.,102003,3,-1.

*PRE-TENSION SECTION,ELEMENT=101001,NODE=102004
-0.707106781186548,0,-0.707106781186547

*STEP
*STATIC
*CLOAD
102004,1,1000

*NODE FILE
U
*EL FILE
S
*END STEP

*STEP
*STATIC
  *NODE FILE
U,
  *EL FILE
S,
*NODE PRINT,NSET=fix
RF
*NODE PRINT,NSET=load
RF
*END STEP
