**Plastic clamp
**Simple example
**https://youtu.be/ier9Ww37Xtk
**<img src="clamp1.jpg">

*NODE, NSET=Nall
       1,5.000000000000e-01,8.875000000000e-01,-5.000000000000e-01
       2,5.000000000000e-01,8.875000000000e-01,5.000000000000e-01
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*ELEMENT, TYPE=C3D10, ELSET=Eall
   227,    30,    31,   103,    63,   139,   401,   400,   258,   257,   402
   228,    71,    31,   103,    30,   277,   401,   403,   276,   139,   400
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** Names based on slave
*NSET,NSET=slave
640,
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** Names based on master
*NSET,NSET=master
1,
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** Names based on moveY
*NSET,NSET=moveY
2,
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** Names based on Solid_2
*ELSET,ELSET=Solid_2
227,
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** Names based on plastic
*ELSET,ELSET=plastic
3310,
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** Names based on fixed
*NSET,NSET=fixed
653,
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** Names based on C3D10
*ELSET,ELSET=C3D10
227,
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** Surfaces based on plastic
*SURFACE, NAME=plastic
** Surfaces based on slave
*SURFACE, NAME=slave
6797, S1
6814, S1
6102, S4
4310, S4
6333, S2
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5014, S3
** Surfaces based on master
*SURFACE, NAME=master
386, S1
307, S1
229, S1
319, S1
326, S4
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487, S3
** Surfaces based on C3D10
*SURFACE, NAME=C3D10
** Surfaces based on moveY
*SURFACE, NAME=moveY
388, S4
319, S4
420, S2
331, S2
291, S2
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408, S4
** Surfaces based on Solid_2
*SURFACE, NAME=Solid_2
** Surfaces based on all
*SURFACE, NAME=all
386, S1
286, S2
307, S1
303, S3
229, S1
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5014, S3
** Surfaces based on fixed
*SURFACE, NAME=fixed
6622, S3
3877, S1
3872, S3
7138, S3
5797, S4
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4309, S4

*MATERIAL,NAME=steel
*ELASTIC
2.9000E+07,0.28


*DENSITY
7.3500E-04
*EXPANSION
7.2280E-06

*SOLID SECTION,MATERIAL=steel,ELSET=Eall


*MATERIAL,NAME=pla
*ELASTIC
5.0750E+05,0.27


*DENSITY
1.2172E-04
*EXPANSION
0.0000E+00

*SOLID SECTION,MATERIAL=pla,ELSET=plastic

*BOUNDARY
fixed,1,1,0
fixed,2,2,0
fixed,3,3,0

*BOUNDARY
moveY,1,1,0
moveY,2,2,0.8
moveY,3,3,0

*CONTACT PAIR,INTERACTION=SI1,TYPE=SURFACE TO SURFACE,ADJUST=0
slave,master
*SURFACE INTERACTION,NAME=SI1
*SURFACE BEHAVIOR,PRESSURE-OVERCLOSURE=Linear
1450000000,0

*FRICTION
0.1,145000000


*STEP,NLGEOM,INC=1000
*STATIC
0.05,1
  *NODE FILE
U,
  *EL FILE
S,E,
*NODE PRINT,NSET=fixed
RF
*NODE PRINT,NSET=moveY
RF
*CONTACT OUTPUT
CDIS,CSTR
*END STEP
