**D-ring example
**Simple structure with contact
**<img src="dring.jpg">

*NODE, NSET=Nall
       1,1.250000000000e-01,1.999000000000e+00,-2.500000000000e-01
       2,1.250000000000e-01,1.999000000000e+00,2.500000000000e-01
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*ELEMENT, TYPE=C3D10, ELSET=Eall
   171,    81,    11,    23,    51,   321,   155,   320,   322,   210,   208
   172,    36,    17,    29,    35,   168,   151,   323,   216,   167,   324
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** Names based on slave1
*NSET,NSET=slave1
7186,
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** Names based on master1
*NSET,NSET=master1
583,
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** Names based on fix-UY
*NSET,NSET=fix-UY
1,
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** Names based on Solid_4
*ELSET,ELSET=Solid_4
2310,
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** Names based on Solid_5
*ELSET,ELSET=Solid_5
171,
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** Names based on weld
*NSET,NSET=weld
7180,
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** Names based on master2
*NSET,NSET=master2
1,
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** Names based on Solid_3
*ELSET,ELSET=Solid_3
7972,
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** Names based on slave2
*NSET,NSET=slave2
590,
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** Names based on C3D10
*ELSET,ELSET=C3D10
171,
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** Surfaces based on slave1
*SURFACE, NAME=slave1
10359, S2
9324, S2
8383, S1
7978, S3
9549, S2
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8251, S3
** Surfaces based on weld
*SURFACE, NAME=weld
10046, S1
9915, S1
9688, S3
10223, S4
8796, S1
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10110, S1
** Surfaces based on C3D10
*SURFACE, NAME=C3D10
** Surfaces based on Solid_5
*SURFACE, NAME=Solid_5
** Surfaces based on Solid_4
*SURFACE, NAME=Solid_4
** Surfaces based on master1
*SURFACE, NAME=master1
4274, S1
3366, S2
4131, S3
3784, S2
3580, S2
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3541, S2
** Surfaces based on fix-UY
*SURFACE, NAME=fix-UY
271, S1
440, S2
400, S2
212, S1
281, S4
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427, S2
** Surfaces based on all
*SURFACE, NAME=all
271, S1
271, S3
307, S3
440, S2
332, S2
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10110, S1
** Surfaces based on master2
*SURFACE, NAME=master2
271, S3
307, S3
332, S2
260, S3
212, S3
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420, S4
** Surfaces based on Solid_3
*SURFACE, NAME=Solid_3
** Surfaces based on slave2
*SURFACE, NAME=slave2
4235, S2
4291, S2
3494, S2
3433, S4
3434, S4
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5185, S2

*MATERIAL,NAME=steel
*ELASTIC
2.9000E+07,0.28


*DENSITY
7.3500E-04
*EXPANSION
7.2280E-06

*SOLID SECTION,MATERIAL=steel,ELSET=Eall

*BOUNDARY
weld,1,1,0
weld,2,2,0
weld,3,3,0

*BOUNDARY
fix-UY,1,1,0
fix-UY,2,2,0.125
fix-UY,3,3,0

*CONTACT PAIR,INTERACTION=SI1,TYPE=SURFACE TO SURFACE,ADJUST=0
slave1,master1
*SURFACE INTERACTION,NAME=SI1
*SURFACE BEHAVIOR,PRESSURE-OVERCLOSURE=Linear
1450000000,0

*FRICTION
0.25,145000000

*CONTACT PAIR,INTERACTION=SI2,TYPE=SURFACE TO SURFACE,ADJUST=0
slave2,master2
*SURFACE INTERACTION,NAME=SI2
*SURFACE BEHAVIOR,PRESSURE-OVERCLOSURE=Linear
1450000000,0

*FRICTION
0.25,145000000


*STEP,NLGEOM,INC=1000
*STATIC
0.025,1
  *NODE FILE
U,
  *EL FILE
S,
*NODE PRINT,NSET=weld
RF
*NODE PRINT,NSET=fix-UY
RF
*CONTACT OUTPUT
CDIS,CSTR
*END STEP
