**Pin
**Pinned connection of two links with contact
**<img src="misestruss.jpg">

*NODE, NSET=Nall
       1,1.000000000000e+00,-8.726203000000e-03,4.999238000000e-01
       2,1.000000000000e+00,-1.000720000000e+01,3.253998000000e-01
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*ELEMENT, TYPE=C3D10, ELSET=Eall
  2367,   591,  1153,  1162,   598,  4320,  4321,  4319,  2522,  4323,  4322
  2368,   637,  1051,   191,   817,  4324,  4326,  2794,  4325,  4327,  3515
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** Names based on load1
*NSET,NSET=load1
6,
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** Names based on pin
*NSET,NSET=pin
14276,
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** Names based on face1
*NSET,NSET=face1
11,
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** Names based on Solid_2
*ELSET,ELSET=Solid_2
12300,
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** Names based on Solid_1
*ELSET,ELSET=Solid_1
2367,
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** Names based on fix2
*NSET,NSET=fix2
7115,
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** Names based on hole1
*NSET,NSET=hole1
1,
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** Names based on fix1
*NSET,NSET=fix1
2,
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** Names based on hole2
*NSET,NSET=hole2
7114,
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** Names based on load2
*NSET,NSET=load2
7118,
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** Names based on face2
*NSET,NSET=face2
7114,
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** Names based on Solid_3
*ELSET,ELSET=Solid_3
8404,
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** Names based on C3D10
*ELSET,ELSET=C3D10
2367,
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** Surfaces based on pin
*SURFACE, NAME=pin
12339, S2
12374, S4
12306, S3
12389, S1
12454, S3
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12458, S1
** Surfaces based on fix2
*SURFACE, NAME=fix2
11873, S2
11852, S1
8559, S4
11857, S1
11861, S1
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10845, S1
** Surfaces based on C3D10
*SURFACE, NAME=C3D10
** Surfaces based on Solid_1
*SURFACE, NAME=Solid_1
** Surfaces based on load1
*SURFACE, NAME=load1
5074, S4
2403, S3
3509, S4
4278, S3
4830, S3
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5432, S3
** Surfaces based on face1
*SURFACE, NAME=face1
3107, S3
4770, S2
4288, S2
5809, S2
3029, S4
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4878, S3
** Surfaces based on load2
*SURFACE, NAME=load2
11678, S2
11695, S2
10139, S3
9227, S1
11242, S4
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9196, S3
** Surfaces based on hole2
*SURFACE, NAME=hole2
11849, S1
11850, S3
8405, S4
11854, S1
10423, S2
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11979, S1
** Surfaces based on Solid_2
*SURFACE, NAME=Solid_2
** Surfaces based on all
*SURFACE, NAME=all
5047, S3
5801, S4
5934, S3
3559, S3
4516, S2
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12458, S1
** Surfaces based on fix1
*SURFACE, NAME=fix1
3835, S3
5804, S1
2469, S2
5808, S1
5812, S1
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5867, S1
** Surfaces based on Solid_3
*SURFACE, NAME=Solid_3
** Surfaces based on hole1
*SURFACE, NAME=hole1
5047, S3
5934, S3
5806, S1
5807, S4
5872, S1
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5931, S1
** Surfaces based on face2
*SURFACE, NAME=face2
9316, S4
9085, S3
11848, S1
11853, S2
9744, S4
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10601, S1

*MATERIAL,NAME=steel
*ELASTIC
2.9000E+07,0.28
*DENSITY
7.3500E-04
*EXPANSION
7.2280E-06

*SOLID SECTION,MATERIAL=steel,ELSET=Eall

*BOUNDARY
fix1,1,1,0
fix1,3,3,0

*BOUNDARY
fix2,1,1,0
fix2,3,3,0

*TRANSFORM,NSET=fix1,TYPE=C
7.5000E-01,-9.9985E+00,-1.7489E-01,1.7500E+00,-9.9985E+00,-1.7489E-01

*TRANSFORM,NSET=fix2,TYPE=C
2.5000E-01,9.9985E+00,-1.7416E-01,1.2500E+00,9.9985E+00,-1.7416E-01

*CONTACT PAIR,INTERACTION=SI1,TYPE=SURFACE TO SURFACE
face2,face1
*SURFACE INTERACTION,NAME=SI1
*SURFACE BEHAVIOR,PRESSURE-OVERCLOSURE=Linear
1450000000,0

*CONTACT PAIR,INTERACTION=SI2,TYPE=SURFACE TO SURFACE
pin,hole1
*SURFACE INTERACTION,NAME=SI2
*SURFACE BEHAVIOR,PRESSURE-OVERCLOSURE=Linear
1450000000,0

*FRICTION
0.2,145000000

*CONTACT PAIR,INTERACTION=SI3,TYPE=SURFACE TO SURFACE
pin,hole2
*SURFACE INTERACTION,NAME=SI3
*SURFACE BEHAVIOR,PRESSURE-OVERCLOSURE=Linear
1450000000,0

*FRICTION
0.2,145000000


*STEP,NLGEOM,INC=100
*STATIC
0.1,1
*CLOAD
load1,3,-1.1876E+01

*CLOAD
load2,3,-1.1765E+01

  *NODE FILE
U,
  *EL FILE
S,
*NODE PRINT,NSET=fix1
RF
*NODE PRINT,NSET=fix2
RF
*CONTACT OUTPUT
CDIS,CSTR
*END STEP
