**Rolling Contact
**Three bodies in contact. Wheel is rolling by surface.
**<img src="rolcont.jpg">

*NODE, NSET=Nall
       1,7.500000000000e-01,7.500000000000e-01,2.500000000000e-01
       2,7.500000000000e-01,7.500000000000e-01,0.000000000000e+00
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*ELEMENT, TYPE=C3D20, ELSET=Eall
  2983,     4,    84,   571,    56,    55,   567,  2371,   518,  3841,  4506,
        4505,  3807,  4492,  8598,  8597,  4366,  3806,  4501,  8599,  4377
  2984,    55,   567,  2371,   518,    54,   563,  2372,   507,  4492,  8598,
        8597,  4366,  4483,  8601,  8600,  4343,  3805,  4493,  8602,  4365
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*ELEMENT, TYPE=C3D15, ELSET=Eall
  3559,    20,    18,   225,   214,   207,   929,  3998,  5476,  4011,
        5369,  9693,  5376,  3996,  3988,  5377
  3560,   214,   207,   929,   213,   206,   932,  5369,  9693,  5376,
        5370,  9694,  5383,  3995,  3987,  5384
  3561,   213,   206,   932,   212,   205,   935,  5370,  9694,  5383,
        5371,  9695,  5390,  3994,  3986,  5391
  3562,   212,   205,   935,   211,   204,   938,  5371,  9695,  5390,
        5372,  9696,  5397,  3993,  3985,  5398
  3563,   211,   204,   938,   210,   203,   941,  5372,  9696,  5397,
        5373,  9697,  5404,  3992,  3984,  5405
  3564,   210,   203,   941,   209,   202,   944,  5373,  9697,  5404,
        5374,  9698,  5411,  3991,  3983,  5412
  3565,   209,   202,   944,   208,   201,   947,  5374,  9698,  5411,
        5375,  9699,  5418,  3990,  3982,  5419
  3566,   208,   201,   947,    19,    17,   222,  5375,  9699,  5418,
        3997,  5474,  4007,  3989,  3981,  5425
*ELEMENT, TYPE=C3D20, ELSET=Eall
  3567,   225,    18,   238,   226,   929,   207,   951,   930,  5476,  4030,
        5477,  4012,  9693,  5439,  9700,  5378,  5377,  3988,  5438,  5379
  3568,   929,   207,   951,   930,   932,   206,   953,   933,  9693,  5439,
        9700,  5378,  9694,  5444,  9701,  5385,  5384,  3987,  5443,  5386
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*ELEMENT, TYPE=C3D15, ELSET=Eall
  3583,   226,   238,   237,   930,   951,   950,  5477,  4029,  5479,
        9700,  5437,  9708,  5379,  5438,  5436
  3584,   930,   951,   950,   933,   953,   952,  9700,  5437,  9708,
        9701,  5442,  9710,  5386,  5443,  5441
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*ELEMENT, TYPE=C3D20, ELSET=Eall
  3607,   249,    24,   262,   250,   964,   234,   986,   965,  5580,  4062,
        5581,  4044,  9721,  5543,  9728,  5482,  5481,  4022,  5542,  5483
  3608,   964,   234,   986,   965,   967,   233,   988,   968,  9721,  5543,
        9728,  5482,  9722,  5548,  9729,  5489,  5488,  4021,  5547,  5490
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*ELEMENT, TYPE=C3D15, ELSET=Eall
  3623,   250,   262,   261,   965,   986,   985,  5581,  4061,  5583,
        9728,  5541,  9736,  5483,  5542,  5540
  3624,   965,   986,   985,   968,   988,   987,  9728,  5541,  9736,
        9729,  5546,  9738,  5490,  5547,  5545
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*ELEMENT, TYPE=C3D20, ELSET=Eall
  3647,   273,    28,   286,   274,   999,   258,  1021,  1000,  5684,  4094,
        5685,  4076,  9749,  5647,  9756,  5586,  5585,  4054,  5646,  5587
  3648,   999,   258,  1021,  1000,  1002,   257,  1023,  1003,  9749,  5647,
        9756,  5586,  9750,  5652,  9757,  5593,  5592,  4053,  5651,  5594
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*ELEMENT, TYPE=C3D15, ELSET=Eall
  3663,   274,   286,   285,  1000,  1021,  1020,  5685,  4093,  5687,
        9756,  5645,  9764,  5587,  5646,  5644
  3664,  1000,  1021,  1020,  1003,  1023,  1022,  9756,  5645,  9764,
        9757,  5650,  9766,  5594,  5651,  5649
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*ELEMENT, TYPE=C3D20, ELSET=Eall
  3687,   290,    32,   296,   291,  1034,   282,  1056,  1035,  5781,  4108,
        5782,  4100,  9777,  5744,  9784,  5690,  5689,  4086,  5743,  5691
  3688,  1034,   282,  1056,  1035,  1037,   281,  1058,  1038,  9777,  5744,
        9784,  5690,  9778,  5749,  9785,  5697,  5696,  4085,  5748,  5698
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*ELEMENT, TYPE=C3D15, ELSET=Eall
  3703,   291,   296,   295,  1035,  1056,  1055,  5782,  4107,  5784,
        9784,  5742,  9792,  5691,  5743,  5741
  3704,  1035,  1056,  1055,  1038,  1058,  1057,  9784,  5742,  9792,
        9785,  5747,  9794,  5698,  5748,  5746
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*ELEMENT, TYPE=C3D20, ELSET=Eall
  3719,    24,   234,   950,   237,   262,   986,  2659,  1075,  4022,  5435,
        5436,  4028,  5542,  9806,  9805,  5807,  4062,  5543,  9807,  5802
  3720,   262,   986,  2659,  1075,   261,   985,  2660,  1076,  5542,  9806,
        9805,  5807,  5540,  9809,  9808,  5808,  4061,  5541,  9810,  5804
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** Names based on slave1
*NSET,NSET=slave1
35,
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** Names based on master1
*NSET,NSET=master1
1,
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** Names based on C3D15
*ELSET,ELSET=C3D15
3559,
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** Names based on dx
*NSET,NSET=dx
33,
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** Names based on master2
*NSET,NSET=master2
5,
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** Names based on move
*NSET,NSET=move
17,
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** Names based on dydz
*NSET,NSET=dydz
33,
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** Names based on C3D20
*ELSET,ELSET=C3D20
2983,
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** Names based on slave2
*NSET,NSET=slave2
19,
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** Surfaces based on slave1
*SURFACE, NAME=slave1
4361, S5
5561, S5
4390, S5
5590, S5
4961, S5
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4962, S5
** Surfaces based on dydz
*SURFACE, NAME=dydz
3791, S3
4991, S3
3820, S3
5020, S3
4391, S3
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4419, S3
** Surfaces based on master1
*SURFACE, NAME=master1
3022, S6
3168, S6
3024, S6
3166, S6
2985, S6
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3452, S6
** Surfaces based on dx
*SURFACE, NAME=dx
3791, S1
4991, S1
4361, S1
5561, S1
3820, S2
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4960, S2
** Surfaces based on C3D20
*SURFACE, NAME=C3D20
** Surfaces based on all
*SURFACE, NAME=all
3022, S6
3168, S6
3022, S1
3168, S2
3024, S6
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3849, S6
** Surfaces based on master2
*SURFACE, NAME=master2
3124, S4
3270, S4
3126, S4
3268, S4
3117, S4
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3551, S4
** Surfaces based on move
*SURFACE, NAME=move
3566, S2
3718, S2
3574, S2
3788, S4
3702, S2
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3723, S6
** Surfaces based on slave2
*SURFACE, NAME=slave2
3566, S5
3718, S5
3559, S5
3711, S5
3598, S5
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3701, S6
** Surfaces based on C3D15
*SURFACE, NAME=C3D15

*MATERIAL,NAME=steel
*ELASTIC
2.9000E+07,0.28


*DENSITY
7.3500E-04
*EXPANSION
7.2280E-06

*SOLID SECTION,MATERIAL=steel,ELSET=Eall

** default amplitude
*AMPLITUDE,NAME=Amp0
0,0,1,1

*AMPLITUDE,NAME=Graph1
0,0,
0.5,-0.005,
1,-0.005,

*AMPLITUDE,NAME=Graph2
0,0,
0.5,1,

*BOUNDARY
dx,1,1,0

*BOUNDARY
dydz,2,2,0
dydz,3,3,0

*CONTACT PAIR,INTERACTION=SI2,TYPE=SURFACE TO SURFACE,ADJUST=0
slave1,master1
*SURFACE INTERACTION,NAME=SI2
*SURFACE BEHAVIOR,PRESSURE-OVERCLOSURE=Linear
14500000000,0

*FRICTION
0.15,145000000

*CONTACT PAIR,INTERACTION=SI3,TYPE=SURFACE TO SURFACE,ADJUST=0
slave2,master2
*SURFACE INTERACTION,NAME=SI3
*SURFACE BEHAVIOR,PRESSURE-OVERCLOSURE=Linear
14500000000,0

*FRICTION
0.15,145000000


*TIME POINTS,NAME=T1,GENERATE
0,1,5.0000E-02

*STEP,NLGEOM,INC=10000
*STATIC
0.05,1
*BOUNDARY,AMPLITUDE=graph1,TIME DELAY=0
move,2,2,1
move,3,3,0

*BOUNDARY,AMPLITUDE=graph2,TIME DELAY=0.5
move,1,1,1
move,3,3,0

  *NODE FILE ,TIME POINTS=T1
U,
  *EL FILE,TIME POINTS=T1
S,
*NODE PRINT,NSET=dx,TIME POINTS=T1
RF
*NODE PRINT,NSET=dydz,TIME POINTS=T1
RF
*NODE PRINT,NSET=move,TIME POINTS=T1
RF
*NODE PRINT,NSET=move,TIME POINTS=T1
RF
*CONTACT OUTPUT
CDIS,CSTR
*END STEP
