**Shells in contact
**Simple example with shell elements
**https://youtu.be/cH_leTeGBuA
**<img src="shellcont.jpg">

*NODE, NSET=Nall
       1,2.500000000000e+02,-1.010000000000e+02,2.000000000000e+02
       2,-5.000000000000e+01,-1.010000000000e+02,2.000000000000e+02
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*ELEMENT, TYPE=S8R, ELSET=Eall
   189,      1,     64,    187,      5,   2046,   2174,   2173,   1985
   190,      5,    187,    188,      6,   2173,   2176,   2175,   1986
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** Names based on slave
*NSET,NSET=slave
3,
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** Names based on S8R
*ELSET,ELSET=S8R
189,
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** Names based on master
*NSET,NSET=master
1,
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** Names based on movedz
*NSET,NSET=movedz
1,
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** Names based on fixed
*NSET,NSET=fixed
4,
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** Surfaces based on slave
*SURFACE, NAME=slave
1149, SPOS
1180, SPOS
2077, SPOS
2108, SPOS
1150, SPOS
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2075, SPOS
** Surfaces based on master
*SURFACE, NAME=master
189, SPOS
220, SPOS
1117, SPOS
1148, SPOS
190, SPOS
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1115, SPOS
** Surfaces based on movedz
*SURFACE, NAME=movedz
** Surfaces based on all
*SURFACE, NAME=all
189, SPOS
220, SPOS
1117, SPOS
1148, SPOS
1149, SPOS
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2075, SPOS
** Surfaces based on fixed
*SURFACE, NAME=fixed
** Surfaces based on S8R
*SURFACE, NAME=S8R

*MATERIAL,NAME=steel
*ELASTIC
2.0000E+05,0.28


*DENSITY
7.8500E-09
*EXPANSION
1.3000E-05


*SHELL SECTION,MATERIAL=steel,ELSET=Eall,,OFFSET=0.0000E+00
1.0000E+00

*BOUNDARY
fixed,1,1,0
fixed,2,2,0
fixed,3,3,0

*BOUNDARY
movedz,1,1,0
movedz,2,2,15
movedz,3,3,0

*CONTACT PAIR,INTERACTION=SI1,TYPE=SURFACE TO SURFACE,ADJUST=0
slave,master
*SURFACE INTERACTION,NAME=SI1
*SURFACE BEHAVIOR,PRESSURE-OVERCLOSURE=Linear
10000000,0


*TIME POINTS,NAME=T1,GENERATE
0,1,1.0000E-01

*STEP,NLGEOM,INC=10000
*STATIC
0.1,1
  *NODE FILE ,TIME POINTS=T1
U,
  *EL FILE,TIME POINTS=T1
S,
*NODE PRINT,NSET=fixed,TIME POINTS=T1
RF
*NODE PRINT,NSET=movedz,TIME POINTS=T1
RF
*CONTACT OUTPUT
CDIS,CSTR
*END STEP
