**Impact
**Example with dynamic contact
**NOTE: time incremet should be very small to get accurate results
**<img src="impact.jpg">

*NODE, NSET=Nall
       1,1.250000000000e-01,1.250000000000e-01,0.000000000000e+00
       2,1.250000000000e-01,1.250000000000e-01,1.500000000000e-02
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*ELEMENT, TYPE=C3D10, ELSET=Eall
  1507,   386,   355,   376,   652,  1610,  1576,  1637,  2736,  2738,  2737
  1508,   207,   206,   469,   523,  1044,  2741,  2739,  2740,  2742,  2048
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** Names based on slave
*NSET,NSET=slave
2,
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** Names based on ball
*ELSET,ELSET=ball
3694,
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** Names based on master
*NSET,NSET=master
3912,
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** Names based on plate
*ELSET,ELSET=plate
1507,
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** Names based on fixed
*NSET,NSET=fixed
1,
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** Names based on C3D10
*ELSET,ELSET=C3D10
1507,
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** Surfaces based on slave
*SURFACE, NAME=slave
1885, S3
1647, S2
2162, S3
2358, S4
2964, S1
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1910, S1
** Surfaces based on master
*SURFACE, NAME=master
3994, S2
3865, S3
3694, S3
3968, S3
3747, S3
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3891, S4
** Surfaces based on C3D10
*SURFACE, NAME=C3D10
** Surfaces based on plate
*SURFACE, NAME=plate
** Surfaces based on all
*SURFACE, NAME=all
2029, S3
2029, S1
3330, S1
3330, S3
1885, S3
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3891, S4
** Surfaces based on fixed
*SURFACE, NAME=fixed
3330, S3
1669, S2
1753, S3
2060, S4
2026, S4
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2381, S1
** Surfaces based on ball
*SURFACE, NAME=ball

*MATERIAL,NAME=steel
*ELASTIC
2.0000E+11,0.28


*DENSITY
7.8500E+03
*EXPANSION
1.3000E-05

*SOLID SECTION,MATERIAL=steel,ELSET=Eall

*BOUNDARY
fixed,1,1,0
fixed,2,2,0
fixed,3,3,0

*CONTACT PAIR,INTERACTION=SI1,TYPE=SURFACE TO SURFACE,ADJUST=0
slave,master
*SURFACE INTERACTION,NAME=SI1
*SURFACE BEHAVIOR,PRESSURE-OVERCLOSURE=Linear
1E15,0


*STEP,NLGEOM,INC=1000
** ALPHA is for dissipation of the high frequency response, takes an argument between -0.33 ...0
*DYNAMIC,ALPHA=-0.05
1e-8,2

*DLOAD
Eall,GRAV,9.8100E+00,0,0,-1
  *NODE FILE
U,
  *EL FILE
S,
*END STEP
