**Limit load
**Double-click on folder to see more files
**See the article here
**http://calculixforwin.blogspot.com/2016/12/limit-state-in-calculix-lrfd.html
**<img src="lrfd.jpg">

*NODE, NSET=Nall
       1,0.000000000000e+00,0.000000000000e+00,3.000000000000e+01
       2,0.000000000000e+00,5.000000000000e-01,3.000000000000e+01
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*ELEMENT, TYPE=C3D20, ELSET=Eall
  2631,     2,    25,    62,     1,   530,   648,  2050,   140,  2177,  6125,
        2630,  2132,  2936,  6149,  6093,  2669,  2130,  2943,  6100,  2090
  2632,   530,   648,  2050,   140,   529,   645,  2043,   139,  2936,  6149,
        6093,  2669,  2929,  6150,  6078,  2668,  2129,  2937,  6092,  2089
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*ELEMENT, TYPE=C3D15, ELSET=Eall
  3551,     4,    40,     9,   452,  1287,   257,  6146,  6142,  6140,
        6930,  6774,  6734,  2220,  4362,  2462
  3552,   452,  1287,   257,   451,  1280,   256,  6930,  6774,  6734,
        6932,  6776,  6735,  2219,  4351,  2461
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** Names based on uz
*NSET,NSET=uz
13,
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** Names based on moment-load
*NSET,NSET=moment-load
1,
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** Names based on ux
*NSET,NSET=ux
20,
24,
** Names based on C3D15
*ELSET,ELSET=C3D15
3551,
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** Names based on uy
*NSET,NSET=uy
13,
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** Names based on C3D20
*ELSET,ELSET=C3D20
2631,
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** Surfaces based on uz
*SURFACE, NAME=uz
2950, S2
2670, S2
2990, S2
3630, S2
2830, S2
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2910, S2
** Surfaces based on ux
*SURFACE, NAME=ux
** Surfaces based on C3D20
*SURFACE, NAME=C3D20
** Surfaces based on uy
*SURFACE, NAME=uy
** Surfaces based on all
*SURFACE, NAME=all
2631, S1
2631, S6
2631, S5
2631, S3
2951, S1
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2672, S6
** Surfaces based on moment-load
*SURFACE, NAME=moment-load
2631, S1
2951, S1
3591, S1
2751, S1
3191, S1
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2871, S1
** Surfaces based on C3D15
*SURFACE, NAME=C3D15

*MATERIAL,NAME=steel
*ELASTIC
2.9000E+07,0.28
*PLASTIC,HARDENING=isotropic
50000,0.0
75000,0.00862068965517241


*DENSITY
7.3500E-04
*EXPANSION
7.2280E-06

*SOLID SECTION,MATERIAL=steel,ELSET=Eall

*BOUNDARY
uz,3,3,0

*BOUNDARY
uy,2,2,0

*BOUNDARY
ux,1,1,0

*NODE
8085,0,0,0
*RIGID BODY,NSET=moment-load,,ROT NODE=8085


*TIME POINTS,NAME=T1,GENERATE
0,1,5.0000E-02

*STEP,NLGEOM,INC=100
*STATIC
0.05,1
*CLOAD
8085,1,9.8125E+05

  *NODE FILE ,TIME POINTS=T1
U,
  *EL FILE,TIME POINTS=T1
S,
*NODE PRINT,NSET=uz,TIME POINTS=T1
RF
*NODE PRINT,NSET=uy,TIME POINTS=T1
RF
*NODE PRINT,NSET=ux,TIME POINTS=T1
RF
*END STEP
