**Nonlinear buckling problem of shell
** This is two stage sample with
**1) creating model with dents
**2) nonlinear calculation with plastic
** For details double-click folder to see aditional files
** See the video-lesson at here:
**https://youtu.be/Je91eMkItts
**<img src="nonlinshellpuckl.jpg">

*NODE, NSET=Nall
       1,6.000000000000e+00,-1.469310784152e-15,1.200220330003e+01
       2,6.000000000000e+00,-1.469310784152e-15,0.000000000000e+00
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*ELEMENT, TYPE=S8R, ELSET=Eall
   351,      1,      3,    350,    199,   7400,   7751,   7750,   7598
   352,      3,      4,    351,    350,   7401,   7753,   7752,   7751
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** Names based on load
*NSET,NSET=load
1,
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** Names based on fix
*NSET,NSET=fix
2,
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** Names based on Nfix
*NSET,NSET=Nfix
2,
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** Names based on Nload
*NSET,NSET=Nload
1,
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** Surfaces based on fix
*SURFACE, NAME=fix
** Surfaces based on load
*SURFACE, NAME=load
** Surfaces based on all
*SURFACE, NAME=all
351, SPOS
501, SPOS
7448, SPOS
7598, SPOS
352, SPOS
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7446, SPOS
** Surfaces based on Nfix
*SURFACE, NAME=Nfix
** Surfaces based on Nload
*SURFACE, NAME=Nload

*MATERIAL,NAME=steel
*ELASTIC
2.9000E+07,0.28
*PLASTIC,HARDENING=isotropic
36000,0.0
63000,0.00620689655172414


*DENSITY
7.3500E-04
*EXPANSION
7.2280E-06


*SHELL SECTION,ELSET=Eall,COMPOSITE
5.2083E-03,,steel
5.2083E-03,,steel
5.2083E-03,,steel
5.2083E-03,,steel
5.2083E-03,,steel
5.2083E-03,,steel
5.2083E-03,,steel
5.2083E-03,,steel
5.2083E-03,,steel
5.2083E-03,,steel
5.2083E-03,,steel
5.2083E-03,,steel

*BOUNDARY
fix,1,1,0
fix,2,2,0
fix,3,3,0

*BOUNDARY
load,1,1,0
load,2,2,0


*TIME POINTS,NAME=T1,GENERATE
0,1,2.0000E-02

*STEP,NLGEOM,INC=100000
*STATIC
0.01,1
*CLOAD
load,3,-1.4167E+03

  *NODE FILE ,TIME POINTS=T1
U,
  *EL FILE,TIME POINTS=T1
S,PEEQ,
*NODE PRINT,NSET=fix,TIME POINTS=T1
RF
*NODE PRINT,NSET=load,TIME POINTS=T1
RF
*END STEP
