** Units SI
*MATERIAL, NAME=COPPER
    *DENSITY
        8940.
    *CONDUCTIVITY
        399.
    *SPECIFIC HEAT
        382.
    *ELECTRICAL CONDUCTIVITY
        5.96E7
    *MAGNETIC PERMEABILITY
        1.255987E-6,2
