** E7018 Modified based on AISI 1018 Steel
** C, 0.05; Si, 0.53; Mn, 1.13;
** P, 0.011; S, 0.014
**
*MATERIAL, NAME=Steel_E7018
    *DENSITY
        ** (kg/mm3)
        7.87E-6, 25
    *CONDUCTIVITY, TYPE=ISO
        ** (J/s-mm-degC)
        0.0519, 25
        0.0488, 100
        0.0453, 200
        0.0423, 300
        0.0398, 400
        0.0378, 500
        0.0364, 600
        0.0354, 700
        0.0337, 710
        0.0291, 822
        0.0313, 1000
        0.0338, 1200
        0.0362, 1400
        0.0370, 1470
        0.520, 1520
        0.960, 1600
    *SPECIFIC HEAT
        ** (J/kg-degC)
        486, 25
        503.5, 100
        521, 200
        538.5, 300
        556, 400
        573.5, 500
        591, 600
        608.5, 620
        626, 720
        643.5, 740
        661, 760
        678.5, 820
        696, 840
        713.5, 1100
        731, 1400
        731, 1470
        731, 1480
        731, 1500
        731, 1520
        731, 1540
    *ELASTIC, TYPE=ISO
        ** (MPa)
        200.0E+3, 0.284, 25
        180.1E+3, 0.299, 300
        157.1E+3, 0.303, 600
        93730.5,  0.3,  700.0
        3900.5,  0.3,  800.0
        1400.0,  0.3, 1500.0
    *PLASTIC, HARDENING=KINEMATIC
        ** (MPa)
        ** Tensile Strength, Ultimate 78 KSI
        ** Tensile Strength, Yield 68 KSI
        ** Elongation at Break 30 %
        468.86, 0.0, 25
        537.81, 0.1, 25
        232.0, 0.0, 450
        278.4, 0.1, 450
        64.5, 0.0, 870
        70.0, 0.1, 870
        33.5, 0.0, 960
        35.2, 0.1, 960
        2.2, 0.0,  1500
        2.2, 0.1,  1500
    *EXPANSION, TYPE=ISO, ZERO=25
        11.5E-6, 25
        12.4E-6, 300
        13.4E-6, 600
        13.8E-6, 702.82
        13.0E-6, 709.71
        12.6E-6, 740
        9.9E-6, 822.19
        12.5E-6, 1000
        13.6E-6, 1100
        14.5E-6, 1200
        15.3E-6, 1300
        16.1E-6, 1400
        16.4E-6, 1470
        15.9E-6, 1520
        6.0E-7, 4000
