*HEADING
Model: beam coupling with *RIGID BODY and *EQUATION

*NODE, NSET=Nall
1,1.000000000000e+001,0.000000000000e+000,0.000000000000e+000
2,5.000000000000e+000,0.000000000000e+000,0.000000000000e+000
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*ELEMENT, TYPE=C3D8, ELSET=Eall
1, 1, 2, 3, 4, 5, 6, 7, 8
2, 4, 3, 9, 10, 8, 7, 11, 12
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
** Names based on support_01
*NSET,NSET=Nsupport_01
1,
2,
5,
6,
85,
86,
127,
129,
169,

** Names based on support_02
*NSET,NSET=Nsupport_02
270,
271,
272,
273,
314,
315,
356,
357,
378,

** Names based on surface_01
*NSET,NSET=Nsurface_01
81,
82,
83,
84,
125,
126,
167,
168,
189,

** Names based on surface_02
*NSET,NSET=Nsurface_02
190,
191,
194,
195,
274,
275,
316,
318,
358,

****TRANSLATION & ROTATION
***RIGID BODY,NSET=Nsurface_01,REF NODE=379,ROT NODE=380
***RIGID BODY,NSET=Nsurface_02,REF NODE=379,ROT NODE=380

****TRANSLATION
***RIGID BODY,NSET=Nsurface_01,REF NODE=379
***RIGID BODY,NSET=Nsurface_02,REF NODE=379

****ROTATION
*RIGID BODY,NSET=Nsurface_01,ROT NODE=380
*RIGID BODY,NSET=Nsurface_02,ROT NODE=380

*MATERIAL, Name=steel

*ELASTIC
210000, 0.3

*DENSITY
7.86E-9

*SOLID SECTION, Elset=Eall, Material=steel

*STEP

*STATIC

*BOUNDARY
Nsupport_01,1,3,0
Nsupport_02,1,3,0

*DLOAD,
Eall,GRAV,9810,1,0,0

*NODE FILE
U

*EL FILE
S,

*END STEP
