*Heading
RING BUCKLING ANALYSIS, CPS8, 4 X 20 MESH - modified from abaqus to ccx
*NODE
1, 99.5, 0, 0
2, 100.5, 0, 0
3, 0, 99.5, 0
4, 0, 100.5, 0
5, 99.75, 0, 0
6, 100, 0, 0
7, 100.25, 0, 0
8, 99.625, 0, 0
9, 99.875, 0, 0
10, 100.125, 0, 0
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******* E L E M E N T S *************
*ELEMENT, type=CPS8, ELSET=Surface1
342, 1, 5, 177, 136, 8, 294, 295, 176
343, 136, 177, 178, 135, 295, 296, 297, 175
344, 135, 178, 179, 134, 297, 298, 299, 174
345, 134, 179, 180, 133, 299, 300, 301, 173
346, 133, 180, 181, 132, 301, 302, 303, 172
347, 132, 181, 182, 131, 303, 304, 305, 171
348, 131, 182, 183, 130, 305, 306, 307, 170
349, 130, 183, 184, 129, 307, 308, 309, 169
350, 129, 184, 185, 128, 309, 310, 311, 168
351, 128, 185, 186, 127, 311, 312, 313, 167
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*ELSET,ELSET=quarter_ring
342, 343, 344, 345, 346, 347, 348, 349, 350, 351,
352, 353, 354, 355, 356, 357, 358, 359, 360, 361,
362, 363, 364, 365, 366, 367, 368, 369, 370, 371,
372, 373, 374, 375, 376, 377, 378, 379, 380, 381,
382, 383, 384, 385, 386, 387, 388, 389, 390, 391,
392, 393, 394, 395, 396, 397, 398, 399, 400, 401,
402, 403, 404, 405, 406, 407, 408, 409, 410, 411,
412, 413, 414, 415, 416, 417, 418, 419, 420, 421,
422, 423, 424, 425, 426, 427, 428, 429, 430, 431,
432, 433, 434, 435, 436, 437, 438, 439, 440, 441,
442, 443, 444, 445, 446, 447, 448, 449, 450, 451,
452, 453, 454, 455, 456, 457, 458, 459, 460, 461,
462, 463, 464, 465, 466, 467, 468, 469, 470, 471,
472, 473, 474, 475, 476, 477, 478, 479, 480, 481,
482, 483, 484, 485, 486, 487, 488, 489, 490, 491,
492, 493, 494, 495, 496, 497, 498, 499, 500, 501,
*NSET,NSET=SYM
6, 7, 5, 1, 2, 10, 9, 8, 11,
*NSET,NSET=VARY
3, 4, 97, 96, 95, 94, 91, 93, 92,
*NSET,NSET=quarter_ring
14, 13, 6, 15, 16, 7, 18, 17, 5, 12,
1, 3, 4, 2, 19, 23, 24, 20, 26, 27,
22, 28, 21, 25, 29, 30, 31, 73, 148, 89,
149, 141, 83, 80, 139, 142, 75, 87, 137, 78,
85, 145, 146, 72, 81, 69, 76, 82, 97, 79,
88, 84, 90, 71, 96, 95, 70, 74, 138, 77,
86, 94, 140, 143, 144, 147, 166, 300, 152, 158,
310, 172, 175, 294, 176, 311, 173, 314, 302, 315,
316, 317, 167, 160, 168, 174, 162, 164, 157, 171,
295, 159, 303, 155, 170, 298, 304, 151, 156, 165,
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** *ELSET,ELSET=LOAD
** 462,463,464,465,466,467,468,469,
** 470,471,472,473,474,475,476,477,478,479,
** 480,481,482,483,484,485,486,487,488,489,
** 490,491,492,493,494,495,496,497,498,499,
** 500,501
*ELSET,ELSET=LOAD,GENERATE
462,501,1
*MATERIAL ,NAME=A1
*ELASTIC
30.0E6,0.0
*SOLID SECTION,MATERIAL=A1,ELSET=quarter_ring
1.0,
** *TRANSFORM, NSET=VARY
** 1,1,0,-1,1,0.
*BOUNDARY
SYM,2
** VARY,2
VARY,1
*STEP
*BUCKLE
1,0.0001
** *BOUNDARY,LOAD CASE=2, OP=NEW
** SYM,2
** VARY,1
*DLOAD
LOAD,P2,1.0
*NODE FILE
U,RF
*EL FILE
S
*END STEP
