*HEADING
GEARS

*node, nset=Nall
    1, -3.000000e-01, -1.676718e-15, 0.000000e+00
    2, 3.000000e-01, 0.000000e+00, 0.000000e+00
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*nset, nset=hole_gear_1
    1, 265, 2, 133, 134, 266
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*nset, nset=hole_gear_2
    67, 68, 199, 200, 527, 528
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*nset, nset=contact_1
    6, 4, 307, 306, 308, 304
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*nset, nset=contact_2
    69, 70, 71, 72, 73, 74
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
**center of gear 1
*NODE, nset=center1
    200001, 0., 0., 0.
    200002, 0., 0., 0.
**center of gear 2
*NODE, nset=center2
    300001, -2.04, 0., 0.
    300002, -2.04, 0., 0.
*element, elset=ALL_e, type=C3D8
    13029, 4388, 4052, 4362, 5404, 12597, 11253, 12493, 16661,
    13030, 12597, 11253, 12493, 16661, 12598, 11254, 12494, 16662,
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
** Surfaces based on contact_1
*SURFACE, NAME=Scontact_1
    20574, S5
    18959, S4
    20379, S3
    20379, S4
    13219, S3
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    16527, S6

** Surfaces based on contact_2
*SURFACE, NAME=Scontact_2
    29974, S5
    28344, S4
    29769, S3
    29769, S4
    22609, S3
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    25927, S6


*MATERIAL,NAME=steel
    *ELASTIC
        210000,0.3
    *DENSITY
        7.4e-9
*SOLID SECTION, MATERIAL=steel, ELSET=ALL_e

*CONTACT PAIR,INTERACTION=SI1,TYPE=SURFACE TO SURFACE,ADJUST=0.001
    Scontact_2, Scontact_1
*SURFACE INTERACTION,NAME=SI1
*SURFACE BEHAVIOR,PRESSURE-OVERCLOSURE=Linear
    2100000000

*RIGID BODY,NSET=hole_gear_1,REF NODE=200001,ROT NODE=200002
*RIGID BODY,NSET=hole_gear_2,REF NODE=300001,ROT NODE=300002

**Lock translations and rotations of both gear
**Impose a rotation on gear 1
*BOUNDARY
    200001, 1, 5, 0.
    300001, 1, 5, 0.
    200001, 6, 6, 10

*STEP,NLGEOM,inc=100000
    *STATIC
        0.1, 10, 1e-4, 1.0
    *NODE FILE
        U
    *EL FILE
        S
    *CONTACT OUTPUT
        CSTR
*END STEP
