*NODE, NSET=Nall
    1,5.000000000000e+00,5.000000000000e+00,-8.326672684689e-16
    2,5.000000000000e+00,-5.000000000000e+00,-8.326672684689e-16
    3,-5.000000000000e+00,-5.000000000000e+00,-8.326672684689e-16
    4,-5.000000000000e+00,5.000000000000e+00,-8.326672684689e-16
    5,0.000000000000e+00,0.000000000000e+00,5.000000000000e+00
    6,2.500000000000e+00,2.500000000000e+00,7.000000000000e+00
    7,2.500000000000e+00,-2.500000000000e+00,7.000000000000e+00
    8,-2.500000000000e+00,-2.500000000000e+00,7.000000000000e+00
    9,-2.500000000000e+00,2.500000000000e+00,7.000000000000e+00
    10,0.000000000000e+00,2.500000000000e+00,5.000000000000e+00
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*ELEMENT, TYPE=B32, ELSET=Eall
    1,      1,     52,      5
    2,      2,     53,      5
    3,      3,     54,      5
    4,      4,     55,      5
    5,      1,     56,      6
    6,      2,     57,      7
    7,      3,     58,      8
    8,      4,     59,      9
    9,      5,     60,      6
    10,      5,     61,      7
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*NSET,NSET=Nbound
    1,
    2,
    3,
    4,
*Material, Name=Al
*Elastic
    70000,0.3
*BEAM SECTION, MATERIAL=Al,ELSET=Eall, OFFSET1=0.04, OFFSET2=0.04, SECTION=RECT
    0.04,0.04
    0,0,-1
*BOUNDARY
    Nbound,1,6
*STEP
*STATIC, DIRECT
    0.1, 1.0
*CLOAD
    46,	2,	-1000
    51,	2,	-1000
*NODE PRINT,NSET=Nall
    U
*EL PRINT,ELSET=Eall
    S
    E
*NODE FILE, output=3D
    u
    rf
*EL FILE
    S, E
*END STEP
