**%
**%
**%                    NX v8.0.0.25 TRANSLATOR
**%                    FOR ABAQUS VERSION 6.9-1
**%
**%             FEM FILE: C:\Arun\NX-model\NX-mesh\Final-Trial-model_fem2.fem
**%             SIM FILE: Unknown
**%        ANALYSIS TYPE: Structural
**%
**%    SOLVER INPUT FILE: a.inp
**%        CREATION DATE: 23-Mar-2015
**%        CREATION TIME: 16:22:59
**%             HOSTNAME: WKC001336649
**%
**%                UNITS: mm (milli-newton)
**%                      ... LENGTH : mm
**%                      ... TIME   : sec
**%                      ... MASS   : kilogram (kg)
**%                      ... TEMPERATURE : deg Celsius
**%                      ... FORCE  : milli-newton
**%                      ... THERMAL ENERGY : mN-mm (micro-joule)
**%
**% IMPORTANT NOTE:
**%     This banner was generated by NX and altering this information
**%     may compromise the NX post processing of results.
**%
**%
*HEADING
 Abaqus 6.9-1 deck file
**%
**%==========================
**%       MODEL DATA
**%==========================
**%
*NODE, NSET=allnode
         1, 1.163915E+02, 1.465559E+02, 0.000000E+00
         2, 1.164036E+02, 1.783559E+02, 0.000000E+00
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*ELEMENT, TYPE=C3D8, ELSET=BOLT
        51,        10,         9,         2,         1,        81,        80,        73,
        72
        52,        81,        80,        73,        72,       152,       151,       144,
       143
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*ELEMENT, TYPE=C3D8, ELSET=BOLT
       251,       287,       290,       289,       299,       358,       361,       360,
       370
       252,       358,       361,       360,       370,       373,       376,       375,
       385
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*ELEMENT, TYPE=C3D8, ELSET=FLANGE
      3007,      3732,      3980,      4001,      3731,      3458,      3866,      3991,
      3457
      3008,      3458,      3866,      3991,      3457,      3637,      3979,      4000,
      3636
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*ELEMENT, TYPE=C3D8, ELSET=BOLT
      3343,       403,       402,       407,       406,      4004,      4003,      4008,
      4007
      3344,      4004,      4003,      4008,      4007,      4019,      4018,      4023,
      4022
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*ELEMENT, TYPE=C3D8, ELSET=BASE
      3915,      4234,      4235,      4180,      4179,      4819,      4820,      4765,
      4764
      3916,      4819,      4820,      4765,      4764,      5404,      5405,      5350,
      5349
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*ELEMENT, TYPE=C3D6, ELSET=BOLT
        79,        13,         4,        14,        84,        75,        85
        80,        84,        75,        85,       155,       146,       156
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*ELEMENT, TYPE=C3D6, ELSET=BOLT
       279,       297,       288,       298,       368,       359,       369
       280,       368,       359,       369,       383,       374,       384
       281,       383,       374,       384,       398,       389,       399
       282,       398,       389,       399,       413,       404,       414
*ELEMENT, TYPE=C3D6, ELSET=FLANGE
      3331,      3850,      3851,      3852,      3525,      3484,      3483
      3332,      3525,      3484,      3483,      3704,      3663,      3662
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*ELEMENT, TYPE=C3D6, ELSET=BOLT
      3367,       413,       404,       414,      4014,      4005,      4015
      3368,      4014,      4005,      4015,      4029,      4020,      4030
      3369,      4029,      4020,      4030,      4044,      4035,      4045
      3370,      4044,      4035,      4045,      4574,      4050,      4575
*ELEMENT, TYPE=C3D6, ELSET=BASE
      4783,      4543,      4573,      4572,      5128,      4043,      4042
      4784,      5128,      4043,      4042,      5713,      4028,      4027
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**************************
*SOLID SECTION, ELSET=BOLT, MATERIAL=BOLT
*MATERIAL,NAME=BOLT
*ELASTIC,TYPE=ISOTROPIC
 2.07000E+05,  3.00000E-01
*SOLID SECTION, ELSET=FLANGE, MATERIAL=FLANGE
*MATERIAL,NAME=FLANGE
*ELASTIC,TYPE=ISOTROPIC
 2.07000E+05,  3.00000E-01
*SOLID SECTION, ELSET=BASE, MATERIAL=BASE
*MATERIAL,NAME=BASE
*ELASTIC,TYPE=ISOTROPIC
 2.07000E+05,  3.00000E-01
**************************
*Elset, elset=head_bottom_S2
  58,  94,  98, 102, 106, 110
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*Surface, type=ELEMENT, name=head_bottom
head_bottom_S2, S2
*Elset, elset=Flange_top_S1, generate
 3007,  3341,     2
*Surface, type=ELEMENT, name=Flange_top
Flange_top_S1, S1
*Elset, elset=Flange_Bottom_S2, generate
 3008,  3342,     2
*Surface, type=ELEMENT, name=Flange_Bottom
Flange_Bottom_S2, S2
*Elset, elset=Base_top_S2, generate
 3918,  6058,     4
*Surface, type=ELEMENT, name=Base_top
Base_top_S2, S2
*****************************
*****************************
*Contact Pair, interaction=INTER, small sliding, adjust=0.1
Flange_top, Head_bottom
*Contact Pair, interaction=INTER, small sliding, adjust=0.1
Base_top, Flange_bottom
************************************
*Surface Interaction, name=INTER
*FRICTION
0.1,1000.
*Surface Behavior, pressure-overclosure=LINEAR
1e+06, 1
*****************************
*******************************************
*Elset,elset=Pre_Tension
280,276,268,284,272,264,252,256,260
*******************************************
*Surface, type=ELEMENT, name=Pre_Tension
Pre_Tension, S1
*******************************************
*Node
      99999,           0.,           0.,           0.
*Pre-tension Section, surface= Pre_Tension, node=99999
  0,          0,           1
*******************************************
*Nset, nset=Ground
 4062, 4063, 4064, 4065, 4066, 4067
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*Boundary
Ground, 1, 1
Ground, 2, 2
Ground, 3, 3
*******************************************
*STEP,INC=10,NLGEOM
*Static
0.1, 1., 1e-05, 1.
*Cload
99999, 1, 80000
*ELEMENT OUTPUT
S,PEEQ
*CONTACT OUTPUT
CDIS,CSTR
*NODE FILE
U
*EL FILE
S,E
*CONTACT FILE
CDIS,CSTR,CELS
**
** === OUTPUT REQUESTS FOR .DAT *.MSG FILES ===
**
*CONTACT PRINT, FREQUENCY=10, TOTALS=YES
CSTRESS, CDISP,CELS
*PRINT, CONTACT=YES
*END STEP
