*HEADING
MODEL DYNAMICALLY GENERATED BOX_TEST_X1.inp
** THIS MESH WAS GENERATED ON Wednesday, January 9th, 2013 at 09:34:12 AM
********************************************************************************
********************************************************************************
*NODE, NSET=NA_PLATE
101, 0.0, -5.0, 10.0
102, 0.0, -4.16666666667, 10.0
103, 0.0, -3.33333333333, 10.0
104, 0.0, -2.5, 10.0
105, 0.0, -1.66666666667, 10.0
106, 0.0, -0.833333333333, 10.0
107, 0.0, 0.0, 10.0
108, 0.0, 0.833333333333, 10.0
109, 0.0, 1.66666666667, 10.0
110, 0.0, 2.5, 10.0
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*NODE, NSET=NB_PLATE
10101, 10.0, -5.0, 20.0
10102, 10.0, -4.16666666667, 20.0
10103, 10.0, -3.33333333333, 20.0
10104, 10.0, -2.5, 20.0
10105, 10.0, -1.66666666667, 20.0
10106, 10.0, -0.833333333333, 20.0
10107, 10.0, 0.0, 20.0
10108, 10.0, 0.833333333333, 20.0
10109, 10.0, 1.66666666667, 20.0
10110, 10.0, 2.5, 20.0
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*NODE, NSET=NC_PLATE
20201, 10.0, -5.0, 10.8333333333
20203, 10.0, -3.33333333333, 10.8333333333
20205, 10.0, -1.66666666667, 10.8333333333
20207, 10.0, 0.0, 10.8333333333
20209, 10.0, 1.66666666667, 10.8333333333
20211, 10.0, 3.33333333333, 10.8333333333
20213, 10.0, 5.0, 10.8333333333
20301, 10.0, -5.0, 11.6666666667
20302, 10.0, -4.16666666667, 11.6666666667
20303, 10.0, -3.33333333333, 11.6666666667
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*NODE, NSET=ND_PLATE
30201, 0.0, -5.0, 19.1666666667
30203, 0.0, -3.33333333333, 19.1666666667
30205, 0.0, -1.66666666667, 19.1666666667
30207, 0.0, 0.0, 19.1666666667
30209, 0.0, 1.66666666667, 19.1666666667
30211, 0.0, 3.33333333333, 19.1666666667
30213, 0.0, 5.0, 19.1666666667
30301, 0.0, -5.0, 18.3333333333
30302, 0.0, -4.16666666667, 18.3333333333
30303, 0.0, -3.33333333333, 18.3333333333
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*NODE, NSET=NE_PLATE
40203, 0.833333333333, 5.0, 11.6666666667
40205, 0.833333333333, 5.0, 13.3333333333
40207, 0.833333333333, 5.0, 15.0
40209, 0.833333333333, 5.0, 16.6666666667
40211, 0.833333333333, 5.0, 18.3333333333
40302, 1.66666666667, 5.0, 10.8333333333
40303, 1.66666666667, 5.0, 11.6666666667
40304, 1.66666666667, 5.0, 12.5
40305, 1.66666666667, 5.0, 13.3333333333
40306, 1.66666666667, 5.0, 14.1666666667
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*NODE, NSET=NF_PLATE
50203, 1.66666666667, -5.0, 10.8333333333
50205, 3.33333333333, -5.0, 10.8333333333
50207, 5.0, -5.0, 10.8333333333
50209, 6.66666666667, -5.0, 10.8333333333
50211, 8.33333333333, -5.0, 10.8333333333
50302, 0.833333333333, -5.0, 11.6666666667
50303, 1.66666666667, -5.0, 11.6666666667
50304, 2.5, -5.0, 11.6666666667
50305, 3.33333333333, -5.0, 11.6666666667
50306, 4.16666666667, -5.0, 11.6666666667
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*NSET, NSET=NALL
NA_PLATE, NB_PLATE, NC_PLATE, ND_PLATE, NE_PLATE, NF_PLATE
********************************************************************************
*ELEMENT, TYPE=S8R, ELSET=SEL_101
101, 101, 301, 303, 103, 201, 302, 203, 102
*ELEMENT, TYPE=S8R, ELSET=SEL_102
102, 103, 303, 305, 105, 203, 304, 205, 104
*ELEMENT, TYPE=S8R, ELSET=SEL_103
103, 105, 305, 307, 107, 205, 306, 207, 106
*ELEMENT, TYPE=S8R, ELSET=SEL_104
104, 107, 307, 309, 109, 207, 308, 209, 108
*ELEMENT, TYPE=S8R, ELSET=SEL_105
105, 109, 309, 311, 111, 209, 310, 211, 110
*ELEMENT, TYPE=S8R, ELSET=SEL_106
106, 111, 311, 313, 113, 211, 312, 213, 112
*ELEMENT, TYPE=S8R, ELSET=SEL_201
201, 301, 501, 503, 303, 401, 502, 403, 302
*ELEMENT, TYPE=S8R, ELSET=SEL_202
202, 303, 503, 505, 305, 403, 504, 405, 304
*ELEMENT, TYPE=S8R, ELSET=SEL_203
203, 305, 505, 507, 307, 405, 506, 407, 306
*ELEMENT, TYPE=S8R, ELSET=SEL_204
204, 307, 507, 509, 309, 407, 508, 409, 308
*ELEMENT, TYPE=S8R, ELSET=SEL_205
205, 309, 509, 511, 311, 409, 510, 411, 310
*ELEMENT, TYPE=S8R, ELSET=SEL_206
206, 311, 511, 513, 313, 411, 512, 413, 312
*ELEMENT, TYPE=S8R, ELSET=SEL_301
301, 501, 701, 703, 503, 601, 702, 603, 502
*ELEMENT, TYPE=S8R, ELSET=SEL_302
302, 503, 703, 705, 505, 603, 704, 605, 504
*ELEMENT, TYPE=S8R, ELSET=SEL_303
303, 505, 705, 707, 507, 605, 706, 607, 506
*ELEMENT, TYPE=S8R, ELSET=SEL_304
304, 507, 707, 709, 509, 607, 708, 609, 508
*ELEMENT, TYPE=S8R, ELSET=SEL_305
305, 509, 709, 711, 511, 609, 710, 611, 510
*ELEMENT, TYPE=S8R, ELSET=SEL_306
306, 511, 711, 713, 513, 611, 712, 613, 512
*ELEMENT, TYPE=S8R, ELSET=SEL_401
401, 701, 901, 903, 703, 801, 902, 803, 702
*ELEMENT, TYPE=S8R, ELSET=SEL_402
402, 703, 903, 905, 705, 803, 904, 805, 704
*ELEMENT, TYPE=S8R, ELSET=SEL_403
403, 705, 905, 907, 707, 805, 906, 807, 706
*ELEMENT, TYPE=S8R, ELSET=SEL_404
404, 707, 907, 909, 709, 807, 908, 809, 708
*ELEMENT, TYPE=S8R, ELSET=SEL_405
405, 709, 909, 911, 711, 809, 910, 811, 710
*ELEMENT, TYPE=S8R, ELSET=SEL_406
406, 711, 911, 913, 713, 811, 912, 813, 712
*ELEMENT, TYPE=S8R, ELSET=SEL_501
501, 901, 1101, 1103, 903, 1001, 1102, 1003, 902
*ELEMENT, TYPE=S8R, ELSET=SEL_502
502, 903, 1103, 1105, 905, 1003, 1104, 1005, 904
*ELEMENT, TYPE=S8R, ELSET=SEL_503
503, 905, 1105, 1107, 907, 1005, 1106, 1007, 906
*ELEMENT, TYPE=S8R, ELSET=SEL_504
504, 907, 1107, 1109, 909, 1007, 1108, 1009, 908
*ELEMENT, TYPE=S8R, ELSET=SEL_505
505, 909, 1109, 1111, 911, 1009, 1110, 1011, 910
*ELEMENT, TYPE=S8R, ELSET=SEL_506
506, 911, 1111, 1113, 913, 1011, 1112, 1013, 912
*ELEMENT, TYPE=S8R, ELSET=SEL_601
601, 1101, 1301, 1303, 1103, 1201, 1302, 1203, 1102
*ELEMENT, TYPE=S8R, ELSET=SEL_602
602, 1103, 1303, 1305, 1105, 1203, 1304, 1205, 1104
*ELEMENT, TYPE=S8R, ELSET=SEL_603
603, 1105, 1305, 1307, 1107, 1205, 1306, 1207, 1106
*ELEMENT, TYPE=S8R, ELSET=SEL_604
604, 1107, 1307, 1309, 1109, 1207, 1308, 1209, 1108
*ELEMENT, TYPE=S8R, ELSET=SEL_605
605, 1109, 1309, 1311, 1111, 1209, 1310, 1211, 1110
*ELEMENT, TYPE=S8R, ELSET=SEL_606
606, 1111, 1311, 1313, 1113, 1211, 1312, 1213, 1112
*ELEMENT, TYPE=S8R, ELSET=SEL_10101
10101, 10101, 10301, 10303, 10103, 10201, 10302, 10203, 10102
*ELEMENT, TYPE=S8R, ELSET=SEL_10102
10102, 10103, 10303, 10305, 10105, 10203, 10304, 10205, 10104
*ELEMENT, TYPE=S8R, ELSET=SEL_10103
10103, 10105, 10305, 10307, 10107, 10205, 10306, 10207, 10106
*ELEMENT, TYPE=S8R, ELSET=SEL_10104
10104, 10107, 10307, 10309, 10109, 10207, 10308, 10209, 10108
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*ELSET, ELSET=EALL
101, 102, 103, 104, 105, 106, 201, 202, 203, 204, 205, 206, 301, 302, 303, 304
305, 306, 401, 402, 403, 404, 405, 406, 501, 502, 503, 504, 505, 506, 601, 602
603, 604, 605, 606, 10101, 10102, 10103, 10104, 10105, 10106, 10201, 10202, 10203, 10204, 10205, 10206
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********************************************************************************
*MATERIAL, NAME=MAT
*DENSITY
0.000144
*ELASTIC, TYPE=ENGINEERING CONSTANTS
35000000.0, 35000000.0, 35000000.0, 0.3, 0.3, 0.3, 13461538.4615, 13461538.4615
13461538.4615
*SHELL SECTION, ELSET=EALL, MATERIAL=MAT
0.5
********************************************************************************
*BOUNDARY
101, 1
101, 2
101, 3
101, 4
101, 5
101, 6
********************************************************************************
***STEP, NLGEOM
*STEP
*STATIC
***CLOAD, OP=NEW
*CLOAD
10113, 1, 1000.0
***BOUNDARY, OP=NEW
**101, 1
**101, 2
**101, 3
**101, 4
**101, 5
**101, 6
********************************************************************************
*NODE PRINT, NSET=NALL
U, RF
***NODE FILE, OUTPUT=3D
*NODE FILE
U, RF
*EL PRINT, ELSET=EALL
S
***EL FILE, OUTPUT=3D
*EL FILE
S
*END STEP
********************************************************************************
********************************************************************************
***STEP, NLGEOM
*STEP
*STATIC
***CLOAD, OP=NEW
*CLOAD
10113, 2, 1000.0
***BOUNDARY, OP=NEW
**101, 1
**101, 2
**101, 3
**101, 4
**101, 5
**101, 6
********************************************************************************
*NODE PRINT, NSET=NALL
U, RF
***NODE FILE, OUTPUT=3D
*NODE FILE
U, RF
*EL PRINT, ELSET=EALL
S
***EL FILE, OUTPUT=3D
*EL FILE
S
*END STEP
********************************************************************************
********************************************************************************
***STEP, NLGEOM
*STEP
*STATIC
***CLOAD, OP=NEW
*CLOAD
10113, 3, 1000.0
***BOUNDARY, OP=NEW
**101, 1
**101, 2
**101, 3
**101, 4
**101, 5
**101, 6
********************************************************************************
*NODE PRINT, NSET=NALL
U, RF
***NODE FILE, OUTPUT=3D
*NODE FILE
U, RF
*EL PRINT, ELSET=EALL
S
***EL FILE, OUTPUT=3D
*EL FILE
S
*END STEP
********************************************************************************
