*HEADING
*Node
      1,   11.3498096,           0.,  -3.89639306
      2,   9.46968365,           0.,  -7.37055111
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*Element, type=C3D8
339,  164,  163,   33,   34,  572,  571,  441,  442
340,  572,  571,  441,  442,  960,  959,  829,  830
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*Element, type=C3D6
584,  264,   17,   16,  672,  425,  424
585,  672,  425,  424, 1060,  813,  812
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*Elset, elset=BASE
  339,  340,  341,  342,  343,  344
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*Elset, elset=BOLT
 1954, 1955, 1956, 1957, 1958, 1959
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*Elset, elset=FLANGE, generate
 4734,  4857,     1
*Elset, elset=WASHER, generate
 3654,  3693,     1
*Solid Section, elset=BASE, material=BASE_STEEL
,
*Solid Section, elset=BOLT, material=BOLT_STEEL
,
*Solid Section, elset=WASHER, material=WASHER_STEEL
,
*MATERIAL,NAME=BASE_STEEL
*ELASTIC,TYPE=ISOTROPIC
 2.07000E+05,  3.00000E-01
******************************************************************************
*MATERIAL,NAME=BOLT_STEEL
*ELASTIC,TYPE=ISOTROPIC
 2.07000E+05,  3.00000E-01
******************************************************************************
*MATERIAL,NAME=WASHER_STEEL
*ELASTIC,TYPE=ISOTROPIC
 2.07000E+05,  3.00000E-01
 ******************************************************************************
*SOLID SECTION, ELSET=FLANGE, MATERIAL=FLANGE_STEEL
*MATERIAL,NAME=FLANGE_STEEL
*ELASTIC,TYPE=ISOTROPIC
 2.07000E+05,  3.00000E-01
 ******************************************************************************
 *Elset, elset=Bolt_Master_S1, generate
 3558,  3651,     3
*Surface, type=ELEMENT, name=Bolt_Master
Bolt_Master_S1, S1
*Elset, elset=Washer_top_slave_S1, generate
 3654,  3693,     1
*Surface, type=ELEMENT, name=Washer_top_slave
Washer_top_slave_S1, S1
*Elset, elset=Washer_bottom_master_S2, generate
 3654,  3693,     1
*Surface, type=ELEMENT, name=Washer_bottom_master
Washer_bottom_master_S2, S2
*Elset, elset=Flange_top_slave_S1, generate
 4734,  4856,     2
*Surface, type=ELEMENT, name=Flange_top_slave
Flange_top_slave_S1, S1
*Elset, elset=Flange_bottom_Master_S2, generate
 4735,  4857,     2
*Surface, type=ELEMENT, name=Flange_bottom_Master
Flange_bottom_Master_S2, S2
*Elset, elset=Base_slave_S2, generate
 2030,  2648,     2
*Surface, type=ELEMENT, name=Base_slave
Base_slave_S2, S2
******************************************************************************
*CONTACT PAIR,INTERACTION=INTER,SMALL SLIDING,TYPE=NODE TO SURFACE
Washer_top_slave, Bolt_Master
*CONTACT PAIR,INTERACTION=INTER,SMALL SLIDING,TYPE=NODE TO SURFACE
Flange_top_slave, Washer_bottom_master
*CONTACT PAIR,INTERACTION=INTER,SMALL SLIDING,TYPE=NODE TO SURFACE
Base_slave, Flange_bottom_Master
********************************
*SURFACE INTERACTION, NAME=INTER
1,
*SURFACE BEHAVIOR,PRESSURE-OVERCLOSURE=LINEAR
1e6,1
***SURFACE BEHAVIOR,PRESSURE-OVERCLOSURE=TIED
**100000,1
*FRICTION
0.1,1000
*Nset, nset=Ground
  33,  34,  35,  36,  37,  40
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 ******************************************************************************
*Boundary
Ground, 1, 1
Ground, 2, 2
Ground, 3, 3
******************************************************************************
*Elset,elset=Pre_Tension
3314,3320,3302,3318,3312,3300,3324,3326,3316,3306,3322,3328,3310,3308,3304
*******************************************
*Surface, type=ELEMENT, name=Pre_Tension
Pre_Tension, S1
*******************************************
*Node
      6329,           0.,           0.,           0.
*Pre-tension Section, surface= Pre_Tension, node=6329
  0,          -1,           0
******************************************************************************
*STEP,INC=1000,NLGEOM
*Static
0.1, 1., 1e-05, 1.
*Cload
6329, 1, 80000
*CONTACT FILE
CDIS,CSTR,CELS
*****************************************
*CONTACT PRINT, FREQUENCY=1000, TOTALS=YES
CSTRESS, CDISP,CELS
*PRINT, CONTACT=YES
********
*END STEP
******************************************************************************
