*node, nset=ntub
1, 0.0, 0.0, 0.0
2, 0.502393162395, 0.0, 0.0
3, 1.00478632479, 0.0, 0.0
4, 1.50717948718, 0.0, 0.0
5, 2.00957264958, 0.0, 0.0
6, 2.51196581198, 0.0, 0.0
7, 3.01435897437, 0.0, 0.0
8, 3.51675213676, 0.0, 0.0
9, 4.01914529916, 0.0, 0.0
10, 4.52153846156, 0.0, 0.0
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*node, nset=ngun
235, 117.56, 0.0, 0.0
236, 118.06390625, 0.0, 0.0
237, 118.5678125, 0.0, 0.0
238, 119.07171875, 0.0, 0.0
239, 119.575625, 0.0, 0.0
240, 120.07953125, 0.0, 0.0
241, 120.5834375, 0.0, 0.0
242, 121.08734375, 0.0, 0.0
243, 121.59125, 0.0, 0.0
244, 122.09515625, 0.0, 0.0
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*element, type=b32, elset=etub
1, 1, 2, 3
2, 3, 4, 5
3, 5, 6, 7
4, 7, 8, 9
5, 9, 10, 11
6, 11, 12, 13
7, 13, 14, 15
8, 15, 16, 17
9, 17, 18, 19
10, 19, 20, 21
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*element, type=b32, elset=egun
118, 235, 236, 237
119, 237, 238, 239
120, 239, 240, 241
121, 241, 242, 243
122, 243, 244, 245
123, 245, 246, 247
124, 247, 248, 249
125, 249, 250, 251
126, 251, 252, 253
127, 253, 254, 255
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*beam section, section=rect, elset=etub, material=steel
0.0484486325916, 0.0484486325916
 0.0, 1.0, 0.0
*beam section, section=rect, elset=egun, material=steel
0.0919738006173, 0.0919738006173
 0.0, 1.0, 0.0
*material, name=steel
*elastic, type=iso
210.e9, 0.3
*DENSITY
 7850.
*boundary
 ntub, 2,6
*boundary
 ngun, 2,6
*boundary
 1, 1,6
*step
*FREQUENCY,SOLVER=ARPACK,STORAGE=YES
 2
*NODE FILE
 U
*end step
