*Heading
** Langle with tool use Case created by E.Kappel
** PART DATA
*Node
      1, -0.0339411013,           0., 0.0161421001
      2, -0.0341178998,           0., 0.0163189005
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*Element, type=C3D20
   1,     1,    15,   738,   740,     3,    17,   745,   743,    10,   739,   742,   741,    11,   746,   747,
        744,     2,    16,   749,   748
   2,     3,    17,   745,   743,     5,    19,   752,   750,    11,   746,   747,   744,    12,   753,   754,
        751,     4,    18,   756,   755
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*Nset, nset=ALL-NODES-PART, generate
     1,  10757,      1
*Elset, elset=ALL-ELEMENTS-PART, generate
    1,  2080,
*Elset, elset=CORNER_ELEMENTS_PART
   89,   90,   91,   92,   93,   94
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**------------------------------
**------------------------------
**------------------------------
** Tool DATA
**------------------------------
**------------------------------
**------------------------------
**
*Node
20001,	-0.050083298,	0,	0
20002,	-0.050083298,	0,	0.00125
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*Element, type=C3D20
2801,20001,20015,21198,21200,20003,20017,21205,21203,20010,21199,21202,21201,
20011,21206,21207,21204,20002,20016,21209,21208
2802,20003,20017,21205,21203,20005,20019,21212,21210,20011,21206,21207,21204,
20012,21213,21214,21211,20004,20018,21216,21215
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**------------------------------------------------
*Nset, nset=ALL-NODES-TOOL, generate
    20001,  40577,      1
*Elset, elset=ALL-ELEMENTS-TOOL, generate
    2801,  7144,     1
**-----------------------------------------------
*Nset, nset=Y-SYMM-PART, generate
   1,  737,    1
*Nset, nset=Y-SYMM, generate
    20001,  21197,     1
*Nset, nset=X-SYMM-PART, generate
   365,	373, 1
*Nset, nset=X-SYMM
20556,	20558,	20560,	20562,	20564,	20975
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*Nset, nset=Z-SYMM-PART, generate
365,365,1
*Nset, nset=Z-SYMM
20001,	20010,	20015,	20024,	20029,	20038
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**-----------------------------------------------
**
*Elset, elset=FLANGE1_LAYER1-1
    1,    5,    9,   13,   17,   21
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*Elset, elset=FLANGE1_LAYER2-1
    2,    6,   10,   14,   18,   22
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*Elset, elset=FLANGE1_LAYER3-1
    3,    7,   11,   15,   19,   23
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*Elset, elset=FLANGE1_LAYER4-1
    4,    8,   12,   16,   20,   24
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*Elset, elset=FLANGE1
FLANGE1_LAYER1-1,FLANGE1_LAYER2-1,FLANGE1_LAYER3-1,FLANGE1_LAYER4-1
**-----------------------------------------------
*Elset, elset=FLANGE2_LAYER1-1
  121,  125,  129,  133,  137,  141
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*Elset, elset=FLANGE2_LAYER2-1
  122,  126,  130,  134,  138,  142
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*Elset, elset=FLANGE2_LAYER3-1
  123,  127,  131,  135,  139,  143
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*Elset, elset=FLANGE2_LAYER4-1
  124,  128,  132,  136,  140,  144
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*Elset, elset=FLANGE2
FLANGE2_LAYER1-1,FLANGE2_LAYER2-1,FLANGE2_LAYER3-1,FLANGE2_LAYER4-1
**-----------------------------------------------
*Elset, elset=FLANGE1_LAYER1-1
    1,    5,    9,   13,   17,   21
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**-----------------------------------------------
*Elset, elset=FLANGE2_LAYER1-1
  121,  125,  129,  133,  137,  141
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*Elset, elset=CORNER_LAYER1
89,	93,	97,	101,	105,	109
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*Elset, elset=PARTINTERFACE
FLANGE1_LAYER1-1, FLANGE2_LAYER1-1, CORNER_LAYER1
**
**-------- INTERACTIONS
**----------------------------------
*Elset, elset=Surf-7_S1
2358,2363,2368,2373,2374,2375
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*Elset, elset=Surf-7_S2
2303,2308,2313,2318,2323,2328
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*Surface, type=ELEMENT, name=TOOL_OUTER
Surf-7_S1, S1
Surf-7_S2, S2
**-------------------
*Elset, elset=PART_INNER_S1, generate
    1,  2077,     4
*Surface, type=ELEMENT, name=PART_INNER
PART_INNER_S1, S1
**-----------------------------------------------
** INTERACTIONS
**
** Interaction: PART_TOOL
*Contact Pair, interaction=SI1, type=SURFACE TO SURFACE,ADJUST=0.0002
PART_INNER, TOOL_OUTER
**----------------------------------------------------------------
*SURFACE INTERACTION,NAME=SI1
*SURFACE BEHAVIOR, PRESSURE-OVERCLOSURE=LINEAR
1.E7,3.
**-----------------------------------------------
**FRICTION
**0.15, 1000
**-----------------------------------------------
**
*Amplitude, name=PRESSURE_CYCLE
          0.,           0.,        1800.,      700000.,        4500.,      700000.,        8100.,      700000.
      10200.,      700000.,       17400.,      700000.,     20142.86,      700000.,     21942.86,      700000.
    23742.86,           0.
*Amplitude, name=TEMPERATURE_CYCLE
          0.,          20.,        1800.,          20.,        4500.,         110.,        8100.,         110.
      10200.,         180.,       17400.,         180.,     20142.86,          20.,     21942.86,          20.
    23742.86,          20.
**
** MATERIALS
**
**
*******************************************
*Material, name=SoftMaterial
*Density
 2710,
*Expansion, type=ORTHO
0.,         0., 7.5467e-05
*Elastic
 6.900E+6, 0.327
*******************************************
*******************************************
*Material, name=SoftMaterialCSYS
*Density
 2710,
*Expansion, type=ORTHO
7.5467e-05,	0.,         0.
*Elastic
 6.900E+6, 0.327
*******************************************
*Material, name=TOOLING-Aluminum
*Density
 2710,
*Expansion
 2.360E-05,
*Elastic
 6.900E+10, 0.327
*******************************************
*******************************************
** BOUNDARY CONDITIONS
**
*Boundary
X-SYMM, 1, 1
*Boundary
Y-SYMM, 2, 2
*Boundary
Z-SYMM, 3, 3
*Boundary
X-SYMM-PART, 1, 1
*Boundary
Y-SYMM-PART, 2, 2
*Boundary
Z-SYMM-PART, 3, 3
*******************************************
**
**
*Orientation, name=Ori-1
          1.,           0.,           1.,           0.,           1.,           0.
*Orientation, name=Ori-2
          1.,           0.,           -1.,           0.,           1.,           0.
*Orientation, name=Ori-CSYS, system=CYLINDRICAL
		 0.0,  0.0,  0.044426, 0.0,  1.0,  0.0444260
*Solid Section, elset=ALL-ELEMENTS-TOOL, orientation=Ori-1, material=TOOLING-Aluminum
**
*Solid Section, elset=FLANGE1, orientation=Ori-1, material=SoftMaterial
*Solid Section, elset=FLANGE2, orientation=Ori-2, material=SoftMaterial
*Solid Section, elset=CORNER_ELEMENTS_PART, orientation=Ori-CSYS, material=SoftMaterialCSYS
**
**
*******************************************
** PREDEFINED FIELDS
**
** Name: Initial-Temperature   Type: Temperature
*Initial Conditions, type=TEMPERATURE
ALL-NODES-TOOL, 160.0
ALL-NODES-PART, 160.0
**
**
*******************************************
** STEP: Step-1
**
*STEP
*STATIC,DIRECT
0.01,1.
**50., 23742.9, 1., 500.,
**0.01, 1., 1e-05, 0.1
**
*TEMPERATURE
ALL-NODES-TOOL, 0.0
ALL-NODES-PART, 0.0
**
**
**------------------------------------
** OUTPUT REQUESTS
**
**------------------------------------
*NODE OUTPUT,FREQUENCY=1
U,NT
*NODE PRINT,NSET=ALL-NODES-TOOL
U,NT
*NODE PRINT,NSET=ALL-NODES-PART
U,NT
*NODE FILE, FREQUENCY=1
U
*EL FILE
S, E
*END STEP
**------------------------------------
**------------------------------------
