*HEADING
Model: Single Linear Element      Date: 18 Oct 2011
*NODE
1,  0.0,  	 0.0,  	      0.0
2,  0.66267647, -0.69181819, -0.28678822
3,  0.792086  , -0.20885528, -1.15281362
4,  0.12940952,  0.48296291, -0.8660254
5,  0.7376402 ,  0.53678153,  0.40957602
6,  1.40031668, -0.15503666,  0.1227878
7,  1.5297262 ,  0.32792626, -0.7432376
8,  0.86704972,  1.01974445, -0.45644938
9,  0.33133824, -0.3459091 , -0.14339411
10, 0.72738124, -0.45033673, -0.71980092
11, 0.46074776,  0.13705382, -1.00941951
12, 0.06470476,  0.24148146, -0.4330127
13, 1.06897844,  0.19087244,  0.26618191
14, 1.46502144,  0.0864448 , -0.3102249
15, 1.19838796,  0.67383535, -0.59984349
16, 0.80234496,  0.77826299, -0.02343668
17, 0.3688201 ,  0.26839077,  0.20478801
18, 1.03149657, -0.42342742, -0.08200021
19, 1.1609061 ,  0.05953549, -0.94802561
20, 0.49822962,  0.75135368, -0.66123739
21, 1.32535295, -1.38363638, -0.57357644
22, 1.45476247, -0.90067347, -1.43960184
23, 2.06299315, -0.84685485, -0.16400041
24, 2.19240267, -0.36389193, -1.03002582
25, 0.99401471, -1.03772729, -0.43018233
26, 1.39005771, -1.14215492, -1.00658914
27, 1.12342423, -0.55476437, -1.29620773
28, 1.73165491, -0.50094575, -0.02060631
29, 2.12769791, -0.60537339, -0.59701312
30, 1.86106443, -0.01798284, -0.88663171
31, 1.69417305, -1.11524561, -0.36878843
32, 1.82358257, -0.6322827 , -1.23481383
*ELEMENT, TYPE=C3D20, ELSET=Eall
1, 	1, 	2, 	3, 	4,	5, 	6, 	7, 	8,
	9,	10,	11,	12,	13,	14,	15,	16,
	17,	18,	19,	20
2,	2,	21,	22,	3,	6,	23,	24,	7,
	25,	26,	27,	10,	28,	29,	30,	14,
	18,	31,	32,	19
*NSET, NSET=PresDispl1
2, 3, 6, 7, 10, 14, 18, 19
*NSET, NSET=PresDispl2
21, 22, 23, 24, 26, 29, 31, 32
*NSET, NSET=XDOF
1, 4, 5, 8, 12, 16, 17, 20
*NSET, NSET=YDOF
4
*NSET, NSET=ZDOF
1, 4, 12
*NSET, NSET=Nall, GENERATE
1, 32
*NSET, NSET=N1
1, 	2, 	3, 	4,	5, 	6, 	7, 	8,
9,	10,	11,	12,	13,	14,	15,	16,
17,	18,	19,	20
*NSET, NSET=N2
2,	21,	22,	3,	6,	23,	24,	7,
25,	26,	27,	10,	28,	29,	30,	14,
18,	31,	32,	19
*ELSET, ELSET=E1
1
*ELSET, ELSET=E2
2
*TRANSFORM, NSET=N1
0.66267647, -0.69181819, -0.28678822, 0.12940952,  0.48296291, -0.8660254
*TRANSFORM, NSET=N2
1.32535295, -1.38363638, -0.57357644, 0.792086  , -0.20885528, -1.15281362
*BOUNDARY
XDOF, 1, 1
*BOUNDARY
YDOF, 2, 2
*BOUNDARY
ZDOF, 3, 3
*MATERIAL, NAME=ELASTIC_FIBER
*USER MATERIAL, CONSTANTS=10
1.92505, 0.026, 1.0, 0.0, 1.0, 100.0,
0.0, 1.0, 1.0, 100.0
*ORIENTATION, NAME=Local1
0.66267647, -0.69181819, -0.28678822, 0.12940952,  0.48296291, -0.8660254
*SOLID SECTION, ELSET=E1, MATERIAL=ELASTIC_FIBER, ORIENTATION=Local1
*ORIENTATION, NAME=Local2
1.32535295, -1.38363638, -0.57357644, 0.792086  , -0.20885528, -1.15281362
*SOLID SECTION, ELSET=E2, MATERIAL=ELASTIC_FIBER, ORIENTATION=Local2
*STEP, NLGEOM
*STATIC, DIRECT
0.01, 1., 0.01, 0.01
*BOUNDARY
PresDispl2, 1, 1, 0.2
*NODE PRINT, NSET=Nall, GLOBAL=YES
U, RF
*EL PRINT, ELSET=Eall, GLOBAL=YES
S, E
*NODE FILE, GLOBAL=YES
U, RF
*EL FILE, GLOBAL=YES
S, E
*END STEP
