*NODE, NSET=Nall
1, -15.0, 230.0, -10.0
3, -15.0, 240.0, -10.0
5, -15.0, 250.0, -10.0
7, -5.0, 230.0, -10.0
9, -5.0, 240.0, -10.0
11, -5.0, 250.0, -10.0
13, 5.0, 230.0, -10.0
15, 5.0, 240.0, -10.0
17, 5.0, 250.0, -10.0
14, 5.0, 230.0, 0.0
16, 5.0, 240.0, 0.0
18, 5.0, 250.0, 0.0
8, -5.0, 230.0, 0.0
10, -5.0, 240.0, 0.0
12, -5.0, 250.0, 0.0
2, -15.0, 230.0, 0.0
4, -15.0, 240.0, 0.0
6, -15.0, 250.0, 0.0
*ELEMENT, TYPE=B31R, ELSET=BARS
1, 1,  3
2, 1,  7
3, 1,  2
4, 3,  1
5, 3,  5
6, 3,  7
7, 3,  9
8, 3,  11
9, 3,  13
10, 3,  15
11, 3,  17
12, 3,  16
13, 3,  8
14, 3,  10
15, 3,  12
16, 3,  2
17, 3,  4
18, 3,  6
19, 5,  1
20, 5,  3
21, 5,  7
22, 5,  9
23, 5,  11
24, 5,  15
25, 5,  17
26, 5,  16
27, 5,  18
28, 5,  8
29, 5,  10
30, 5,  12
31, 5,  2
32, 5,  4
33, 5,  6
34, 7,  1
35, 7,  9
36, 7,  13
37, 7,  8
38, 9,  1
39, 9,  3
40, 9,  5
41, 9,  7
42, 9,  11
43, 9,  13
44, 9,  15
45, 9,  17
46, 9,  14
47, 9,  16
48, 9,  18
49, 9,  8
50, 9,  10
51, 9,  12
52, 9,  2
53, 9,  4
54, 9,  6
55, 11,  1
56, 11,  3
57, 11,  5
58, 11,  7
59, 11,  9
60, 11,  13
61, 11,  15
62, 11,  17
63, 11,  14
64, 11,  16
65, 11,  18
66, 11,  8
67, 11,  10
68, 11,  12
69, 11,  2
70, 11,  4
71, 11,  6
72, 13,  7
73, 13,  15
74, 13,  14
75, 15,  1
76, 15,  3
77, 15,  5
78, 15,  7
79, 15,  9
80, 15,  11
81, 15,  13
82, 15,  17
83, 15,  14
84, 15,  16
85, 15,  18
86, 15,  8
87, 15,  10
88, 15,  12
89, 15,  4
90, 17,  3
91, 17,  5
92, 17,  7
93, 17,  9
94, 17,  11
95, 17,  13
96, 17,  15
97, 17,  14
98, 17,  16
99, 17,  18
100, 17,  8
101, 17,  10
102, 17,  12
103, 17,  4
104, 17,  6
105, 14,  13
106, 14,  16
107, 14,  8
108, 16,  3
109, 16,  7
110, 16,  9
111, 16,  11
112, 16,  13
113, 16,  15
114, 16,  17
115, 16,  14
116, 16,  18
117, 16,  8
118, 16,  10
119, 16,  12
120, 16,  2
121, 16,  4
122, 16,  6
123, 18,  3
124, 18,  5
125, 18,  7
126, 18,  9
127, 18,  11
128, 18,  13
129, 18,  15
130, 18,  17
131, 18,  14
132, 18,  16
133, 18,  8
134, 18,  10
135, 18,  12
136, 18,  4
137, 18,  6
138, 8,  7
139, 8,  14
140, 8,  10
141, 8,  2
142, 10,  1
143, 10,  3
144, 10,  5
145, 10,  7
146, 10,  9
147, 10,  11
148, 10,  13
149, 10,  15
150, 10,  17
151, 10,  14
152, 10,  16
153, 10,  18
154, 10,  8
155, 10,  12
156, 10,  2
157, 10,  4
158, 10,  6
159, 12,  1
160, 12,  3
161, 12,  5
162, 12,  7
163, 12,  9
164, 12,  11
165, 12,  13
166, 12,  15
167, 12,  17
168, 12,  14
169, 12,  16
170, 12,  18
171, 12,  8
172, 12,  10
173, 12,  2
174, 12,  4
175, 12,  6
176, 2,  1
177, 2,  8
178, 2,  4
179, 4,  1
180, 4,  3
181, 4,  5
182, 4,  7
183, 4,  9
184, 4,  11
185, 4,  15
186, 4,  14
187, 4,  16
188, 4,  18
189, 4,  8
190, 4,  10
191, 4,  12
192, 4,  2
193, 4,  6
194, 6,  1
195, 6,  3
196, 6,  5
197, 6,  7
198, 6,  9
199, 6,  11
200, 6,  15
201, 6,  17
202, 6,  16
203, 6,  18
204, 6,  8
205, 6,  10
206, 6,  12
207, 6,  2
208, 6,  4
*MATERIAL,NAME=Steel
*ELASTIC
4176000,.3
*BEAM SECTION,ELSET=BARS,MATERIAL=Steel,SECTION=RECT
0.5, 0.2
-0.15433221,-0.832050294337844,0.554700196225229
*BOUNDARY
5, 1, 3
11, 1, 3
17, 1, 3
18, 1, 3
12, 1, 3
6, 1, 3
*STEP
*STATIC
*CLOAD
1,2,1.0
*NODE PRINT,NSET=Nall
U
*EL PRINT,ELSET=BARS
S, E
*NODE FILE, output=3D
U, RF
*EL FILE
S, E
*END STEP
