*HEADING
Model: solid_initial_condition_tube

*NODE, NSET=Nall
       1,-1.000000000000e+002,1.732050807569e+002,0.000000000000e+000
       2,-7.092097740851e+001,1.870032485371e+002,0.000000000000e+000
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*ELEMENT, TYPE=C3D8, ELSET=Eall
     1,     1,     2,     3,     4,     5,     6,     7,     8
     2,     4,     3,     9,    10,     8,     7,    11,    12
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** Names based on nout
*NSET,NSET=Nnout
1,
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
** Names based on nmid
*NSET,NSET=Nnmid
17,
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** Names based on nins
*NSET,NSET=Nnins
33,
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** Names based on sbound_01
*NSET,NSET=Nsbound_01
1,
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** Names based on sbound_02
*NSET,NSET=Nsbound_02
13,
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
*TRANSFORM,TYPE=C,NSET=Nall
0,0,0,0,0,1

*ORIENTATION,NAME=OR1,SYSTEM=CYLINDRICAL
0.,0.,0.,0.,0.,1.0

*MATERIAL, Name=steel-el

*ELASTIC
210000,0.3

*DENSITY
7.85E-9

*EXPANSION,ZERO=0
12.E-6,0

*SOLID SECTION, Elset=Eall, Material=steel-el

*STEP

*STATIC

*BOUNDARY
Nall,2,3,0

*INITIAL CONDITIONS,TYPE=TEMPERATURE
Nall,0

*TEMPERATURE
Nnout, 500
Nnins, 500

*NODE FILE,GLOBAL=NO
U

*EL FILE
S

*END STEP
