*Heading
** Job name: PKVC2_48_291_107 Model name: PKVC2_48_291_107
** Generated by: Abaqus/CAE 6.12-3
*Node
      1, 0.00222234498, 5.23600008e-08, 2.21648006e-05
      2, 0.00223075505, 4.99020007e-06, 5.74250016e-08
      3, 0.0021759849, 8.67364975e-07, 3.57479512e-05
** removed nodes in between
3943105, 0.00107439398, 0.000230337406, 0.00109535805
3943106, 0.00224110903, 7.67516394e-05, 0.000859648397
3943107, 0.000582710898, 0.00128663599, 0.00107227894
*Element, type=C3D10
      1, 261124, 483734,  33959, 561164,2367936, 943686, 943685,2367938,3442130, 943689
      2, 472508, 532978,  32973, 566391,3312829, 934285, 934284,3312831,3751314, 934287
      3, 473998, 517717, 468161, 566516,3332384,3245828,3245823,3332388,3682840,3245831
** removed elements in between
2241773,  28573, 222793, 129930, 579780, 892010,1729057, 892007, 892018,2185685,1729060
2241774, 137603, 529807, 270822, 541518,1767514,2414028,1767512,1767515,3738750,2414029
2241775, 445665, 535190, 497624, 598002,3168872,3559828,3168871,3168875,3759504,3559834
*Elset, elset=DOM-1, generate
      1, 2241775,       1
*Nset, nset=XM
    575,    713,    872,    923,    938,   1017
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*Nset, nset=XM-RGDBDYFIXNODE
 575,
*Nset, nset=YM
      1,      3,      5,      8,     10,     11
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*Nset, nset=YM-RGDBDYFIXNODE
 1,
*Nset, nset=ZM
      2,      4,      9,     10,     12,     13
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*Nset, nset=ZM-RGDBDYFIXNODE
 2,
*Nset, nset=XP
    196,    538,    552,    776,   1665,   1669
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*Nset, nset=YP
    583,    655,    744,    745,   1330,   1340
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*Nset, nset=ZP
    775,   1061,   1113,   1132,   1135,   1154
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*Elset, elset=CONBNDRY1--XM-XP-YM-YP-ZM-ZP, generate
      1, 2241775,       1
** Section: Section-1-DOM-1
*Solid Section, elset=DOM-1, material=NANOGOLD
,
**
** MATERIALS
**
*Material, name=NANOGOLD
*Elastic
79000., 0.42
*Plastic
750.,  0.
800.,100.
**
** BOUNDARY CONDITIONS
**
** Name: Disp-BC-1 Type: Displacement/Rotation
*Boundary
YM-RGDBDYFIXNODE, 1, 1
YM-RGDBDYFIXNODE, 2, 2
YM-RGDBDYFIXNODE, 3, 3
** Name: Disp-BC-2 Type: Displacement/Rotation
*Boundary
YM, 2, 2
** ----------------------------------------------------------------
**
** STEP: Step-1
**
*Step, nlgeom=YES, inc=100000
*Static, solver=iterative cholesky
7.5e-05, 1., 1e-06, 0.005
**
** BOUNDARY CONDITIONS
**
** Name: Disp-BC-3 Type: Displacement/Rotation
*Boundary
YP, 2, 2, -0.000156993
**
** OUTPUT REQUESTS
**
*Restart, write, frequency=0
**
** FIELD OUTPUT: F-Output-1
**
*Output,frequency=5
*El file
PEEQ, S
**
** FIELD OUTPUT: F-Output-2
**
*Node file
U,
**
** HISTORY OUTPUT: H-Output-1
**
*Output,frequency=1
*Node print, nset=YP, totals=only
RF
*End Step
