*Heading
**
**Push Block - units IPS | Domax Material | Contact & Rigid Body
**
*node, nset=nall
 1,9.316438060000e+00,-1.900389900000e+01,1.156249656000e+01
 2,1.131445571750e+01,-1.900389900000e+01,1.156249656000e+01
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*I, type=s4, elset=eall
1, 1, 2, 3, 4
2, 2, 5, 6, 3
3, 5, 7, 8, 6
4, 7, 9, 10, 8
5, 4, 3, 11, 12
6, 3, 6, 13, 11
7, 6, 8, 14, 13
8, 8, 10, 15, 14
9, 12, 11, 16, 17
10, 11, 13, 18, 16
11, 13, 14, 19, 18
12, 14, 15, 20, 19
13, 17, 16, 21, 22
14, 16, 18, 23, 21
15, 18, 19, 24, 23
16, 19, 20, 25, 24
*element, type=s8, elset=eall
 17, 26, 27, 28, 29, 3092, 3093, 3094, 3095
 18, 27, 30, 31, 28, 3097, 3098, 3099, 3093
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**
**
*nset, nset=nrbody
 1,  2,  3,  4,  5,  6
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*nset, nset=nbar
 26,  29,  49,  61,  73,  82
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*nset, nset=nmbrackets
 403,  404,  405,  406,  407,  408
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*nset, nset=ndblock
 102,  103,  125,  191,  233,  246
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*nset, nset=nlegs
 27,  28,  30,  31,  33,  34
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*nset, nset=nfixedface
 403,  404,  405,  406,  407,  408
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*nset, nset=nbolted
 494,  495,  499,  502,  506,  510
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*nset, nset=nnlendcaps
 2619,  2624,  2629,  2634,  2639,  2643
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 *nset, nset=nrendcaps
 2989,  2990,  2991,  2992,  2993,  3003
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*elset, elset=erbody
 1,  2,  3,  4,  5,  6,  7,  8,  9,  10,  11,  12,  13,  14,  15,  16
*elset, elset=ebar
 2075,  2076,  2077,  2078,  2079,  2080
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*elset, elset=embrackets
 309,  310,  311,  312,  313,  314
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*elset, elset=edblock
 1465,  1466,  1467,  1468,  1469,  1470
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*elset, elset=elegs
 17,  18,  19,  20,  21,  22
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*elset, elset=essurface
 2376,  2377,  2378,  2380,  2381,  2382
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*elset, elset=edfrontplate
 607,  608,  609,  610,  611,  612
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** Names based on rcontact
*NSET,NSET=Nrcontact
2906, 2907, 3003, 3004, 3005, 3006
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**
** Material Definitios
**
*Shell Section, Elset=ebar, material=Domax, offset=0.5
0.225
*Shell Section, Elset=elegs, material=Domax, offset=0.5
0.15625
*shell section, elset=edblock, material=domax, offset=0.5
0.15625
*shell section, elset=edfrontplate, material=domax, offset=0.5
0.25
*shell section, elset=embrackets, material=steel, offset=0.5
0.375
*shell section, elset=erbody, material=steel, offset=0.5
1.0
**
**
*Node, nset=rbody
 15000, 1.331247337500e+01, -23, 13.
 15001, 1.331247337500e+01, -23, 12.0
 15500, 17.75, -23., 9.5
 15501, 18, -23, 9.5
 **
*Rigid body, nset=nrendcaps, ref node=15500, rot node=15501
*Rigid body, nset=nrbody, ref node=15000, rot node=15001
***Rigid body, nset=Nrcontact, ref node=15000, rot node=15001
**
**
**
*material, name=domax
*density
0.2836
*elastic
29e6,0.29
*plastic, hardening=isotropic
109000, 0.
109233.63213266, 0.0171056877184482
109544.030646642, 0.0184775402439636
109882.57880484, 0.0198629798424855
110470.994889866, 0.0223624281148196
110625.154026355, 0.0233215357052394
110809.994504623, 0.024945762502965
111190.218299606, 0.0275374375877354
111385.389166176, 0.0288550345398024
111597.53834017, 0.0301649069121425
111959.0576703, 0.0326458819534121
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124198.115779664, 0.0833579034090414
*material, name=steel
*density
0.2836
*elastic
29e6, 0.29
**
** Surface definitions
**
*Surface, name=Sslave, type=element
essurface, spos
*surface, name=Smaster, type=element
erbody, spos
*contact pair, interaction=sticky, type=surface to surface
Sslave, Smaster
****
*surface interaction, name=sticky
*surface behavior, pressure-overclosure=linear
150e6, 1
***Friction
**0.01, 1E3
****
*transform, nset=nfixedface, type=r
-1, 0, 0, 0, 1, 1
**
**
*Boundary
nfixedface,1, 3
nbolted, 3, 3
15001, 1, 3
15501, 1, 3
15000, 1, 2
*initial conditions, type=displacement
15000, 3, .0625
**
**
*STEP, nlgeom
*STATIC
0.05,1.
*cload
**15000, 3, -12500.
15000, 3, -22500.
**
*dload
ebar, grav, 1.0, 0, -1, 0
embrackets, grav, 1.0, 0, -1, 0
edblock, grav, 1.0, 0, -1, 0
elegs, grav, 1.0, 0, -1, 0
edfrontplate, grav, 1.0, 0, -1, 0
**
*NODE PRINT,NSET=Nrcontact,FREQUENCY=10, totals=yes, global=yes
U, RF
*node print, nset=nfixedface, totals=only, global=yes
U, RF
*node print, nset=nbolted, totals=only, global=yes
U, RF
*el print, elset=essurface, frequency=10
S,E
*contact print, frequency=10
cdis, cstr
**
*contact file, frequency=10
cdis, cstr
*node file, frequency=10, global=yes
U, RF
*el file, frequency=10
S, E
*END STEP
