*HEADING
Model: TransformHinge
**
** COORDINATES
**
*NODE, NSET=NALL
       1,   10.000000    ,   0.0000000    ,   0.0000000
       2,  0.61230318E-15,   10.000000    ,   0.0000000
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**
** TRANSFORMATIONS
**
*NSET, NSET=T1
       1,       2,       3,       9,      10,      11
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*TRANSFORM, NSET=T1    , TYPE=C
  0.0000    ,  0.0000    ,  0.0000    ,  0.0000    ,  0.0000    ,  100.00
**
** ELEMENT TOPOLOGY
**
*Solid Section, elset=E1   , material=M1
   5.000
*ELEMENT, TYPE=CPS8  ,ELSET=E1
       1,       4,      32,     125,      35,      33,     262,     263,      34
       2,     125,      32,       3,      29,     262,      31,      30,     264
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**
** MATERIAL PROPERTIES
**
**
** M1
*MATERIAL, NAME=M1
*ELASTIC, TYPE=ISOTROPIC
    200000.    ,  0.30000
** FIXED FREEDOMS
**
*BOUNDARY
       1, 1
       2, 1
       3, 1
       6, 1
       8, 1
       9, 1
      10, 1
      11, 1
      12, 1
      13, 1
      14, 1
      15, 1
      16, 1
      17, 1
      18, 1
      19, 1
      20, 1
      21, 1
      22, 1
      23, 1
      24, 1
      25, 1
      26, 1
      27, 1
      28, 1
      29, 1
      30, 1
      76, 1
      77, 1
      78, 1
      79, 1
      80, 1
      81, 1
      82, 1
      83, 1
      84, 1
      85, 1
      86, 1
      87, 1
      88, 1
      89, 1
      90, 1

** LOADING
**
*Step
**Case    1  Load
*Static, SOLVER=SPOOLES
1.0, 1.0, 1e-05, 1.0
**
** LOADS
**
**
**
**  Load  Case
**     1   1 Line  L5   , traction      0.0 , Pressure  2.
**
*Cload,OP=NEW
      6,2,  -4.1666669
      7,2,  -4.1666669
     41,2,  -16.666666
     42,2,  -8.3333338
     43,2,  -16.666666
     44,2,  -8.3333338
     45,2,  -16.666666
     46,2,  -8.3333338
     47,2,  -16.666666
     48,2,  -8.3333338
     49,2,  -16.666666
     50,2,  -8.3333338
     51,2,  -16.666666
     52,2,  -8.3333338
     53,2,  -16.666666
     54,2,  -8.3333338
     55,2,  -16.666666
     56,2,  -8.3333338
     57,2,  -16.666666
     58,2,  -8.3333338
     59,2,  -16.666666
     60,2,  -8.3333338
     61,2,  -16.666666
     62,2,  -8.3333338
     63,2,  -16.666666
     64,2,  -8.3333338
     65,2,  -16.666666
     66,2,  -8.3333338
     67,2,  -16.666666
     68,2,  -8.3333338
     69,2,  -16.666666
     70,2,  -8.3333338
     71,2,  -16.666666
     72,2,  -8.3333338
     73,2,  -16.666666
     74,2,  -8.3333338
     75,2,  -16.666666
** OUTPUT REQUESTS
**
*EL FILE
S, U, E
*End Step
