*NODE, NSET=Nall
1, -15.0, 240.0, -10.0
3, -15.0, 250.0, -10.0
5, -5.0, 240.0, -10.0
7, -5.0, 250.0, -10.0
9, 5.0, 240.0, -10.0
11, 5.0, 250.0, -10.0
10, 5.0, 240.0, 0.0
12, 5.0, 250.0, 0.0
6, -5.0, 240.0, 0.0
8, -5.0, 250.0, 0.0
2, -15.0, 240.0, 0.0
4, -15.0, 250.0, 0.0
*ELEMENT, TYPE=B31R, ELSET=BARS
1, 1,  3
2, 1,  5
3, 1,  2
4, 3,  1
5, 3,  5
6, 3,  7
7, 3,  9
8, 3,  11
9, 3,  10
10, 3,  12
11, 3,  6
12, 3,  8
13, 3,  2
14, 3,  4
15, 5,  1
16, 5,  7
17, 5,  9
18, 5,  6
19, 7,  1
20, 7,  3
21, 7,  5
22, 7,  9
23, 7,  11
24, 7,  10
25, 7,  12
26, 7,  6
27, 7,  8
28, 7,  2
29, 7,  4
30, 9,  5
31, 9,  11
32, 9,  10
33, 11,  1
34, 11,  3
35, 11,  5
36, 11,  7
37, 11,  9
38, 11,  10
39, 11,  12
40, 11,  6
41, 11,  8
42, 11,  2
43, 11,  4
44, 10,  9
45, 10,  12
46, 10,  6
47, 12,  1
48, 12,  3
49, 12,  5
50, 12,  7
51, 12,  9
52, 12,  11
53, 12,  10
54, 12,  6
55, 12,  8
56, 12,  2
57, 12,  4
58, 6,  5
59, 6,  10
60, 6,  8
61, 6,  2
62, 8,  1
63, 8,  3
64, 8,  5
65, 8,  7
66, 8,  9
67, 8,  11
68, 8,  10
69, 8,  12
70, 8,  6
71, 8,  2
72, 8,  4
73, 2,  1
74, 2,  6
75, 2,  4
76, 4,  1
77, 4,  3
78, 4,  5
79, 4,  7
80, 4,  9
81, 4,  11
82, 4,  10
83, 4,  12
84, 4,  6
85, 4,  8
86, 4,  2
*MATERIAL,NAME=Steel
*ELASTIC
4176000,.3
*BEAM SECTION,ELSET=BARS,MATERIAL=Steel,SECTION=RECT
0.5, 0.2
-0.15433221,-0.832050294337844,0.554700196225229
*BOUNDARY
3, 1, 3
7, 1, 3
11, 1, 3
12, 1, 3
8, 1, 3
4, 1, 3
*STEP
*STATIC
*CLOAD
1,2,1.0
*NODE PRINT,NSET=Nall
U
*EL PRINT,ELSET=BARS
S, E
*NODE FILE, output=3D
U, RF
*EL FILE
S, E
*END STEP
