*Heading
**
*Preprint, echo=NO, model=NO, history=NO, contact=NO
**
** PARTS
**
*Part, name=Part-2
*Node
      1, -0.945218086, -0.304610372
      2,  -0.90351665, -0.346482337
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*Element, type=CPE3
1,  3, 34,  2
2,  1, 31, 37
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*Element, type=CPE4R
 4, 34, 35, 33,  2
 5, 36, 37, 31, 32
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*Nset, nset=Vein
   1,   2,   3,   4,   5,   7
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*Elset, elset=Vein
   1,   2,   3,   4,   5,   6
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*Nset, nset=Rock
   3,   4,   6,   7,   8,   9
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*Elset, elset=Rock
  34,  35,  36,  37,  38,  39
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*Nset, nset=LS
  18,  19,  20,  22,  23,  24
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*Elset, elset=LS
 350, 355, 356, 357, 373, 377
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** Section: Vein
*Solid Section, elset=Vein, material=Vein
1.,
** Section: Rock
*Solid Section, elset=Rock, material=Rock
1.,
*End Part
**
**
** ASSEMBLY
**
*Assembly, name=Assembly
**
*Instance, name=Part-1-1, part=Part-2
*End Instance
**
*Nset, nset=BOT, instance=Part-1-1
  17,  18,  22,  24,  27, 275, 276, 277, 382, 406, 433, 434, 435
*Elset, elset=BOT, instance=Part-1-1
 347, 348, 350, 402, 664, 672, 673, 681, 760, 796, 798, 815
*Nset, nset=BV, instance=Part-1-1
 3,
*Nset, nset=LV, instance=Part-1-1
 7,
*Nset, nset=NearVein, instance=Part-1-1
   3,   4,   6,   7,   8,   9
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*Elset, elset=NearVein, instance=Part-1-1
  34,  35,  36,  37,  38,  39
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*Nset, nset=RV, instance=Part-1-1
 4,
*Nset, nset=Set-10, instance=Part-1-1, generate
   1,  878,    1
*Elset, elset=Set-10, instance=Part-1-1, generate
   1,  829,    1
*Nset, nset=TOP, instance=Part-1-1
  15,  20,  28,  29,  30, 292, 293, 294, 414, 429, 430, 431, 432
*Elset, elset=TOP, instance=Part-1-1
 362, 366, 395, 398, 696, 704, 705, 713, 741, 742, 745, 816
*Nset, nset=TV, instance=Part-1-1
 8,
*Nset, nset=VI, instance=Part-1-1
   1,   5,  10,  12,  13,  21
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*Elset, elset=VI, instance=Part-1-1
   6,   7,   8,  10,  11,  12
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*Nset, nset=VO, instance=Part-1-1
   3,   4,   7,   8,  34,  35
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*Elset, elset=VO, instance=Part-1-1
   1,   3,   4,   5,   6,   7
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*Elset, elset=_BOT_S3, internal, instance=Part-1-1
 347, 348, 350, 402, 760, 796, 798, 815
*Elset, elset=_BOT_S2, internal, instance=Part-1-1
 664, 672
*Elset, elset=_BOT_S4, internal, instance=Part-1-1
 673, 681
*Surface, type=ELEMENT, name=BOT
_BOT_S3, S3
_BOT_S2, S2
_BOT_S4, S4
*Elset, elset=_IV_S3, internal, instance=Part-1-1
   6,   7,   8,  13,  14,  15
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*Elset, elset=_IV_S4, internal, instance=Part-1-1
  10,  11,  12, 173, 182, 183
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*Elset, elset=_IV_S1, internal, instance=Part-1-1
  19,  33, 171, 421, 443
*Elset, elset=_IV_S2, internal, instance=Part-1-1
 174, 175, 178, 181, 189, 192, 194, 196, 420, 433, 436, 438, 440, 441
*Surface, type=ELEMENT, name=IV
_IV_S3, S3
_IV_S4, S4
_IV_S2, S2
_IV_S1, S1
*Elset, elset=_LHS_S3, internal, instance=Part-1-1
 681, 682, 683, 684, 685, 686, 687, 688, 697, 698, 699, 700, 701, 702, 703, 704
*Surface, type=ELEMENT, name=LHS
_LHS_S3, S3
*Elset, elset=_RHS_S3, internal, instance=Part-1-1
 665, 666, 667, 668, 669, 670, 671, 672, 713, 714, 715, 716, 717, 718, 719, 720
*Surface, type=ELEMENT, name=RHS
_RHS_S3, S3
*Elset, elset=_TOP_S3, internal, instance=Part-1-1
 362, 366, 395, 398, 741, 742, 745
*Elset, elset=_TOP_S2, internal, instance=Part-1-1
 696, 704
*Elset, elset=_TOP_S4, internal, instance=Part-1-1
 705, 713
*Elset, elset=_TOP_S1, internal, instance=Part-1-1
 816,
*Surface, type=ELEMENT, name=TOP
_TOP_S3, S3
_TOP_S2, S2
_TOP_S4, S4
_TOP_S1, S1
*End Assembly
**
** MATERIALS
**
*Material, name=Rock
*Creep
 1e-19,1.,0.
*Elastic
 5e+10, 0.25
*Material, name=Vein
*Creep
 1e-22,1.,0.
*Elastic
 5e+10, 0.25
** ----------------------------------------------------------------
**
** ----------------------------------------------------------------
**
** STEP: creep
**
*Step, name=creep, nlgeom=YES
*Visco
3.1536e+08, 3.1536e+10,
**
** BOUNDARY CONDITIONS
**
*Boundary, type=VELOCITY
BOT, 1, 1, -7.9274e-12
BOT, 2, 2
*Boundary, type=VELOCITY
TOP, 1, 1, 7.9274e-12
TOP, 2, 2
**
** LOADS
**
**
** OUTPUT REQUESTS
**
*Restart, write, frequency=0
**
** FIELD OUTPUT: F-Output-1
**
*Output, field, variable=PRESELECT
**
** HISTORY OUTPUT: BV
**
*Output, history
*Node Output, nset=BV
COOR1, COOR2,S
**
** HISTORY OUTPUT: LV
**
*Node Output, nset=LV
COOR1, COOR2
**
** HISTORY OUTPUT: RV
**
*Node Output, nset=RV
COOR1, COOR2
**
** HISTORY OUTPUT: TV
**
*Node Output, nset=TV
COOR1, COOR2,S
*End Step
