*HEADING
d/D=.5 D=.50 r_root=.080  only one cycle
**
**     MESH GENERATED USING FASTQ
**  NUMBER OF NODES:                       839
**  NUMBER OF ELEMENTS:                    779
**  NUMBER OF NODAL BOUNDARY CONDITIONS:     6
**  NUMBER OF SIDE BOUNDARY CONDITIONS:      0
**
*NODE
         1, 0.0000000E+00, 0.0000000E+00, 0.0000000E+00
         2, 0.8627525E-02, 0.0000000E+00, 0.0000000E+00
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*ELEMENT, TYPE = CAX4, ELSET = MAT1
         1,         1,         2,        27,        26
         2,         2,         3,        28,        27
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*NSET, NSET = NOTCH
       1,       2,       3,       4,       5,       6
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*NSET, NSET = SIDE1
       1,      26,      51,      76,     101,     126
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*NSET, NSET = SIDE2
     551,     597,     598,     599,     600,     601,     602,
*NSET, NSET = SIDE3
     597,     727,     730,     733,
*NSET, NSET = TOP
     833,     834,     835,     836,     837,     838,     839,
*NSET, NSET = SIDE4
     733,     770,     777,     784,     791,     798,     805,     812,     819
     826,     833,
**-----------------------------------------------------------------
** Append this file to abaqus input files created from FASTQ
** and check the names of the NSETS created vs. the names used
** below.
**-----------------------------------------------------------------
**
*ELSET, ELSET=NOTCH_RT
    24,
*NSET, NSET = GAGE
    587,
*SOLID SECTION, ELSET=MAT1, MATERIAL=AL2024
          1.,
** MATERIAL IS 2024-T851, POWER LAW DATA FIT
*MATERIAL, NAME=AL2024
**
*DENSITY
         0.1,
**
*USER MATERIAL, CONSTANTS=20
1.06E+7,0.323,0.041,0.27,
59000.,0.000000,
62792.,0.000252,
64448.,0.000381,
66673.,0.000686,
68958.,0.001828,
71117.,0.006557,
72234.,0.010395,
74500.,0.020000,
*DEPVAR
19,
**----------------------------
**LOAD CYCLE 1
*STEP, AMPLITUDE=RAMP, INC=200, NLGEOM,UNSYMM=YES
*STATIC
        0.025,          1.,      0.00001,         0.025
*BOUNDARY
NOTCH,  2,   2,
SIDE1,  1,   1,
SIDE2,  1,   1,
SIDE3,  1,   1,
SIDE4,  1,   1,
TOP,    2,   2,      .00367
*CLOAD, OP=NEW
*DLOAD, OP=NEW
**
*NODE PRINT, NSET=GAGE, FREQ=1
U,
**
*NODE PRINT, NSET=NOTCH, FREQ=1, TOTALS=YES
RF,
**
**NODE PRINT, NSET=TOP, FREQ=1
**U,
**
**EL PRINT, ELSET=NOTCH_RT,POSITION=INTEGRATION POINT, FREQ=1
**PEEQ,
**LE22,
**
*OUTPUT,FIELD,FREQUENCY=0
*OUTPUT,HISTORY,FREQUENCY=0
*EL FILE, FREQUENCY=0
**EL FILE, POSITION=INTEGRATION POINT, FREQ=5
**S,
**E
**
*END STEP
