**
** ABAQUS Input Deck Generated by HyperMesh Version  : 13.0.110.31
** Generated using HyperMesh-Abaqus Template Version : 13.0.110
**
**   Template:  ABAQUS/EXPLICIT
**
*NODE
         1,  25.0           ,  -25.0          ,  2.842170943E-14
         2,  25.0           ,  -15.0          ,  0.0
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**HWCOLOR COMP          1    10
*ELEMENT,TYPE=C3D8R,ELSET=balken
       101,        66,        65,         8,         7,       127,       130,       129,
       128
       102,       127,       130,       129,       128,       131,       134,       133,
       132
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**HM_PROP_ID          1
**HM_comp_by_property "prop"    11
*SOLID SECTION, ELSET=balken, MATERIAL=stolr78_r460
*NSET, NSET=bcset
         1,         2,         3,         4,         5,         6
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*NSET, NSET=dynset
        26,        27,        28,        29,        30,        31
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**HMNAME MATS          1 stolr78_r460    11
*MATERIAL, NAME=stolr78_r460
*DENSITY
8.9000E-09,0.0
*ELASTIC, TYPE = ISOTROPIC
125000.0  ,0.33      ,0.0
*PLASTIC
274	0
461	0.005235562
478	0.013658236
489	0.02438976
499	0.035354187
507	0.047742218
515	0.060955646
521	0.074719385
525	0.089008626
*AMPLITUDE, NAME =amp, DEFINITION = TABULAR
0.0       ,0.0
3.0e-8       ,1.0
**HMNAME CURVE          1 amp
**HMNAME LOADSTEP          1 ls
*STEP, NLGEOM = YES
*DYNAMIC, EXPLICIT
1.0e-8          ,       3.0e-8,          ,
**HWNAME LOADCOL          1 bc
**HWCOLOR LOADCOL          1    11
*BOUNDARY
bcset,1,3,0.0
**HWNAME LOADCOL          2 dyn
**HWCOLOR LOADCOL          2    11
*BOUNDARY, AMPLITUDE = amp
dynset,3, ,0.0
*NODE FILE
U,
RF,
*EL FILE
S,
E,
PEEQ,
*END STEP
