*SURFACE, NAME = 1plate_contact_surface, TYPE = ELEMENT
1plate, SPOS
*SURFACE, NAME = 2ball_contact_surface, TYPE = ELEMENT
2ball, SPOS
*SURFACE INTERACTION, NAME = 1surface_interaction
*SURFACE BEHAVIOR,PRESSURE-OVERCLOSURE=EXPONENTIAL
1.e-4,.1
*FRICTION
0.1       ,5000.0       ,0.0       ,0.0
*CONTACT PAIR, INTERACTION=1surface_interaction, SMALL SLIDING
1plate_contact_surface, 2ball_contact_surface
*MATERIAL, NAME=steel
*DENSITY
7.8500E-09,0.0
*ELASTIC, TYPE = ISOTROPIC
210000.0  ,0.3       ,0.0
*SHELL SECTION, ELSET=1plate, MATERIAL=steel
1.0       ,
*SHELL SECTION, ELSET=2ball, MATERIAL=steel
1.0       ,
*INITIAL CONDITIONS,TYPE=VELOCITY
nodes_ball,3,-5420.0
*STEP ,INC=40000
*DYNAMIC,DIRECT,EXPLICIT
1.e-4,       1.e-2,          ,
*BOUNDARY
nodes_fixed,1,3,0.0
*NODE FILE
U
*EL FILE
S
*END STEP
*NODE
         1,  0.2678977312914,  -16.48289842535,  11.675588743547
         2,  -13.79491444965,  -14.38313531038,  21.319002091012
         3,  -4.549766818298,  -4.660164196663,  4.0901482935679
         4,  25.0           ,  -25.0          ,  0.0
         5,  -17.06173703418,  -10.26589906017,  21.126915414951
         6,  -4.201652094441,  -16.10015375755,  11.903551529404
         7,  -8.282893112913,  -8.481340944218,  6.8922212124702
         8,  -15.96594314805,  -4.721819649481,  11.918796157862
         9,  -25.0          ,  -25.0          ,  0.0
        10,  -16.25654097239,  -9.803591653524,  16.705997592624
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**HWCOLOR COMP          1     3
*ELEMENT,TYPE=S4,ELSET=1plate
         1,         4,        28,        30,        12
         2,        63,        61,        28,         4
         3,        35,         4,        12,        37
         4,        65,        63,         4,        35
         5,         9,        32,        45,        43
         6,        12,        30,        32,         9
         7,        39,         9,        43,        41
         8,        37,        12,         9,        39
         9,        17,        55,        53,        25
        10,        59,        57,        55,        17
        11,        28,        17,        25,        30
        12,        61,        59,        17,        28
        13,        22,        51,        49,        47
        14,        25,        53,        51,        22
        15,        32,        22,        47,        45
        16,        30,        25,        22,        32
**HWCOLOR COMP          2     4
*ELEMENT,TYPE=S4,ELSET=2ball
        17,        16,        24,        54,        38
        18,        16,        40,        14,        24
        19,        16,        38,         7,        40
        20,        24,        42,        10,        54
        21,        24,        14,        31,        42
        22,        38,        54,         8,        44
        23,        40,        33,         6,        14
        24,        38,        44,        34,         7
        25,        40,         7,        64,        33
        26,        54,        10,        36,         8
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*NSET, NSET=nodes_fixed
        41,        49,        57,        65
*NSET, NSET=nodes_ball
         1,         2,         3,         5,         6,         7,         8,        10,
        11,        13,        14,        15,        16,        18,        19,        20,
        21,        23,        24,        26,        27,        29,        31,        33,
        34,        36,        38,        40,        42,        44,        46,        48,
        50,        52,        54,        56,        58,        60,        62,        64,
        66,        67,        68,        69,        70,        71,        72,        73,
        74,        75,        76,        77,        78,        79,        80,        81,
        82,        83,        84,        85,        86,        87,        88,        89,
        90,        91,        92,        93,        94,        95,        96,        97,
        98,        99,       100,       101,       102,       103,       104,       105,
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