**
**   Structure: hinged beam.
**   Test objective: ABAQUS umat routine.
**
*HEADING
Model: beam     Date: 10-Mar-1998
*NODE
     1,      0.000000,      0.000000,      0.000000
     2,      1.000000,      0.000000,      0.000000
     3,      1.000000,      1.000000,      0.000000
     4,      0.000000,      1.000000,      0.000000
     5,      0.000000,      0.000000,      8.000000
     6,      1.000000,      0.000000,      8.000000
     7,      1.000000,      1.000000,      8.000000
     8,      0.000000,      1.000000,      8.000000
     9,      0.250000,      0.000000,      0.000000
    10,      0.500000,      0.000000,      0.000000
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*ELEMENT, TYPE=C3D20R   , ELSET=E1
     1,     1,    10,    95,    19,    61,   105,   222,   192,     9,    93,
           94,    20,   104,   220,   221,   193,    62,   103,   219,   190
*ELEMENT, TYPE=C3D20R   , ELSET=Eall
     2,    10,     2,    13,    95,   105,    34,   134,   222,    11,    12,
           96,    93,   106,   133,   223,   220,   103,    33,   132,   219
     3,    19,    95,    16,     4,   192,   222,   163,    79,    94,    97,
           17,    18,   221,   224,   164,   191,   190,   219,   161,    78
     4,    95,    13,     3,    16,   222,   134,    64,   163,    96,    14,
           15,    97,   223,   135,   162,   224,   219,   132,    63,   161
     5,    61,   105,   222,   192,    59,   109,   228,   196,   104,   220,
          221,   193,   108,   226,   227,   197,    60,   107,   225,   194
     6,   105,    34,   134,   222,   109,    36,   138,   228,   106,   133,
          223,   220,   110,   137,   229,   226,   107,    35,   136,   225
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*NSET, NSET=FIX
    97,    96,    95,    94,    93,    20,    19,    18,    17,    16,    15,
    14,    13,    12,    11,    10,     9,     4,     3,     2,     1
*NSET,NSET=Nfix2
5,
6,
7,
8,
21,
22,
23,
24,
25,
26,
27,
28,
29,
30,
31,
32,
98,
99,
100,
101,
102,
*NSET,NSET=Nhl
13,
19,
94,
95,
96,
*NSET,NSET=Nhr
25,
31,
99,
100,
101,
*BOUNDARY
Nhl,1,3
Nhr,1,3
*NSET,NSET=Nall,GENERATE
1,261
*MATERIAL,NAME=elastic
*ELASTIC
210000.0,        .3
*SOLID SECTION,ELSET=Eall,MATERIAL=elastic
*MATERIAL,NAME=ABAQUS
*USER MATERIAL, CONSTANTS=1
0.0
*DEPVAR
19
*SOLID SECTION,ELSET=E1,MATERIAL=ABAQUS
*INITIAL CONDITIONS,TYPE=SOLUTION
1, 1, 10.0, 0.0001, 0.0, 0.0, 0.0, 0.0, 500.0, 0.0, 0.0, 351594000.0, 0.2, 0.0, 0.0, 0.0,
0.0,0.0, 0.0, 0.0, 0.0
*INITIAL CONDITIONS,TYPE=SOLUTION
1, 2, 10.0, 0.0001, 0.0, 0.0, 0.0, 0.0, 500.0, 0.0, 0.0, 351594000.0, 0.2, 0.0, 0.0, 0.0
0.0,0.0, 0.0, 0.0, 0.0
*INITIAL CONDITIONS,TYPE=SOLUTION
1, 3, 10.0, 0.0001, 0.0, 0.0, 0.0, 0.0, 500.0, 0.0, 0.0, 351594000.0, 0.2, 0.0, 0.0, 0.0
0.0,0.0, 0.0, 0.0, 0.0
*INITIAL CONDITIONS,TYPE=SOLUTION
1, 4, 10.0, 0.0001, 0.0, 0.0, 0.0, 0.0, 500.0, 0.0, 0.0, 351594000.0, 0.2, 0.0, 0.0, 0.0
0.0,0.0, 0.0, 0.0, 0.0
*INITIAL CONDITIONS,TYPE=SOLUTION
1, 5, 10.0, 0.0001, 0.0, 0.0, 0.0, 0.0, 500.0, 0.0, 0.0, 351594000.0, 0.2, 0.0, 0.0, 0.0
0.0,0.0, 0.0, 0.0, 0.0
*INITIAL CONDITIONS,TYPE=SOLUTION
1, 6, 10.0, 0.0001, 0.0, 0.0, 0.0, 0.0, 500.0, 0.0, 0.0, 351594000.0, 0.2, 0.0, 0.0, 0.0
0.0,0.0, 0.0, 0.0, 0.0
*INITIAL CONDITIONS,TYPE=SOLUTION
1, 7, 10.0, 0.0001, 0.0, 0.0, 0.0, 0.0, 500.0, 0.0, 0.0, 351594000.0, 0.2, 0.0, 0.0, 0.0
0.0,0.0, 0.0, 0.0, 0.0
*INITIAL CONDITIONS,TYPE=SOLUTION
1, 8, 10.0, 0.0001, 0.0, 0.0, 0.0, 0.0, 500.0, 0.0, 0.0, 351594000.0, 0.2, 0.0, 0.0, 0.0
0.0,0.0, 0.0, 0.0, 0.0
*NSET,NSET=Nload
70,
85,
174,
175,
176,
*STEP,NLGEOM
*STATIC
*CLOAD
Nload,2,1.
*NODE PRINT,NSET=Nall
U
*EL PRINT,ELSET=Eall
S
*EL FILE
E,S
*END STEP
