**
** ABAQUS Input Deck Generated by HyperMesh Version  : 13.0.110.31
** Generated using HyperMesh-Abaqus Template Version : 13.0.110
**
**   Template:  ABAQUS/EXPLICIT
**
*NODE
         1,  -25.0          ,  25.0           ,  0.0
         2,  -3.55271368E-15,  25.0           ,  0.0
         3,  25.0           ,  25.0           ,  0.0
         4,  25.0           ,  -3.55271368E-15,  0.0
         5,  25.0           ,  -25.0          ,  2.842170943E-14
         6,  -3.55271368E-15,  -25.0          ,  2.842170943E-14
         7,  -25.0          ,  -25.0          ,  0.0
         8,  -25.0          ,  3.552713679E-15,  0.0
         9,  -3.55271368E-15,  0.0            ,  0.0
        10,  25.0           ,  -25.0          ,  25.0
        11,  -3.55271368E-15,  -25.0          ,  25.0
        12,  -3.99680289E-15,  -3.55271368E-15,  25.0
        13,  25.0           ,  -1.59872116E-14,  25.0
        14,  25.0           ,  -25.0          ,  50.0
        15,  -3.55271368E-15,  -25.0          ,  50.0
        16,  -4.88498131E-15,  -2.66453526E-15,  50.0
        17,  25.0           ,  -1.24344979E-14,  50.0
        18,  25.0           ,  -25.0          ,  75.0
        19,  -3.55271368E-15,  -25.0          ,  75.0
        20,  -4.44089210E-15,  1.554312234E-15,  75.0
        21,  25.0           ,  -3.55271368E-15,  75.0
        22,  25.0           ,  -25.0          ,  100.0
        23,  -3.55271368E-15,  -25.0          ,  100.0
        24,  -4.44089210E-15,  1.110223025E-15,  100.0
        25,  25.0           ,  -1.77635684E-15,  100.0
        26,  25.0           ,  -25.0          ,  125.0
        27,  -3.55271368E-15,  -25.0          ,  125.0
        28,  -5.55111512E-15,  -6.66133815E-16,  125.0
        29,  25.0           ,  -7.10542736E-15,  125.0
        30,  25.0           ,  -25.0          ,  150.0
        31,  -3.55271368E-15,  -25.0          ,  150.0
        32,  -2.22044605E-15,  -1.99840144E-15,  150.0
        33,  25.0           ,  -7.10542736E-15,  150.0
        34,  25.0           ,  -25.0          ,  175.0
        35,  0.0            ,  -25.0          ,  175.0
        36,  -2.22044605E-16,  -3.33066907E-15,  175.0
        37,  25.0           ,  -8.88178420E-15,  175.0
        38,  25.0           ,  -25.0          ,  200.0
        39,  -3.55271368E-15,  -25.0          ,  200.0
        40,  -3.57231880E-15,  -6.80092262E-16,  200.0
        41,  25.0           ,  -3.55271368E-15,  200.0
        42,  0.0            ,  25.0           ,  25.0
        43,  25.0           ,  25.0           ,  25.0
        44,  -3.55271368E-15,  25.0           ,  50.0
        45,  25.0           ,  25.0           ,  50.0
        46,  -3.55271368E-15,  25.0           ,  75.0
        47,  25.0           ,  25.0           ,  75.0
        48,  -3.55271368E-15,  25.0           ,  100.0
        49,  25.0           ,  25.0           ,  100.0
        50,  -7.10542736E-15,  25.0           ,  125.0
        51,  25.0           ,  25.0           ,  125.0
        52,  0.0            ,  25.0           ,  150.0
        53,  25.0           ,  25.0           ,  150.0
        54,  0.0            ,  25.0           ,  175.0
        55,  25.0           ,  25.0           ,  175.0
        56,  -3.55271368E-15,  25.0           ,  200.0
        57,  25.0           ,  25.0           ,  200.0
        58,  -25.0          ,  3.552713679E-15,  25.0
        59,  -25.0          ,  25.0           ,  25.0
        60,  -25.0          ,  3.552713679E-15,  50.0
        61,  -25.0          ,  25.0           ,  50.0
        62,  -25.0          ,  3.552713679E-15,  75.0
        63,  -25.0          ,  25.0           ,  75.0
        64,  -25.0          ,  3.552713679E-15,  100.0
        65,  -25.0          ,  25.0           ,  100.0
        66,  -25.0          ,  3.552713679E-15,  125.0
        67,  -25.0          ,  25.0           ,  125.0
        68,  -25.0          ,  3.552713679E-15,  150.0
        69,  -25.0          ,  25.0           ,  150.0
        70,  -25.0          ,  -3.55271368E-15,  175.0
        71,  -25.0          ,  25.0           ,  175.0
        72,  -25.0          ,  7.105427358E-15,  200.0
        73,  -25.0          ,  25.0           ,  200.0
        74,  -25.0          ,  -25.0          ,  25.0
        75,  -25.0          ,  -25.0          ,  50.0
        76,  -25.0          ,  -25.0          ,  75.0
        77,  -25.0          ,  -25.0          ,  100.0
        78,  -25.0          ,  -25.0          ,  125.0
        79,  -25.0          ,  -25.0          ,  150.0
        80,  -25.0          ,  -25.0          ,  175.0
        81,  -25.0          ,  -25.0          ,  200.0
**HWCOLOR COMP          1    10
*ELEMENT,TYPE=C3D8R,ELSET=balken
         5,         5,         4,         9,         6,        10,        13,        12,
        11
         6,        10,        13,        12,        11,        14,        17,        16,
        15
         7,        14,        17,        16,        15,        18,        21,        20,
        19
         8,        18,        21,        20,        19,        22,        25,        24,
        23
         9,        22,        25,        24,        23,        26,        29,        28,
        27
        10,        26,        29,        28,        27,        30,        33,        32,
        31
        11,        30,        33,        32,        31,        34,        37,        36,
        35
        12,        34,        37,        36,        35,        38,        41,        40,
        39
        13,         4,         3,         2,         9,        13,        43,        42,
        12
        14,        13,        43,        42,        12,        17,        45,        44,
        16
        15,        17,        45,        44,        16,        21,        47,        46,
        20
        16,        21,        47,        46,        20,        25,        49,        48,
        24
        17,        25,        49,        48,        24,        29,        51,        50,
        28
        18,        29,        51,        50,        28,        33,        53,        52,
        32
        19,        33,        53,        52,        32,        37,        55,        54,
        36
        20,        37,        55,        54,        36,        41,        57,        56,
        40
        21,         9,         2,         1,         8,        12,        42,        59,
        58
        22,        12,        42,        59,        58,        16,        44,        61,
        60
        23,        16,        44,        61,        60,        20,        46,        63,
        62
        24,        20,        46,        63,        62,        24,        48,        65,
        64
        25,        24,        48,        65,        64,        28,        50,        67,
        66
        26,        28,        50,        67,        66,        32,        52,        69,
        68
        27,        32,        52,        69,        68,        36,        54,        71,
        70
        28,        36,        54,        71,        70,        40,        56,        73,
        72
        29,         6,         9,         8,         7,        11,        12,        58,
        74
        30,        11,        12,        58,        74,        15,        16,        60,
        75
        31,        15,        16,        60,        75,        19,        20,        62,
        76
        32,        19,        20,        62,        76,        23,        24,        64,
        77
        33,        23,        24,        64,        77,        27,        28,        66,
        78
        34,        27,        28,        66,        78,        31,        32,        68,
        79
        35,        31,        32,        68,        79,        35,        36,        70,
        80
        36,        35,        36,        70,        80,        39,        40,        72,
        81
**HM_PROP_ID          1
**HM_comp_by_property "property1"    11
*SOLID SECTION, ELSET=balken, MATERIAL=mat
**HMNAME MATS          1 mat    11
*MATERIAL, NAME=mat
*DENSITY
7.8000E-09,0.0
*ELASTIC, TYPE = ISOTROPIC
210000.0  ,0.3       ,0.0
*AMPLITUDE, NAME =amp, DEFINITION = TABULAR
0.0       ,0.0
0.2       ,1.0
**HMNAME CURVE          1 amp
**HMNAME LOADSTEP          1 step
*STEP
*DYNAMIC, EXPLICIT
          ,       0.2,          ,    1000.0
**HWNAME LOADCOL          1 bc
**HWCOLOR LOADCOL          1    11
*BOUNDARY
        38,1,3,0.0
        39,1,3,0.0
        40,1,3,0.0
        41,1,3,0.0
        56,1,3,0.0
        57,1,3,0.0
        72,1,3,0.0
        73,1,3,0.0
        81,1,3,0.0
**HWNAME LOADCOL          2 cload
**HWCOLOR LOADCOL          2    11
*CLOAD, AMPLITUDE = amp
         1,2,-10.0
         2,2,-10.0
         3,2,-10.0
         4,2,-10.0
         5,2,-10.0
         6,2,-10.0
         7,2,-10.0
         8,2,-10.0
         9,2,-10.0

*NODE FILE
U,
*EL FILE
S,
E,
*END STEP
