*RESTART,READ,STEP=1
*STEP, NLGEOM
*DYNAMIC, SOLVER=SPOOLES, ALPHA=-0.05, SOLVER=SPOOLES
 0.20000000E-06,  0.10000000E-05
*CLOAD
       9,  1, -0.76051865E-02
       9,  2, -0.37078655E-01
       9,  3,  0.32206151E-03
      10,  1, -0.31708582E-02
      10,  2, -0.15066287E-01
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    6358,  3, -0.46909953E-03
**
*NODE FILE
U
*EL FILE
S
**
**
*END STEP
