** ALP BLADE
** Job name: correct Model name: Model-1
** Generated by: Abaqus/CAE 6.12-2
*MATERIAL, NAME=mat0
*ELASTIC, TYPE=ISOTROPIC
400e9, 0.3
*DENSITY
2300
*NODE
    1, -0.43000002E-01, -0.20000001E-02, -0.16500000E+01
    2, -0.43000002E-01, -0.18000000E-02, -0.16500000E+01
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*ELEMENT,TYPE=S8R,ELSET=STRUCT
  1, 2123,   22,  517,  163, 2131, 2132, 2133, 2134
  2,   22,   23,  518,  517, 2135, 2136, 2137, 2132
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*NSET, NSET=SURF4-TIP
   16,   17,   18,   19,   20,   21
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*ELSET, ELSET=SURF4-TIP, GENERATE
 2073,  2107,     1
*NSET, NSET=ROOT
   10,   12,   14,  174,  175,  176
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*NSET, NSET=SURF2-DOWN
   11,   12,   14,   15,   19,   21
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*ELSET, ELSET=SURF2-DOWN
  479,  480,  481,  482,  483,  484
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*NSET, NSET=SURF3-UP
   14,   15,   20,   21,  178,  179
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*ELSET, ELSET=LEADING-EDGE
    1,    2,    3,    4,    5,    6
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*ELSET, ELSET=MIDDLE-ZONE
  371,  372,  373,  374,  375,  376
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*NSET, NSET=SURF1
    9,   10,   11,   12,   13,   16
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**
*SHELL SECTION,MATERIAL=mat0,ELSET=STRUCT,OFFSET=0.5
0.004
*SHELL SECTION,MATERIAL=mat0,ELSET=SURF4-TIP,OFFSET=0.5
0.0005
*SHELL SECTION,MATERIAL=mat0,ELSET=MIDDLE-ZONE,OFFSET=0.5
0.0005
*SHELL SECTION,MATERIAL=mat0,ELSET=LEADING-EDGE,OFFSET=0.5
0.0002
*RESTART,WRITE,FREQUENCY=1
*STEP, NLGEOM
                *DYNAMIC, ALPHA=-0.05, SOLVER=SPOOLES
 0.20000000E-06,  0.10000000E-05
*BOUNDARY
ROOT, 1, 6
**
*CLOAD
       9,  1, -0.77739662E-02
       9,  2, -0.37930685E-01
       9,  3,  0.32872014E-03
      10,  1, -0.32645219E-02
      10,  2, -0.15510714E-01
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    6358,  3, -0.45515363E-03
**
*NODE FILE
U
*EL FILE
S
**
**
*END STEP
