** Generated by Mecway 6.0
*NODE
1,-3.006981176002,-0.07694342326686,0.1014338883191
2,-2.927023834973,-0.0769434259084,0.1004844593333
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*ELEMENT,TYPE=S8
1,3919,3920,4170,4169,765,1776,1777,1772
2,3920,3921,4171,4170,769,1780,1781,1776
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*ELEMENT,TYPE=S6
401,482,481,359,597,598,599
459,4386,4267,4266,600,2173,3146
461,4385,4384,4264,2649,604,3133
1096,472,473,595,3489,607,608
1100,539,538,416,2958,610,611
1104,410,411,533,2667,613,614
*NSET,NSET=Face1
1132
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*NSET,NSET=Face2
601
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*NSET,NSET=displacement_nodes
4530
*NSET,NSET=displacement_nodes(2)
4530
*NSET,NSET=displacement_nodes(3)
4530
*NSET,NSET=displacement_nodes(4)
4531
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*ELSET,ELSET=1-200Bow
1
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*MATERIAL,NAME=Material
*ELASTIC,TYPE=ISOTROPIC
210000000000,0.3
*DENSITY
7850
*SHELL SECTION,ELSET=1-200Bow,MATERIAL=Material
0.016
*BOUNDARY
4528,2,,0
4528,3,,0
4529,1,,0
4530,1,,0
4530,2,,0
4530,3,,0
4531,1,,0
*RIGID BODY, NSET=Face1, REF NODE=4530, ROT NODE=4531

*RIGID BODY, NSET=Face2, REF NODE=4528, ROT NODE=4529
*STEP
*BUCKLE
3
*CLOAD
4528,1,100000
*DLOAD
1-200Bow,GRAV,0,1,0,0
*DLOAD
1-200Bow,GRAV,0,0,1,0
*DLOAD
1-200Bow,GRAV,9.81,0,0,1
*NODE FILE,GLOBAL=YES
U
*END STEP
