*HEADING
 This is a superstructure for a box type
joint
*NODE
1,-200,-200,100
2,-200,-200,93.75
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*NSET, NSET=NODEA
 1
*NSET, NSET=NODEB
 33
*NSET, NSET=NODEC
 2113
*NSET, NSET=NODED
 2145
*NSET, NSET=FACEBA

1073
*NSET, NSET=NODEE
 137281
*NSET, NSET=NODEF
 137313
*NSET, NSET=NODEG
 139393
*NSET, NSET=NODEH
 139425
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*ELEMENT, TYPE=S4R, ELSET=BACK
1,1,2,35,34
2,2,3,36,35
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*ELEMENT, TYPE=S4R, ELSET=FRONT
2049,137281,137282,137315,137314
2050,137282,137283,137316,137315
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*ELEMENT, TYPE=S4R, ELSET=TOP
4097,2113,2114,4259,4258
4098,2114,2115,4260,4259
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*ELEMENT, TYPE=S4R, ELSET=BOTTOM
6145,1,2,2147,2146
6146,2,3,2148,2147
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*ELEMENT, TYPE=S4R, ELSET=WEB
8193,17,50,2195,2162
8194,50,83,2228,2195
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*SHELL SECTION, ELSET=BACK, MATERIAL=STEEL1
12
*SHELL SECTION, ELSET=FRONT, MATERIAL=STEEL1
12
*SHELL SECTION, ELSET=TOP, MATERIAL=STEEL1
12
*SHELL SECTION, ELSET=BOTTOM, MATERIAL=STEEL1
12
*SHELL SECTION, ELSET=WEB, MATERIAL=STEEL1
8
*MATERIAL, NAME=STEEL1
*ELASTIC
 200E3, 0.3
*DENSITY
 7.7E-9
*EQUATION
** Back face
2
NODEC, 1, 1, NODEA, 1, 1
2
NODEA, 1, 1, NODEB, 1, 1
2
NODEB, 1, 1, NODED, 1, 1
** Front face
2
NODEG, 1, 1, NODEE, 1, 1
2
NODEE, 1, 1, NODEF, 1, 1
2
NODEF, 1, 1, NODEH, 1, 1
** Top face
2
NODEC, 2, 1, NODED, 2, 1
2
NODED, 2, 1, NODEH, 2, 1
2
NODEH, 2, 1, NODEG, 2, 1
** Bottom face
2
NODEA, 2, 1, NODEB, 2, 1
2
NODEB, 2, 1, NODEF, 2, 1
2
NODEF, 2, 1, NODEE, 2, 1
*STEP
*SUBSTRUCTURE GENERATE, TYPE=Z200, OVERWRITE, RECOVERY MATRIX=YES
*RETAINED NODAL DOFS, SORTED=NO
 139425,1
 137281,2
*SUBSTRUCTURE MATRIX OUTPUT, OUTPUT FILE=USER DEFINED, FILE NAME=box1, STIFFNESS=YES
*END STEP
