*Heading
** Job name: buckling_Case2 Model name: Model-1
** Generated by: Abaqus/CAE 6.12-3
*Node,NSET= NALL
      1,         100.,         100.,           0.
      2,          75.,         100.,           0.
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*Element, type=S4R,ELSET=Eall
 1,  1,  2, 11, 10
 2,  2,  3, 12, 11
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*Nset, nset=bottom
 77,
*Nset, nset=right
 37,
*Nset, nset=top
 5,
*Nset, nset=left
 45,
*Nset, nset=allnodes
  1,  2,  3,  4,  5,  6
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*Nset, nset=top-force
 1,  9,  1
*Nset, nset=bottom-froce
 73,  81,   1
*Material, name=Aluminium
*Elastic
70000., 0.3
*Shell Section, elset=EALL, material=Aluminium
2., 5
** BOUNDARY CONDITIONS
**
** Name: allnodes Type: Displacement/Rotation
*Boundary
allnodes, 3, 3
** Name: bottom Type: Displacement/Rotation
*Boundary
bottom, 1, 1
** Name: left Type: Displacement/Rotation
*Boundary
left, 1, 1
** Name: right Type: Displacement/Rotation
*Boundary
right, 2, 2
** Name: top Type: Displacement/Rotation
*Boundary
top, 2, 2
*Step
*Buckle
70
*Cload
top, 2, -44.44
*Cload
bottom, 2, 44.44
*NODE PRINT,NSET=NALL,FREQUENCY=10
U
*EL PRINT,ELSET=EALL
S
*END STEP
