*NODE, NSET=Nall
       1,6.000000000000e+001,0.000000000000e+000,0.000000000000e+000
       2,5.000000000000e+001,0.000000000000e+000,0.000000000000e+000
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*ELEMENT, TYPE=C3D8, ELSET=Eall
     1,     1,     2,     3,     4,     5,     6,     7,     8
     2,     4,     3,     9,    10,     8,     7,    11,    12
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
** Names based on bound_01
*NSET,NSET=Nbound_01
1,
2,
5,
6,
165,
167,
247,
249,
329,
331,
411,
413,
493,
495,

** Surfaces based on bound_01
*SURFACE, NAME=Sbound_01
1, S3
41, S3
81, S3
121, S3
161, S3
201, S3

** Names based on bound_02
*NSET,NSET=Nbound_02
161,
162,
163,
164,
245,
246,
327,
328,
409,
410,
491,
492,
573,
574,

** Surfaces based on bound_02
*SURFACE, NAME=Sbound_02
40, S5
80, S5
120, S5
160, S5
200, S5
240, S5

** Names based on bound_03
*NSET,NSET=Nbound_03
575,
576,
579,
580,
739,
741,
821,
823,
903,
905,
985,
987,
1067,
1069,

** Surfaces based on bound_03
*SURFACE, NAME=Sbound_03
241, S3
281, S3
321, S3
361, S3
401, S3
441, S3

** Names based on bound_04
*NSET,NSET=Nbound_04
735,
736,
737,
738,
819,
820,
901,
902,
983,
984,
1065,
1066,
1147,
1148,

** Surfaces based on bound_04
*SURFACE, NAME=Sbound_04
280, S5
320, S5
360, S5
400, S5
440, S5
480, S5

*NODE, NSET=Nrefnode
5001,30,5,0
5002,30,5,400
5003,30,105,0
5504,30,105,400

*NSET,NSET=Nrefnode_01
5001

*NSET,NSET=Nrefnode_02
5002

*NSET,NSET=Nrefnode_03
5003

*NSET,NSET=Nrefnode_04
5004

*MATERIAL, Name=steel

*ELASTIC
210000, 0.3

*DENSITY
7.85E-9

*SOLID SECTION, Elset=Eall, Material=steel

*COUPLING,REF NODE=5001,SURFACE=Sbound_01,CONSTRAINT NAME=CN1
*DISTRIBUTING
1,1
2,2
3,3
4,4
5,5
6,6

*COUPLING,REF NODE=5002,SURFACE=Sbound_02,CONSTRAINT NAME=CN2
*DISTRIBUTING
1,1
2,2
3,3
4,4
5,5
6,6

*COUPLING,REF NODE=5003,SURFACE=Sbound_03,CONSTRAINT NAME=CN3
*DISTRIBUTING
1,1
2,2
3,3
4,4
5,5
6,6

*COUPLING,REF NODE=5004,SURFACE=Sbound_04,CONSTRAINT NAME=CN4
*DISTRIBUTING
1,1
2,2
3,3
4,4
5,5
6,6

*ELEMENT, TYPE=T3D2, Elset=Etruss
1001,    322, 827
*SOLID SECTION, Elset=Etruss, Material=steel
150

*STEP, NLGEOM

*STATIC

*BOUNDARY
**Nbound01,1,3
**Nbound02,1,3
**Nbound03,1,3
**Nbound04,1,3

Nrefnode_01,1,3,0
Nrefnode_01,6,6,0
Nrefnode_02,1,2,0
Nrefnode_02,6,6,0
Nrefnode_03,1,3,0
Nrefnode_03,6,6,0
Nrefnode_04,1,2,0
Nrefnode_04,6,6,0

***CLOAD
**Nrefnode_02,3,-1000
**Nrefnode_04,3,-1000

*DLOAD
Eall,GRAV,9810.,1,0.,0.

*NODE FILE, OUTPUT=3D
U

*EL FILE
S, PEEQ

*END STEP
