*HEADING
ABAQUS job created on 16-Jun-11 at 10:36:17
**
*NODE
       1,            0.,            1.
       2,            0.,          0.75
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**
**
*ELEMENT, TYPE=C3D8, ELSET=BEAM_CANTI
       1,       1,       2,       7,       6,     206,     207,
     212,     211
       2,       2,       3,       8,       7,     207,     208,
     213,     212
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*ELEMENT, TYPE=C3D8, ELSET=BULLET
    1281,    1866,    1869,    1870,    1867,    1894,    1891,
    1892,    1893
    1282,    1860,    1866,    1867,    1863,    1896,    1894,
    1893,    1895
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**
** contact_region
**
*elset,elset=contact_bullet
     1357,    1376,    1389,     1408
**
**
*ELSET, ELSET=CONTACT_beam
     605,     609,     765,     769
*surface,name=bullet_head
1357,s4
1376,s6
1389,s4
1408,s6
*surface,name=beam_face
605,s6
609,s6
765,s6
769,s6
** ball
**
*ELSET, ELSET=BALL, GENERATE
    1281,    1472,       1
**
** beam_canti
**
*SOLID SECTION, ELSET=BEAM_CANTI, MATERIAL=STEEL
          1.,
**
** bullet
**
*SOLID SECTION, ELSET=BULLET, MATERIAL=STEEL
          1.,
**
** steel
** Date: 16-Jun-11           Time: 10:34:57
**
*MATERIAL, NAME=STEEL
**
*DENSITY
      400.,
**
*ELASTIC, TYPE=ISO
      5.E+11,         0.3
**
*surface interaction, name=hit
*friction
0.01,
*contact pair,interaction=hit
bullet_head,beam_face
**
*initial conditions,type=temperature
233
** Step
** LoadCase, Default
**
*STEP
**
This load case is the default load case that always appears
**
*dynamic,ALPHA=-0.3,explicit=3
1E-8,1e-1
*NSET, NSET=FIX_END, GENERATE
       1,       5,       1
     206,     210,       1
     411,     415,       1
     616,     620,       1
     821,     825,       1
    1026,    1030,       1
    1231,    1235,       1
    1436,    1440,       1
    1641,    1645,       1
*NSET, NSET=SHOOT, GENERATE
    1846,    2160,       1
**
**
** fix_end
**
*BOUNDARY, OP=NEW
FIX_END, 1,,          0.
FIX_END, 2,,          0.
FIX_END, 3,,          0.
**
** shoot
**
*BOUNDARY, OP=NEW, TYPE=VELOCITY
SHOOT, 2,,        -100.
**
*CLOAD, OP=NEW
*DLOAD, OP=NEW
*TEMPERATURE, OP=NEW
**
*OUTPUT, FIELD, FREQ=1
*NODE OUTPUT
U,
V,
RF,
*OUTPUT, FIELD, FREQ=1
*contact OUTPUT
cforce,
**
** ELEMENT OUTPUT REQUESTS
**
*OUTPUT, FIELD, FREQ=1
*ELEMENT OUTPUT
S,
E,
pe,
** MODAL OUTPUT REQUESTS
*OUTPUT, history, FREQ=10
*energy OUTPUT
allcw,
allpw,
etotal,
** NONE
**
**
*END STEP
