*HEADING
Model: cantilever beam
*NODE
      1, -0.0206761379, -0.0170000009,           1.
      2, -0.0206761379, 0.00800000038,           1.
      3, -0.0206761379, 0.0329999998,           1.
      4, -0.0206761379, -0.0170000009,  0.975000024
      5, -0.0206761379, 0.00800000038,  0.975000024
      6, -0.0206761379, 0.0329999998,  0.975000024
      7, -0.0206761379, -0.0170000009,  0.949999988
      8, -0.0206761379, 0.00800000038,  0.949999988
      9, -0.0206761379, 0.0329999998,  0.949999988
     10, -0.0206761379, -0.0170000009,  0.925000012
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*ELEMENT, TYPE=C3D8R
  1, 124, 125, 128, 127,   1,   2,   5,   4
  2, 125, 126, 129, 128,   2,   3,   6,   5
  3, 127, 128, 131, 130,   4,   5,   8,   7
  4, 128, 129, 132, 131,   5,   6,   9,   8
  5, 130, 131, 134, 133,   7,   8,  11,  10
  6, 131, 132, 135, 134,   8,   9,  12,  11
  7, 133, 134, 137, 136,  10,  11,  14,  13
  8, 134, 135, 138, 137,  11,  12,  15,  14
  9, 136, 137, 140, 139,  13,  14,  17,  16
 10, 137, 138, 141, 140,  14,  15,  18,  17
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**
*ELSET, ELSET=ALL_ELEMENTS, GENERATE
1,160
*NSET, NSET=FORCE_APPLICATION_NODE
243
*NSET, NSET=FIXED_END
1,2,3,124,125,126,247,248,249
**
*MATERIAL, NAME=steel
*ELASTIC
2.1e+11, 0.3
*SOLID SECTION, ELSET=ALL_ELEMENTS, MATERIAL=steel
**
*BOUNDARY
FIXED_END, 1, 3
**
*STEP
*STATIC, DIRECT
.1,1.
**
*CLOAD
FORCE_APPLICATION_NODE, 2, -5000.
**
*NODE FILE
U
*EL FILE
S
**
*END STEP
