** Generated by Mecway 5.0
*NODE
1,-0.03319121316212,0.1280227691366,0.01519234542654
2,-0.04,0.1297405818463,0.01485529079142
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*ELEMENT,TYPE=DC3D10
1,664,643,603,639,1111,1609,1610,731,1611,1612
2,549,649,656,652,1025,1018,1225,1027,1024,1273
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*MATERIAL,NAME=Material-321-Thermal
*CONDUCTIVITY,TYPE=ISO
22,0
*MATERIAL,NAME=Material-321-Structural
*ELASTIC,TYPE=ISOTROPIC
200000000000,0.3
*DENSITY
7900
*NSET,NSET=x
2207
2209
*NSET,NSET=z
2207
*NSET,NSET=Face_Selection-base
407
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*NSET,NSET=Face_Selection-top
13
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*ELSET,ELSET=Meshed_Geometry-lower
1
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*ELSET,ELSET=Meshed_Geometry-upper
688
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*SURFACE,NAME=Face_Selection-base
86,S3
232,S2
664,S3
561,S3
318,S4
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4,S4
*SURFACE,NAME=Face_Selection-top
945,S3
1195,S4
1274,S1
1299,S2
1320,S2
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877,S1
*SURFACE,NAME=upwardContact
1381,S3
1412,S2
77,S2
284,S2
159,S1
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242,S4
*SURFACE,NAME=downwardContact
1222,S4
1227,S1
887,S4
1003,S1
1179,S3
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1267,S2
*SOLID SECTION,ELSET=Meshed_Geometry-lower,MATERIAL=Material-321-Thermal
*SOLID SECTION,ELSET=Meshed_Geometry-upper,MATERIAL=Material-321-Thermal
*CONTACT PAIR,INTERACTION=SI_73312D876394,TYPE=SURFACE TO SURFACE
upwardContact,downwardContact
*SURFACE INTERACTION,NAME=SI_73312D876394
*SURFACE BEHAVIOR,PRESSURE-OVERCLOSURE=TIED
2000000000000
*GAP CONDUCTANCE
2000.,,273.
*STEP
*HEAT TRANSFER,STEADYSTATE
1,1
*BOUNDARY
Face_Selection-base,11,,1273.15
Face_Selection-top,11,,288.15
*NODE FILE,GLOBAL=YES
NT
*EL FILE
HFL
*END STEP
