**
**   Structure: circular line within cube around
**              beam-like conductor; Heaviside-step-like
**              current
**   Test objective: Calculation of E and B
**                   Heating of the conductor
**
**   Modified 14Dec15: Alternating voltage introduced, 1kHz, 8 increments per cycle
**
*NODE, NSET=Nair
    1553,1.000000000000e-01,-1.000000000000e-01,0.000000000000e+00
    1554,1.000000000000e-01,-3.250000000000e-01,0.000000000000e+00
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*ELEMENT, TYPE=C3D8, ELSET=Eair
   513,  1553,  1554,  1555,  1556,  1557,  1558,  1559,  1560
   514,  1556,  1555,  1561,  1562,  1560,  1559,  1563,  1564
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*NODE, NSET=Npart
    3119,1.000000000000e-01,1.000000000000e-01,-8.000000000000e-01
    3120,1.000000000000e-01,0.000000000000e+00,-8.000000000000e-01
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*ELEMENT, TYPE=C3D8, ELSET=Epart
  1681,  3119,  3120,  3121,  3122,  3123,  3124,  3125,  3126
  1682,  3122,  3121,  3127,  3128,  3126,  3125,  3129,  3130
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*NODE, NSET=Ncoil
       1,0.000000000000e+00,2.000000000000e-01,1.000000000000e-03
       2,0.000000000000e+00,2.007071067812e-01,7.071067811865e-04
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*ELEMENT, TYPE=S8, ELSET=Ecoil
     1,      1,      2,      3,      4,      5,      6,      7,      8
     2,      4,      3,      9,     10,      7,     11,     12,     13
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** Names based on minus
*NSET,NSET=Nminus
1244,
1245,
1247,
1294,
1296,
1372,
1373,
1375,
1392,
1468,
1469,
1471,
1488,
1534,
1536,
1552,
** Names based on plus
*NSET,NSET=Nplus
1,
2,
5,
84,
86,
134,
135,
138,
217,
234,
235,
238,
317,
334,
336,
384,
** Names based on n1
*NSET,NSET=Nn1
3191,
*MATERIAL,NAME=COPPER
*DENSITY
8940.
*CONDUCTIVITY
399.
*SPECIFIC HEAT
382.
*ELECTRICAL CONDUCTIVITY
5.96E7
*MAGNETIC PERMEABILITY
1.255987E-6,2
*MATERIAL,NAME=AIR
*DENSITY
1.293
*CONDUCTIVITY
0.026
*SPECIFIC HEAT
1005.
*MAGNETIC PERMEABILITY
1.256e-6,1
*PHYSICAL CONSTANTS,ABSOLUTE ZERO=-273.15,STEFAN BOLTZMANN=5.669E-8
*SHELL SECTION,ELSET=Ecoil,MATERIAL=COPPER
1.e-5
*SOLID SECTION,ELSET=Eair,MATERIAL=AIR
*SOLID SECTION,ELSET=Epart,MATERIAL=COPPER
*NSET,NSET=N1
1633,1634,1635,1636,1637,1638,1639,1640
*INITIAL CONDITIONS,TYPE=TEMPERATURE
Nair,0.
Npart,0.
Ncoil,0.
*STEP,INC=1000
*ELECTROMAGNETICS,direct
0.000125,0.01
** BC - dof 8 represents electrical potential
** Voltage fixed at node 3191 in domain 2
*BOUNDARY
Nn1,8,8
*AMPLITUDE,NAME=sine1kHz
0.000000,0.0
0.000125,0.707
0.000250,1.0
0.000375,0.707
0.000500,0.0
0.000625,-0.707
0.000750,-1
0.000875,-0.707
0.001000,0.0
0.001125,0.707
0.001250,1.0
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0.010000,0.0
** BC - dof 11 represents electrical potential
*BOUNDARY,AMPLITUDE=sine1kHz
Nplus,11,11,100.
*BOUNDARY
Nminus,11,11,0.
*NODE FILE,FREQUENCY=4
POT,U,NT
*EL FILE,FREQUENCY=4
ECD,EMFE,EMFB
*END STEP
