*************************************
*HEADING
ICEM - ABAQUS INTERFACES VERSION 4.3.1
*************************************
*NODE, NSET=All
1,  0.00000000E+00,  0.00000000E+00,  0.00000000E+00
2,  5.00000000E-01,  0.00000000E+00,  0.00000000E+00
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*ELEMENT,TYPE=C3D20R,ELSET=SOLID_ELSET
      3200,      3626,      4535,      4544,      3635,      3627,      4536,      4545,      3636,     16692,     16716,     16718,     14099,     16695,     16719,     16721,
     14102,     14077,     16694,     16720,     14103
      3199,      3625,      4534,      4543,      3634,      3626,      4535,      4544,      3635,     16689,     16713,     16715,     14096,     16692,     16716,     16718,
     14099,     14074,     16691,     16717,     14100
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*NSET,NSET=BEAM_NSET
         1,         2,         3,         4,         5,         7
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*NSET,NSET=CSD-FIXED-WALLS
         1,         2,         5,         6,         9,        10
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*NSET,NSET=SOLID_NSET
         1,         2,         3,         4,         5,         6
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

*NSET,NSET=LOADS_NSET
  1817, 1801

*********************************************


*BOUNDARY
CSD-FIXED-WALLS, 1,3


*MATERIAL, NAME=mat0
*ELASTIC
  410.0 , 0.3
*DENSITY
1.19E-6

*SOLID SECTION,ELSET=SOLID_ELSET,MATERIAL=mat0

*AMPLITUDE,NAME=A1
0.0,0.0,1.0,1.0,3.0,1.0

********************************************
*STEP,INC=1
*DYNAMIC, DIRECT, SOLVER=SPOOLES
2.E-2, 2.E-2


********************************************
**
**
*CLOAD, AMPLITUDE=A1
LOADS_NSET, 1, 0.200000
**
*NODE FILE
U
*NODE PRINT, NSET=LOADS_NSET
U
*EL FILE,ELSET=SOLID_ELSET
S

**
**
*END STEP
