**
*NODE
      8205,  -514.19059972  ,  1769.8056655354,  554.36653793101
      8207,  -506.6531720314,  1770.5552931217,  554.40442249352
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*ELEMENT,TYPE=C3D6,ELSET=padding
     25744,      8271,      8280,      8260,     12654,     12634,     12635
     25745,     12654,     12634,     12635,     12655,     12636,     12637
     25764,      9071,      9072,      9054,     14108,     14110,     14109
     25765,     14108,     14110,     14109,     14111,     14113,     14112
     25766,      9095,      9083,      9096,     14174,     14176,     14175
     25767,     14174,     14176,     14175,     14177,     14179,     14178
*ELEMENT,TYPE=C3D6,ELSET=trim
     30728,     15019,     15856,     15857,     15018,     15852,     15853
     30729,     14112,     14111,     14113,     15019,     15856,     15857
     30738,     17063,     18942,     18943,     17062,     18940,     18941
     30739,     14178,     14177,     14179,     17063,     18942,     18943
     30746,     19875,     19874,     19873,     19872,     19871,     19870
     30747,     12637,     12655,     12636,     19875,     19874,     19873
*ELEMENT,TYPE=C3D8,ELSET=padding
     28714,      8239,      8232,      8243,      8252,     12579,     12592,     12591,
     12590
     28715,     12579,     12592,     12591,     12590,     12581,     12595,     12594,
     12593
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*ELEMENT,TYPE=C3D8,ELSET=trim
     30766,     19229,     16616,     16160,     16161,     19225,     16614,     16156,
     16157
     30767,     14219,     14214,     12521,     12512,     19229,     16616,     16160,
     16161
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*NSET, NSET=disp
     14652,     14760,     14780,     14912,     14925,     14926
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*NSET, NSET=fix
      8205,      8207,      8211,      8216,      8222,      8228
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*AMPLITUDE, NAME =a1
0.0       ,0.0
1.0       ,1.0
*SOLID SECTION, ELSET=padding, MATERIAL=pad-mat
*SOLID SECTION, ELSET=trim, MATERIAL=trim-mat
*MATERIAL, NAME=pad-mat
*HYPERFOAM, N =  2
0.01736, 18.546, 0.00006173, -2.28, 1.0000E-05, 1.0000E-05
*MATERIAL, NAME=trim-mat
*ELASTIC
3.0,0.4
*boundary
fix,1,3,0.0
disp,1,2,0.0
*STEP,NLGEOM,INC=999
*STATIC
0.01,1.0,1.0E-08,0.1
*BOUNDARY,amplitude=a1
disp,3,3,-8.0
*NODE FILE, FREQUENCY = 1
RF, U
*NODE PRINT, FREQUENCY = 1
RF
*OUTPUT, FIELD
*NODE OUTPUT
RF, U
*ELEMENT OUTPUT
S
*END STEP
*****
