**
** ABAQUS Input Deck Generated by HyperMesh Version  : 13.0.110.31
** Generated using HyperMesh-Abaqus Template Version : 13.0.110
**
**   Template:  ABAQUS/EXPLICIT
**
*NODE
         1,  25.0           ,  -25.0          ,  2.842170943E-14
         2,  25.0           ,  -3.55271368E-15,  0.0
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**HWCOLOR COMP          1    10
*ELEMENT,TYPE=C3D8R,ELSET=balken
        17,        24,        22,        19,        18,        28,        31,        30,
        29
        18,        28,        31,        30,        29,        32,        35,        34,
        33
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**HM_PROP_ID          1
**HM_comp_by_property "property1"    11
*SOLID SECTION, ELSET=balken, MATERIAL=material1
**HMNAME MATS          1 material1    11
*MATERIAL, NAME=material1
*DENSITY
7.8000E-09,0.0
*ELASTIC, TYPE = ISOTROPIC
210000.0  ,0.3       ,0.0
*AMPLITUDE, NAME =amp, DEFINITION = TABULAR
0.0       ,0.0
0.2       ,1.0
**HMNAME CURVE          1 amp
**HMNAME LOADSTEP          1 step
*STEP, INC=1000,
*DYNAMIC, EXPLICIT
        0.0  ,       0.2,          ,
**HWNAME LOADCOL          1 bc
**HWCOLOR LOADCOL          1    11
*BOUNDARY
        11,1,3,0.0
        12,1,3,0.0
        13,1,3,0.0
        70,1,3,0.0
        71,1,3,0.0
        72,1,3,0.0
        73,1,3,0.0
        80,1,3,0.0
        81,1,3,0.0
**HWNAME LOADCOL          2 cload
**HWCOLOR LOADCOL          2    11
*CLOAD, AMPLITUDE = amp
         1,2,10.0
         2,2,10.0
         3,2,10.0
        46,2,10.0
        47,2,10.0
        50,2,10.0
        51,2,10.0
        76,2,10.0
        77,2,10.0

*NODE FILE
U,
*EL FILE
S,
E,
*END STEP
