** ALP BLADE
** Job name: correct Model name: Model-1
** Generated by: Abaqus/CAE 6.12-2
*MATERIAL, NAME=mat0
*ELASTIC, TYPE=ISOTROPIC
20e9, 0.3
*DENSITY
2300
*NODE
      1, -0.0430000015, -0.00200000009,  -1.64999998
      2, -0.0430000015, -0.00179999997,  -1.64999998
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*ELEMENT,TYPE=S8R,ELSET=STRUCT
  1, 2123,   22,  517,  163, 2131, 2132, 2133, 2134
  2,   22,   23,  518,  517, 2135, 2136, 2137, 2132
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*NSET, NSET=SURF4-TIP
   16,   17,   18,   19,   20,   21
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*ELSET, ELSET=SURF4-TIP, GENERATE
 2073,  2107,     1
*NSET, NSET=ROOT
   10,   12,   14,  174,  175,  176
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*NSET, NSET=SURF2-DOWN
   11,   12,   14,   15,   19,   21
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*ELSET, ELSET=SURF2-DOWN
  479,  480,  481,  482,  483,  484
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*NSET, NSET=SURF3-UP
   14,   15,   20,   21,  178,  179
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*ELSET, ELSET=LEADING-EDGE
    1,    2,    3,    4,    5,    6
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*ELSET, ELSET=MIDDLE-ZONE
  371,  372,  373,  374,  375,  376
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*NSET, NSET=SURF1
    9,   10,   11,   12,   13,   16
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**
**FIRST_MARK
*SHELL SECTION,MATERIAL=mat0,ELSET=STRUCT,OFFSET=0.5
0.002
*SHELL SECTION,MATERIAL=mat0,ELSET=SURF4-TIP,OFFSET=0.5
0.001
*SHELL SECTION,MATERIAL=mat0,ELSET=MIDDLE-ZONE,OFFSET=0.5
0.0005
*SHELL SECTION,MATERIAL=mat0,ELSET=LEADING-EDGE,OFFSET=0.5
0.0001
**SECOND_MARK
*STEP, INC=100, NLGEOM
*STATIC
0.01, 1
**
**
*BOUNDARY
ROOT, 1, 6
**
**CLOAD
*DLOAD
SURF2-DOWN,P,10
**
*NODE FILE
U
*EL FILE
S
**
**
*END STEP
