**
** ABAQUS Input Deck Generated by HyperMesh Version  : 13.0.110.31
** Generated using HyperMesh-Abaqus Template Version : 13.0.110
**
**   Template:  ABAQUS/STANDARD 3D
**
*NODE
         1,  59.628765396626,  6.513953941E-09,  -28.5146065489
         2,  59.63073506667 ,  2.4861924738592,  -28.40626608093
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**HWCOLOR COMP          2    49
*ELEMENT,TYPE=S3,ELSET=Middle Surface
         1,       168,       170,       167
         2,       167,       172,       101
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**HM_PROP_ID          1
**HM_comp_by_property "property1"    11
*SHELL SECTION, ELSET=Middle Surface, MATERIAL=stol194
0.6       ,
*NSET, NSET=halsset
      6805,      6806,      6807,      6808,      6809,      6810
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*NSET, NSET=bodenset
       723,       724,       725,       726,       727,       728
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**HMNAME MATS          1 stol194    11
*MATERIAL, NAME=stol194
*DENSITY
8.9000E-09,0.0
*ELASTIC, TYPE = ISOTROPIC
125000.0  ,0.33      ,0.0
*PLASTIC
409.065   ,0.0       ,0.0
418.32    ,1.0395E-03,0.0
423.96    ,0.00213771,0.0
427.8     ,0.00323476,0.0
432.48    ,0.00476861,0.0
436.9     ,0.00645908,0.0
440.368   ,0.0083649 ,0.0
443.4     ,0.0105244 ,0.0
446.6     ,0.01321231,0.0
449.16    ,0.0155977 ,0.0
450.76    ,0.01736828,0.0
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475.56    ,0.09381814,0.0
**HMNAME LOADSTEP          1 ls
*STEP
*STATIC
**HWNAME LOADCOL          1 bchals
**HWCOLOR LOADCOL          1    11
*BOUNDARY
halsset,1, ,1.0
halsset,2, ,0.0
halsset,3, ,0.0
**HWNAME LOADCOL          2 bcboden
**HWCOLOR LOADCOL          2    11
*BOUNDARY
bodenset,1,6,0.0
*NODE FILE
U,
RF,
*EL FILE
S,
E,
*END STEP
*****
