*HEADING
Model: gg Date: 21/06/2010  23:57:23
**
** COORDINATES
**
*NODE, NSET=NALL
       1,   0.0000000    ,   45.000000    ,   0.0000000
       2,   50.000000    ,   45.000000    ,   0.0000000
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**
** TRANSFORMATIONS
**
*NSET, NSET=T1
       4
*TRANSFORM, NSET=T1    , TYPE=R
 -10.000    ,  10.000    ,  0.0000    , -10.000    ,  10.000    ,  10.000
**
** ELEMENT TOPOLOGY
**
*Solid Section, elset=E1   , material=M1
   1.000
*ELEMENT, TYPE=CPS8  ,ELSET=E1
       1,       1,      63,      65,       6,      64,      78,      79,       5
       2,      63,       4,      60,      65,      62,      61,      80,      78
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**
** MATERIAL PROPERTIES
**
**
** M1
*MATERIAL, NAME=M1
*ELASTIC, TYPE=ISOTROPIC
    200000.    ,  0.30000
*DENSITY
   0.785000E-08,
*EXPANSION, TYPE=ISO
   0.120000E-04,
**
** EARTH SPRINGS
**
**
** FIXED FREEDOMS
**
*BOUNDARY
       1, 3
       2, 3
       3, 1, 3
       4, 2, 3
       5, 3
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     117, 3
*ELSET, ELSET=ESET_S1
        1,        2,        3,        4,        5,        6
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*INITIAL CONDITIONS,TYPE=TEMPERATURE
Nall, 0.0
**
** LOADING
**
*Step
Case    1  fgf time increment:    1.0000
*Static, SOLVER=SPOOLES
1.0, 1.0, 1e-05, 1.0
**
** LOADS
**
**
**
**  Load  Case
**     1   1 Line  L1   , traction      0.0 , Pressure  5.
**
*Cload,OP=NEW
      1,2,  -2.9761907
      2,2,  -2.9761893
      5,2,  -11.904762
      6,2,  -5.9523814
      7,2,  -11.904761
      8,2,  -5.9523808
      9,2,  -11.904763
     10,2,  -5.9523816
     11,2,  -11.904760
     12,2,  -5.9523828
     13,2,  -11.904763
     14,2,  -5.9523795
     15,2,  -11.904760
     16,2,  -5.9523828
     17,2,  -11.904763
     18,2,  -5.9523787
     19,2,  -11.904763
     20,2,  -5.9523828
     21,2,  -11.904760
     22,2,  -5.9523795
     23,2,  -11.904763
     24,2,  -5.9523828
     25,2,  -11.904760
     26,2,  -5.9523828
     27,2,  -11.904763
     28,2,  -5.9523795
     29,2,  -11.904760
     30,2,  -5.9523828
     31,2,  -11.904763
** OUTPUT REQUESTS
**
*EL PRINT, ELSET=E1
S
*NODE FILE
U, RF
*EL FILE
S
*End Step
