** add mesh file or file with groups into calculation
** after 'input=' name of file with extention
** file should be placed in working folder (change filename if needed)

*node, nset=Nall
1, 0.000000e+00, 0.000000e+00, 1.000000e+01
2, 0.000000e+00, 0.000000e+00, 0.000000e+00
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*nset, nset=fix
2, 56, 331, 332, 8, 4
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*nset, nset=fix2
10, 16, 12, 14, 140, 431
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*nset, nset=master
3, 8, 4, 7, 37, 38
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*nset, nset=slave
10, 9, 13, 14, 141, 433
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*nset, nset=Fy
1, 3, 5, 7, 36, 309
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*element, elset=C3D20,type=C3D20
409, 1, 35, 163, 36, 98, 201, 261, 222, 308, 495, 498, 309, 595,
802, 801, 680, 379, 594, 803, 677,
410, 98, 201, 261, 222, 5, 75, 164, 76, 595, 802, 801, 680, 352,
499, 500, 353, 380, 614, 804, 679,
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
*elset, elset=beam
409, 410, 411, 412, 413, 414
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*elset, elset=reinf
489, 490, 491, 492, 493, 494
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** Surfaces based on master
*SURFACE, NAME=Smaster
411, S5
487, S5
412, S5
488, S5
483, S5
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416, S5
** Surfaces based on slave
*SURFACE, NAME=Sslave
489, S3
525, S3
490, S3
526, S3
521, S3
517, S3
513, S3
509, S3
505, S3
501, S3
497, S3
493, S3
522, S3
518, S3
514, S3
510, S3
506, S3
502, S3
498, S3
494, S3
** Names based on reinf
*NSET,NSET=Nreinf
9,
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*ELSET,ELSET=Ereinf
489,
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

*MATERIAL,NAME=some
*ELASTIC
2e11,0.3

*MATERIAL,NAME=weak
*ELASTIC
1e1,0.3


**for body elements, 2d plane stress and strain
*SOLID SECTION,MATERIAL=some,ELSET=beam
*SOLID SECTION,MATERIAL=weak,ELSET=reinf


*CONTACT PAIR,INTERACTION=SI1,TYPE=SURFACE TO SURFACE
Sslave,Smaster


*SURFACE INTERACTION,NAME=SI1
*SURFACE BEHAVIOR,PRESSURE-OVERCLOSURE=TIED
1e-2

*FRICTION
1,1e-2


*BOUNDARY
fix,1,3,0


*AMPLITUDE,TIME=TOTAL TIME,NAME=A1
0,0,2,1

*STEP
*STATIC
0.25,1,


** boundary conditions (load)
*CLOAD
Fy,2,1e6


*NODE FILE
U

*EL FILE
S
*END STEP


*STEP
*STATIC
0.25,1,


*CHANGE SOLID SECTION,MATERIAL=some,ELSET=reinf,

*CHANGE SURFACE BEHAVIOR,INTERACTION=SI1
*SURFACE BEHAVIOR,PRESSURE-OVERCLOSURE=TIED
1e16

*CHANGE FRICTION,INTERACTION=SI1
*FRICTION
1,1e16

*NODE FILE
U

*EL FILE
S
*END STEP
