** add mesh file or file with groups into calculation
** after 'input=' name of file with extention
** file should be placed in working folder (change filename if needed)

*node, nset=Nall
1, 1.000000e+00, 5.000000e+00, 0.000000e+00
2, 1.000000e+00, 5.000000e+00, 1.000000e+00
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*nset, nset=fix1
4, 7, 85, 1036, 86, 1037, 87,
1038, 1039,
*nset, nset=fix2
12, 10, 154, 1112, 155, 1113, 156,
1114, 1115,
*nset, nset=load
132, 1088, 133, 1089, 134, 1090
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*nset, nset=sec
6, 1433, 274, 1434, 1435, 275
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*element, elset=C3D10,type=C3D10
1753, 779, 397, 29, 217, 3265, 1856, 3264, 3266, 3267, 1213,
1754, 628, 885, 590, 629, 3268, 3269, 2720, 2724, 3270, 2722,
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
** Surfaces based on sec
*SURFACE, NAME=Ssec
3144, S2
2266, S3
4286, S4
4348, S2
4286, S2
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3950, S2

*MATERIAL,NAME=steel
*ELASTIC
29000,0.3


**for body elements, 2d plane stress and strain
*SOLID SECTION,MATERIAL=steel,ELSET=C3D10


** directions <dir> can be 1,2,3 for bodies
** and 1 to 6 for shells and beams (4,5,6 - to fix rotation)
**
*BOUNDARY
fix1,1,3,0
fix2,3,3,0

** repeat last line, if needed


** surfaces are used to define contact (including tied contact).
*SURFACE,NAME=secs,TYPE=NODE
sec


*STEP
*STATIC

** boundary conditions (load)

** to create file <name>.dlo based on nodal set <name>
** run mesh file in cgx (pre-processor mode) and apply cards below:
** comp <name> do
** send <name> abq pres <value>
** <name>.dlo file will be created in working folder

*DLOAD
** Pressure based on load
2072, P2, 1.000000e+00
1956, P3, 1.000000e+00
2626, P1, 1.000000e+00
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4171, P4, 1.000000e+00


** Output (frd file)
**Displacements
*NODE FILE
U

**Stress (add other types, if needed)
*EL FILE
S


** Section forces, section moments and section areas
** (key=SOF or key=SOM or key=SOAREA),
** only makes sense for structural calculations
** define surface with card (see general>contact)
** sample

*SECTION PRINT,SURFACE=Ssec,NAME=SP1
SOF,SOM


*END STEP
