*HEADING
Model: ip Date: 07/02/2010  19:20:09
**
** COORDINATES
**
*NODE, NSET=NALL
       1,   70.000000    ,   35.000000    ,   0.0000000
       2,   35.000000    ,   70.000000    ,   0.0000000
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**
** ELEMENT TOPOLOGY
**
*ELEMENT, TYPE=CPE8  ,ELSET=E1
       1,      77,      79,     386,     385,      78,     798,     799,     800
       2,      79,      81,     387,     386,      80,     801,     802,     798
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**
** MATERIAL PROPERTIES
**
**
** M1
*MATERIAL, NAME=M1
*ELASTIC, TYPE=ISOTROPIC
    200000.    ,  0.30000
*DENSITY
   0.785000E-08,
*EXPANSION, TYPE=ISO
   0.120000E-04,
**
** EARTH SPRINGS
**
**
** FIXED FREEDOMS
**
*BOUNDARY
       1, 2, 3
       2, 1
       2, 3
       3, 2, 3
       4, 1
       4, 3
       5, 2, 3
       6, 1
       6, 3
       7, 2, 3
       8, 1
       8, 3
*ORIENTATION,NAME=OR1,SYSTEM=CYLINDRICAL
0.,0.,-1.,0.,0.,1.
*Solid Section, elset=E1, material=M1,ORIENTATION=OR1
*INITIAL CONDITIONS,TYPE=TEMPERATURE
Nall, 0.0
**
** LOADING
**
*Step
Case    1  hgh
*Static, SOLVER=SPOOLES
1.0, 1.0, 1e-05, 1.0
**
** LOADS
**
**
**
**  Load  Case
**     1   1 Line  L7   , traction      0.0 , Pressure  50.
**
*Cload,OP=NEW
      7,1,  -16.370869
      7,2, -0.24766048E-03
      8,1, -0.24766048E-03
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    345,2,  -65.382578
**
**
**  Load  Case
**     2   1 Line  L6   , traction      0.0 , Pressure  50.
**
      6,1, -0.24766048E-03
      6,2,   16.370869
      7,1,  -16.370869
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    306,2,   2.5688885
**
**
**  Load  Case
**     3   1 Line  L5   , traction      0.0 , Pressure  50.
**
      5,1,   16.370869
      5,2,  0.24766048E-03
      6,1,  0.24766048E-03
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    267,2,   65.382578
**
**
**  Load  Case
**     4   1 Line  L8   , traction      0.0 , Pressure  50.
**
      5,1,   16.370869
      5,2, -0.24766048E-03
      8,1,  0.24766048E-03
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    384,2,  -2.5688885
** OUTPUT REQUESTS
**
*El Print,GLOBAL=NO
S
*Node Print
U, RF
*NODE FILE
U, RF
*EL FILE,POSITION=AVERAGED AT NODES,GLOBAL=NO
S
*End Step
