*Heading
** Job name: Job Model name: Model-1
** Generated by: Abaqus/CAE 6.12-3
** ----------------------------------------------------------------
**
** PART INSTANCE: Plate
**
*Node, nset=Nall
      1,           0.,           0.,           0.
      2,   3.33333325,           0.,           0.
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*Element, type=S8R, elset=Eall
 1,  1,  2,  6,  5, 17, 18, 19, 20
 2,  2,  3,  7,  6, 21, 22, 23, 18
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
 *Nset, nset=Plate_allfaces
  1, 2, 3, 4, 5, 6
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
 *Elset, elset=Plate_allfaces
 1, 2, 3, 4, 5, 6, 7, 8,  9
*Nset, nset="Plate_Nodes Left"
  1,  5,  9, 13, 20, 29, 36
*Nset, nset="Plate_Nodes Right"
  4,  8, 12, 16, 25, 32, 39
*Nset, nset="Plate_Nodes Bottom"
  1,  2,  3,  4, 17, 21, 24
*Nset, nset="Plate_Nodes Top"
 13, 14, 15, 16, 35, 38, 40
*Nset, nset=Plate_Nodes_Left_no_Corner
 5,  9, 20, 29, 36
*Nset, nset="Plate_Nodes Right no Corner"
 8, 12, 25, 32, 39
*Nset, nset=Plate_Loading_Node_Right
 39,
*Nset, nset=Plate_Slave_nodes_right
 8, 12, 25, 32

*Elset, elset=Plate_CompositeLayup-1
 1,  2,  3,  4,  5,  6,  7,  8,  9


*Nset, nset=Set1_Bot_Top_Node0
 1,
*Nset, nset=Set2_Bot_Top_Node0
 13,
*Nset, nset=Set1_Bot_Top_Node1
 17,
*Nset, nset=Set2_Bot_Top_Node1
 35,
*Nset, nset=Set1_Bot_Top_Node2
 2,
*Nset, nset=Set2_Bot_Top_Node2
 14,
*Nset, nset=Set1_Bot_Top_Node3
 21,
*Nset, nset=Set2_Bot_Top_Node3
 38,
*Nset, nset=Set1_Bot_Top_Node4
 3,
*Nset, nset=Set2_Bot_Top_Node4
 15,
*Nset, nset=Set1_Bot_Top_Node5
 24,
*Nset, nset=Set2_Bot_Top_Node5
 40,
*Nset, nset=Set1_Bot_Top_Node6
 4,
*Nset, nset=Set2_Bot_Top_Node6
 16,

*Nset, nset="_T-Datum csys-1"
Plate_Nodes_Left_no_Corner,
Plate_Loading_Node_Right,
Set1_Bot_Top_Node0,
Set2_Bot_Top_Node0,
Set1_Bot_Top_Node1,
Set2_Bot_Top_Node1,
Set1_Bot_Top_Node2,
Set2_Bot_Top_Node2,
Set1_Bot_Top_Node3,
Set2_Bot_Top_Node3,
Set1_Bot_Top_Node4,
Set2_Bot_Top_Node4,
Set1_Bot_Top_Node5,
Set2_Bot_Top_Node5,
Set1_Bot_Top_Node6,
Set2_Bot_Top_Node6,
Plate_Slave_nodes_right,
**Transform, nset="_T-Datum csys-1"
**1.,0.,0.,0.,1.,0.

*Equation
2
1, 1, 1.,13, 1, -1.

** Constraint: Bot_Top-0_U2
*Equation
2
1, 2, 1.,13, 2, -1.

** Constraint: Bot_Top-0_U3
*Equation
2
1, 3, 1.,13, 3, -1.

** Constraint: Bot_Top-0_UR1
*Equation
2
1, 4, 1.,13, 4, -1.

** Constraint: Bot_Top-0_UR2
*Equation
2
1, 5, 1.,13, 5, -1.

** Constraint: Bot_Top-0_UR3
*Equation
2
1, 6, 1.,13, 6, -1.

** Constraint: Bot_Top-1_U1
*Equation
2
17, 1, 1.,35, 1, -1.

** Constraint: Bot_Top-1_U2
*Equation
2
17, 2, 1.,35, 2, -1.

** Constraint: Bot_Top-1_U3
*Equation
2
17, 3, 1.,35, 3, -1.

** Constraint: Bot_Top-1_UR1
*Equation
2
17, 4, 1.,35, 4, -1.

** Constraint: Bot_Top-1_UR2
*Equation
2
17, 5, 1.,35, 5, -1.

** Constraint: Bot_Top-1_UR3
*Equation
2
17, 6, 1.,35, 6, -1.

** Constraint: Bot_Top-2_U1
*Equation
2
2, 1, 1.,14, 1, -1.

** Constraint: Bot_Top-2_U2
*Equation
2
2, 2, 1.,14, 2, -1.

** Constraint: Bot_Top-2_U3
*Equation
2
2, 3, 1.,14, 3, -1.

** Constraint: Bot_Top-2_UR1
*Equation
2
2, 4, 1.,14, 4, -1.

** Constraint: Bot_Top-2_UR2
*Equation
2
2, 5, 1.,14, 5, -1.

** Constraint: Bot_Top-2_UR3
*Equation
2
2, 6, 1.,14, 6, -1.

** Constraint: Bot_Top-3_U1
*Equation
2
21, 1, 1.,38, 1, -1.

** Constraint: Bot_Top-3_U2
*Equation
2
21, 2, 1.,38, 2, -1.

** Constraint: Bot_Top-3_U3
*Equation
2
21, 3, 1.,38, 3, -1.

** Constraint: Bot_Top-3_UR1
*Equation
2
21, 4, 1.,38, 4, -1.

** Constraint: Bot_Top-3_UR2
*Equation
2
21, 5, 1.,38, 5, -1.

** Constraint: Bot_Top-3_UR3
*Equation
2
21, 6, 1.,38, 6, -1.

** Constraint: Bot_Top-4_U1
*Equation
2
3, 1, 1.,15, 1, -1.

** Constraint: Bot_Top-4_U2
*Equation
2
3, 2, 1.,15, 2, -1.

** Constraint: Bot_Top-4_U3
*Equation
2
3, 3, 1.,15, 3, -1.

** Constraint: Bot_Top-4_UR1
*Equation
2
3, 4, 1.,15, 4, -1.

** Constraint: Bot_Top-4_UR2
*Equation
2
3, 5, 1.,15, 5, -1.

** Constraint: Bot_Top-4_UR3
*Equation
2
3, 6, 1.,15, 6, -1.

** Constraint: Bot_Top-5_U1
*Equation
2
24, 1, 1.,40, 1, -1.

** Constraint: Bot_Top-5_U2
*Equation
2
24, 2, 1.,40, 2, -1.

** Constraint: Bot_Top-5_U3
*Equation
2
24, 3, 1.,40, 3, -1.

** Constraint: Bot_Top-5_UR1
*Equation
2
24, 4, 1.,40, 4, -1.

** Constraint: Bot_Top-5_UR2
*Equation
2
24, 5, 1.,40, 5, -1.

** Constraint: Bot_Top-5_UR3
*Equation
2
24, 6, 1.,40, 6, -1.

** Constraint: Bot_Top-6_U1
*Equation
2
4, 1, 1.,16, 1, -1.

** Constraint: Bot_Top-6_U2
*Equation
2
4, 2, 1.,16, 2, -1.

** Constraint: Bot_Top-6_U3
*Equation
2
4, 3, 1.,16, 3, -1.

** Constraint: Bot_Top-6_UR1
*Equation
2
4, 4, 1.,16, 4, -1.

** Constraint: Bot_Top-6_UR2
*Equation
2
4, 5, 1.,16, 5, -1.

** Constraint: Bot_Top-6_UR3
*Equation
2
4, 6, 1.,16, 6, -1.
*Equation
2
8, 1, 1., 39, 1, -1.
*Equation
2
12, 1, 1., 39, 1, -1.
*Equation
2
25, 1, 1., 39, 1, -1.
*Equation
2
32, 1, 1., 39, 1, -1.
*Equation
2
8, 2, 1., 39, 2, -1.
*Equation
2
12, 2, 1., 39, 2, -1.
*Equation
2
25, 2, 1., 39, 2, -1.
*Equation
2
32, 2, 1., 39, 2, -1.

*Material, name=CYCOM_2703_1737_81_312_110_3_3_3_3_5_5
*Density
 1.31e-09,
*Elastic, type=ENGINEERINGCONSTANTS
156000., 9700., ,0.344,,,5300.,3640.
5300,,

*ORIENTATION,name=ORI0.0,system=RECTANGULAR
1.,0.,0.,0.,1.,0.

*ORIENTATION,name=ORI-45.0,system=RECTANGULAR
0.7071,-0.7071,0.,0.7071,0.7071,0.

*ORIENTATION,name=ORI45.0,system=RECTANGULAR
0.7071,0.7071,0.,-0.7071,0.7071,0.

*ORIENTATION,name=ORI90.0,system=RECTANGULAR
0.0,1.0,0.0,-1.0,0.0, 0

*Shell Section, composite,elset=Eall
0.125,,CYCOM_2703_1737_81_312_110_3_3_3_3_5_5,ORI45.0
0.125,,CYCOM_2703_1737_81_312_110_3_3_3_3_5_5,ORI90.0
0.125,,CYCOM_2703_1737_81_312_110_3_3_3_3_5_5,ORI-45.0
0.125,,CYCOM_2703_1737_81_312_110_3_3_3_3_5_5,ORI0.0
0.125,,CYCOM_2703_1737_81_312_110_3_3_3_3_5_5,ORI-45.0
0.125,,CYCOM_2703_1737_81_312_110_3_3_3_3_5_5,ORI90.0
0.125,,CYCOM_2703_1737_81_312_110_3_3_3_3_5_5,ORI45.0


*Step
*Static

*Boundary
Plate_Nodes_Left_no_Corner, 1,1
Plate_Nodes_Left_no_Corner, 2,2
Plate_Nodes_Left_no_Corner, 3,3
Plate_Nodes_Left_no_Corner, 4,4
Plate_Nodes_Left_no_Corner, 5,5
Plate_Nodes_Left_no_Corner, 6,6

*Cload
Plate_Loading_Node_Right, 1, 1e-06
Plate_Loading_Node_Right, 2, 0.
Plate_Loading_Node_Right, 3, 0.

*NODE FILE,OUTPUT=3D
U
*EL FILE
S
*End Step
