*Heading
*Node
      1,           0.,           0.,        26.25
      2,           0.,           0.,           0.
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*Element, type=S4R
  1, 1060, 1109, 1038, 1098
  2, 1071, 1041, 1039, 1073
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*Nset, nset=Bottle-Shell-Small-3X-1_Set-2, generate
    1,  7829,     1
*Elset, elset=Bottle-Shell-Small-3X-1_Set-2, generate
    1,  7827,     1
*Nset, nset=Bottle-Shell-Small-3X-1_Set-3, generate
    1,  7829,     1
*Elset, elset=Bottle-Shell-Small-3X-1_Set-3, generate
    1,  7827,     1
*Nset, nset=Bottle-Shell-Small-3X-1_Set-4, generate
    1,  7829,     1
*Elset, elset=Bottle-Shell-Small-3X-1_Set-4, generate
    1,  7827,     1
** Section: HDPE_Shell
*Shell Section, elset=Bottle-Shell-Small-3X-1_Set-4, material=HDPE_generic, offset=0.5
1.0, 5
** ----------------------------------------------------------------
**
** PART INSTANCE: Part 8 - Rigid-3X-1
**
*Node, nset=rigid_8
7830, 57.0, 180.15, 629.099997
7831, -39.0, 180.15, 629.099997
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*Node, nset=rigid_8
18708, 12.22, 202.65, 662.699988
18708, 12.22, 202.65, 662.699988
29588, 12.22, 202.65, 662.699988
*Nset, nset=right_grip_ref_node
18708,
*Nset, nset=right_grip_rot_node
29588
** ----------------------------------------------------------------
**
** PART INSTANCE: Part 13 - Rigid-3X-1
**
*Node, nset=rigid_13
18709, -57.0, 225.15, 629.099997
18710, 39.0, 225.15, 629.099997
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*Node, nset=rigid_13
29587, -12.22, 202.65, 662.699988
29587, -12.22, 202.65, 662.699988
29589, -12.22, 202.65, 662.699988
*Nset, nset=left_grip_ref_node
29587,
*Nset, nset=left_grip_rot_node
29589,
*Rigid Body, nset=rigid_13, ref node=left_grip_ref_node, rot node=left_grip_rot_node
*Rigid Body, nset=rigid_8, ref node=right_grip_ref_node, rot node=right_grip_rot_node
*Nset, nset=b_Set-8, generate
  7830,  18707,      1
*Nset, nset=b_Set-8, generate
 18709,  29586,      1
*Nset, nset=bottle, generate
    1,  7829,     1
*Elset, elset=bottle, generate
    1,  7827,     1
*Nset, nset=bottle_bottom
    1,    2,    3,    4,    5,   35
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*Elset, elset=bottle_bottom
    1,    2,    3,    4,    5,    6
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*Nset, nset=grips
left_grip_ref_node
*Nset, nset=grips
right_grip_ref_node
*Nset, nset=left-grip
 29587,
*Nset, nset=left_grip_geometry, generate
 18709,  29587,      1
*Nset, nset=right-grip
 18708,
*Nset, nset=right_grip_geometry, generate
  7830,  18708,      1
*Elset, elset=_Bottle_surface_SPOS, generate
    1,  7827,     1
*Surface, type=NODE, name=Bottle_surface
Bottle-Shell-Small-3X-1_Set-2
*Surface, type=NODE, name=Left-grip
rigid_8
*Surface, type=NODE, name=Right-grip
rigid_13
*Surface, type=NODE, name=bottle_bottom
bottle_bottom
***Amplitude, name=shake_1_sinusoid, definition=PERIODIC
**1,           62.83,              0.,              0.
**             0.,              1.
***Amplitude, name=shake_2_sinusoids, definition=PERIODIC
**2,           62.83,              0.,              0.
**             0.,              1.,              0.,              1.
***Amplitude, name=vel_smooth_step, definition=SMOOTH STEP
**             0.,              0.,             0.1,              1.,             0.9,              1.,              1.,              0.
*Material, name=HDPE_generic
*Density
 1.94e-08
*Elastic
1000., 0.45
*Plastic
  8.618,    0.
 13.064, 0.007
 16.787, 0.025
 18.476, 0.044
 20.337, 0.081
 24.543,  0.28
 26.887,  0.59
**
** INTERACTION PROPERTIES
**
*Surface Interaction, name=exp_fric
*Friction
0.5, 5000
*Surface Behavior, pressure-overclosure=EXPONENTIAL
0.001, 1.
**
** BOUNDARY CONDITIONS
**
** Name: bottle_fixed Type: Displacement/Rotation
*Boundary
bottle_bottom, 1, 3, 0
** Name: left_grip_squeeze Type: Displacement/Rotation
*Boundary
left_grip_ref_node, 1, 3, 0
left_grip_rot_node, 1, 3, 0
** Name: right_grip_squeeze Type: Displacement/Rotation
right_grip_ref_node, 1, 3, 0
right_grip_rot_node, 1, 3, 0
*Boundary
**
** INTERACTIONS
**
** Interaction: left_grip_to_bottle
*Contact Pair, interaction=exp_fric, type=SURFACE TO SURFACE
Bottle_surface, Left-grip
** Interaction: right_grip_to_bottle
*Contact Pair, interaction=exp_fric, type=SURFACE TO SURFACE
Bottle_surface, Right-grip
** ----------------------------------------------------------------
**
** STEP: gripper_translate
**
*Step, nlgeom=YES, inc=1000
translate gripper to bottle
*Static
0.1, 1., 1e-05, 1.
**
** BOUNDARY CONDITIONS
**
** Name: grips_translate_squeeze Type: Displacement/Rotation
*Boundary
grips, 2, 2, -150.
grips, 3, 3, -99.
**
** LOADS
**
** Name: gravitational_load   Type: Gravity
*Dload
bottle, GRAV, 9810., 0., -1., 0.
**
** OUTPUT REQUESTS
**
*Restart, write, frequency=0
**
** FIELD OUTPUT: F-Output-1
**
*Output
*Node File
U, V
*Contact File, nset=bottle
CDIS, CSTR, PCON
**
** HISTORY OUTPUT: H-Output-1
**
***Node Output, nset=grips
**U1, U2, U3, UR1, UR2, UR3, V1, V2
**V3, VR1, VR2, VR3
*End Step
