**
**   Structure: cube.
**   Test objective: mixture of equations with 2 and 9 terms.

*NODE
   1,   12.1499996,    2.9000001,   1.04999995
      2,   12.1499996,    2.6583333,   1.04999995
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*ELEMENT, TYPE=C3D8
  1,   66,   67,   80,   79,    1,    2,   15,   14
   2,   67,   68,   81,   80,    2,    3,   16,   15
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*NSET,NSET=NALL,GENERATE
 1,  3120
*NSET,NSET=FIX,GENERATE
 3056,  3120
*NSET,NSET=Ntop,GENERATE
 1,  65
 *Nset, nset=FORCE
 1,
**MATERIAL,NAME=ELASTIC_FIBER
*MATERIAL,NAME=ELASTIC
*ELASTIC
5,0.45
**USER MATERIAL,CONSTANTS=10
**0.0229719,0.,0.760803772,0.648981987,0.279109,129.69,0.520930316,-0.853598207,
**0.279109,   129.69
*ELSET,ELSET=EALL,GENERATE
 1,  2256
*SOLID SECTION,ELSET=EALL,MATERIAL=ELASTIC
*STEP,NLGEOM
*STATIC
0.01, 1.,,0.1
*BOUNDARY
FIX,1
FIX,2
FIX,3
*BOUNDARY
Ntop,2
Ntop,3
**CLOAD
**FORCE,1,5.
*DLOAD
1, P2, -1.
2, P2, -1.
3, P2, -1.
4, P2, -1.
5, P2, -1.
6, P2, -1.
7, P2, -1.
8, P2, -1.
9, P2, -1.
10, P2, -1.
11, P2, -1.
12, P2, -1.
13, P2, -1.
14, P2, -1.
15, P2, -1.
16, P2, -1.
17, P2, -1.
18, P2, -1.
19, P2, -1.
20, P2, -1.
21, P2, -1.
22, P2, -1.
23, P2, -1.
24, P2, -1.
25, P2, -1.
26, P2, -1.
27, P2, -1.
28, P2, -1.
29, P2, -1.
30, P2, -1.
31, P2, -1.
32, P2, -1.
33, P2, -1.
34, P2, -1.
35, P2, -1.
36, P2, -1.
37, P2, -1.
38, P2, -1.
39, P2, -1.
40, P2, -1.
41, P2, -1.
42, P2, -1.
43, P2, -1.
44, P2, -1.
45, P2, -1.
46, P2, -1.
47, P2, -1.
48, P2, -1.
*NODE FILE,NSET=NALL
U
*EL FILE,ELSET=EALL
S,E
*NODE PRINT,NSET=FORCE
U
*END STEP
