*NODE, NSET=Nall
       1,-1.000000000000e+01,-5.000000000000e+01,0.000000000000e+00
       2,-1.000000000000e+01,5.000000000000e+01,0.000000000000e+00
       3,1.000000000000e+01,-5.000000000000e+01,0.000000000000e+00
       4,1.000000000000e+01,5.000000000000e+01,0.000000000000e+00
       5,-1.000000000000e+01,3.000000000000e+01,-1.000000000000e+00
       6,-1.000000000000e+01,1.300000000000e+02,-1.000000000000e+00
       7,1.000000000000e+01,3.000000000000e+01,-1.000000000000e+00
       8,1.000000000000e+01,1.300000000000e+02,-1.000000000000e+00
       9,-1.000000000000e+01,-4.500000000000e+01,0.000000000000e+00
      10,-1.000000000000e+01,-4.000000000000e+01,0.000000000000e+00
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*ELEMENT, TYPE=S8R, ELSET=Eall
    97,      2,     50,     97,     27,    255,    308,    307,    230
    98,     50,     51,     98,     97,    256,    310,    309,    308
    99,     51,     52,     99,     98,    257,    312,    311,    310
   100,     52,      4,     49,     99,    258,    254,    313,    312
   101,     27,     97,    100,     26,    307,    315,    314,    229
   102,     97,     98,    101,    100,    309,    317,    316,    315
   103,     98,     99,    102,    101,    311,    319,    318,    317
   104,     99,     49,     48,    102,    313,    253,    320,    319
   105,     26,    100,    103,     25,    314,    322,    321,    228
   106,    100,    101,    104,    103,    316,    324,    323,    322
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** Names based on slave
*NSET,NSET=slave
5,
6,
7,
8,
53,
54,
55,
56,
57,
58,
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** Names based on S8R
*ELSET,ELSET=S8R
97,
98,
99,
100,
101,
102,
103,
104,
105,
106,
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** Names based on master
*NSET,NSET=master
1,
2,
3,
4,
9,
10,
11,
12,
13,
14,
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** Names based on fix
*NSET,NSET=fix
1,
3,
28,
29,
30,
231,
232,
233,
234,
** Names based on movedz
*NSET,NSET=movedz
6,
8,
94,
95,
96,
303,
304,
305,
306,
** Surfaces based on fix
*SURFACE, NAME=fix
** Surfaces based on slave
*SURFACE, NAME=slave
177, SPOS
253, SPOS
180, SPOS
256, SPOS
181, SPOS
185, SPOS
189, SPOS
193, SPOS
197, SPOS
201, SPOS
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** Surfaces based on master
*SURFACE, NAME=master
173, SPOS
97, SPOS
176, SPOS
100, SPOS
169, SPOS
165, SPOS
161, SPOS
157, SPOS
153, SPOS
149, SPOS
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** Surfaces based on movedz
*SURFACE, NAME=movedz
** Surfaces based on all
*SURFACE, NAME=all
173, SPOS
97, SPOS
176, SPOS
100, SPOS
177, SPOS
253, SPOS
180, SPOS
256, SPOS
169, SPOS
165, SPOS
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** Surfaces based on S8R
*SURFACE, NAME=S8R

*MATERIAL,NAME=steel
*ELASTIC
2.0000E+05,0.28


*DENSITY
7.8500E-09
*EXPANSION
1.3000E-05


*SHELL SECTION,ELSET=Eall,COMPOSITE
1.0000E-01,,steel
1.0000E-01,,steel
1.0000E-01,,steel
1.0000E-01,,steel
1.0000E-01,,steel
1.0000E-01,,steel
1.0000E-01,,steel
1.0000E-01,,steel
1.0000E-01,,steel
1.0000E-01,,steel

*BOUNDARY
fix,1,1,0
fix,2,2,0
fix,3,3,0
fix,4,4,0

*BOUNDARY
movedz,1,1,0
movedz,2,2,0
movedz,3,3,50
movedz,4,4,0

*CONTACT PAIR,INTERACTION=SI2,TYPE=SURFACE TO SURFACE,ADJUST=0
slave,master
*SURFACE INTERACTION,NAME=SI2
*SURFACE BEHAVIOR,PRESSURE-OVERCLOSURE=Linear
10000000,0


*TIME POINTS,NAME=T1,GENERATE
0,1,1.0000E-01

*STEP,NLGEOM,INC=1000
*STATIC
0.1,1
  *NODE FILE ,TIME POINTS=T1
U,
  *EL FILE,TIME POINTS=T1
S,
*NODE PRINT,NSET=fix,TIME POINTS=T1
RF
*NODE PRINT,NSET=movedz,TIME POINTS=T1
RF
*CONTACT OUTPUT
CDIS,CSTR
*END STEP
