*NODE, NSET=Nall
       1,-5.000000000000e-02,-5.000000000000e-01,0.000000000000e+00
       2,-5.000000000000e-02,5.000000000000e-01,0.000000000000e+00
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*ELEMENT, TYPE=S8R, ELSET=Eall
   177,      2,     47,    177,     90,    450,    588,    587,    495
   178,     90,    177,    178,     91,    587,    590,    589,    496
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** Names based on bot
*NSET,NSET=bot
1,
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*ELSET,ELSET=bot
177,
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** Names based on S8R
*ELSET,ELSET=S8R
177,
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** Names based on load
*NSET,NSET=load
6,
8,
174,
175,
176,
583,
584,
585,
586,
** Names based on fix2
*NSET,NSET=fix2
1,
3,
48,
49,
50,
451,
452,
453,
454,
** Names based on fix1
*NSET,NSET=fix1
5,
7,
132,
133,
134,
539,
540,
541,
542,
** Names based on top
*NSET,NSET=top
5,
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*ELSET,ELSET=top
337,
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** Surfaces based on fix2
*SURFACE, NAME=fix2
** Surfaces based on load
*SURFACE, NAME=load
** Surfaces based on bot
*SURFACE, NAME=bot
333, SPOS
177, SPOS
336, SPOS
180, SPOS
329, SPOS
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331, SPOS
** Surfaces based on all
*SURFACE, NAME=all
333, SPOS
177, SPOS
336, SPOS
180, SPOS
337, SPOS
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491, SPOS
** Surfaces based on fix1
*SURFACE, NAME=fix1
** Surfaces based on S8R
*SURFACE, NAME=S8R
** Surfaces based on top
*SURFACE, NAME=top
337, SPOS
493, SPOS
340, SPOS
496, SPOS
341, SPOS
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491, SPOS

*MATERIAL,NAME=steel
*ELASTIC
2.0000E+11,0.28
*DENSITY
7.8500E+03
*EXPANSION
1.3000E-05


*SHELL SECTION,MATERIAL=steel,ELSET=top,,OFFSET=0.0000E+00
6.0000E-03

*SHELL SECTION,MATERIAL=steel,ELSET=bot,,OFFSET=0.0000E+00
4.0000E-03

*BOUNDARY
fix2,1,1,0
fix2,2,2,0
fix2,3,3,0
fix2,4,4,0
fix2,5,5,0
fix2,6,6,0

*BOUNDARY
fix1,1,1,0
fix1,2,2,0
fix1,3,3,0
fix1,4,4,0
fix1,5,5,0
fix1,6,6,0

*CONTACT PAIR,INTERACTION=SI1,TYPE=SURFACE TO SURFACE
top,bot
*SURFACE INTERACTION,NAME=SI1
*SURFACE BEHAVIOR,PRESSURE-OVERCLOSURE=Linear
10000000000000,0


*STEP
*STATIC
*CLOAD
load,3,-1.1111E+01

  *NODE FILE
U,
  *EL FILE
S,
*NODE PRINT,NSET=fix2
RF
*NODE PRINT,NSET=fix1
RF
*CONTACT OUTPUT
CDIS,CSTR
*END STEP
