**Shell Structure
**
*NODE, NSET=Nall
       1,0.000000000000e+00,5.551115123126e-17,0.000000000000e+00
       2,5.580000000000e-01,5.551115123126e-17,0.000000000000e+00
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*ELEMENT, TYPE=S8R, ELSET=Eall
     1,      1,      6,    233,    231,      5,    848,    849,    232
     2,      6,      8,    234,    233,      7,    850,    851,    848
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*NSET, NSET=FIX
1,2,5,6,7,8
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*BOUNDARY
FIX,1,3
*MATERIAL,NAME=EL
*ELASTIC
70000000000,.3
*DENSITY
2700
*SHELLSECTION,ELSET=Eall,MATERIAL=EL
0.01
*STEP,NLGEOM
*FREQUENCY
4
*NODE PRINT,NSET=Nall
U
*NODE FILE
U
*NODE FILE
U
*NODE FILE
U
*EL FILE
S
*END STEP
