** Output from COS2ABQ translator version 2.5
*HEADING
test shearwall
*NODE,NSET=ALL
1,0.000000,0.000000,0.000000
2,0.250000,0.000000,0.000000
3,0.500000,0.000000,0.000000
4,0.750000,0.000000,0.000000
5,1.00000,0.000000,0.000000
6,1.25000,0.000000,0.000000
7,1.50000,0.000000,0.000000
8,1.75000,0.000000,0.000000
9,2.00000,0.000000,0.000000
10,2.25000,0.000000,0.000000
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*ELEMENT,TYPE=C3D8,ELSET=EG1
1,1,2,23,22,106,107,128,127
2,2,3,24,23,107,108,129,128
3,3,4,25,24,108,109,130,129
4,4,5,26,25,109,110,131,130
5,5,6,27,26,110,111,132,131
6,6,7,28,27,111,112,133,132
7,7,8,29,28,112,113,134,133
8,8,9,30,29,113,114,135,134
9,9,10,31,30,114,115,136,135
10,10,11,32,31,115,116,137,136
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*SOLID SECTION,ELSET=EG1,MATERIAL=MAT1
*MATERIAL,NAME=MAT1
*ELASTIC
0.200000E+07,0.300000E+00,
*BOUNDARY
1,1,1
1,2,2
1,3,3
2,1,1
2,2,2
2,3,3
3,1,1
3,2,2
3,3,3
4,1,1
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*STEP
*STATIC
*CLOAD,OP=NEW
85,2,-0.312500E+01
86,2,-0.312500E+01
87,2,-0.312500E+01
88,2,-0.312500E+01
89,2,-0.312500E+01
90,2,-0.312500E+01
91,2,-0.312500E+01
92,2,-0.312500E+01
93,2,-0.312500E+01
94,2,-0.312500E+01
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*NODE FILE
U
RF
*EL FILE
S
*END STEP
*STEP
*STATIC
*CLOAD,OP=MOD
85,1,0.165250E+01
86,1,0.165250E+01
87,1,0.165250E+01
88,1,0.165250E+01
89,1,0.165250E+01
90,1,0.165250E+01
91,1,0.165250E+01
92,1,0.165250E+01
93,1,0.165250E+01
94,1,0.165250E+01
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*NODE FILE
U
RF
*EL FILE
S
*END STEP
