**
*HEADING
m-C slope example from Clausen - REDUCED STRENGTH fs=1.55
*NODE,NSET=ALL
1,0.000000,0.000000,0.000000
2,1.00000,0.000000,0.000000
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*ELEMENT,TYPE=C3D8,ELSET=EG1
1600,453,104,452,454,1705,1704,1707,1706
1601,457,108,456,458,1709,1708,1711,1710
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*SOLID SECTION,ELSET=EG1,MATERIAL=ABAQUSMCWD
*MATERIAL,NAME=ABAQUSMCWD
*USER MATERIAL, CONSTANTS=5
2.0000E+04,0.26000E+00,8.7,10.35,10.35
*DENSITY
0.158000E+01,
*BOUNDARY
1,1,1
1,2,2
1,3,3
2,1,1
2,2,2
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3406,2,2
*STEP
*STATIC
*DLOAD
EG1,GRAV,9.810,0.0000,0.0000,-1.000
*NODE FILE
U
RF
*EL FILE
S
*END STEP
