**Shell Structure
**
*NODE, NSET=Nall
       1,0.000000000000e+00,5.551115123126e-17,1.000000000000e-02
       2,8.187707000000e-01,7.620000000000e-01,1.000000000000e-02
       3,8.187707000000e-01,7.620000000000e-01,0.000000000000e+00
       4,0.000000000000e+00,5.551115123126e-17,0.000000000000e+00
       5,1.130305000000e+00,7.620000000000e-01,1.000000000000e-02
       6,1.130305000000e+00,7.620000000000e-01,0.000000000000e+00
       7,5.580000000000e-01,5.551115123126e-17,1.000000000000e-02
       8,5.580000000000e-01,5.551115123126e-17,0.000000000000e+00
       9,3.721685000000e-02,3.463636000000e-02,1.000000000000e-02
      10,7.443370000000e-02,6.927273000000e-02,1.000000000000e-02
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*ELEMENT, TYPE=C3D20R, ELSET=Eall
     1,     4,   137,   186,    50,     1,   134,   386,    10,   136,   251,
         253,    51,   135,   457,   455,     9,    52,   180,   573,   149
     2,   137,   139,   185,   186,   134,   132,   396,   386,   138,   249,
         252,   251,   133,   478,   476,   457,   180,   179,   574,   573
     3,   139,   141,   184,   185,   132,   130,   406,   396,   140,   247,
         250,   249,   131,   499,   497,   478,   179,   178,   575,   574
     4,   141,   143,   183,   184,   130,   128,   416,   406,   142,   245,
         248,   247,   129,   520,   518,   499,   178,   177,   576,   575
     5,   143,   145,   182,   183,   128,   126,   426,   416,   144,   243,
         246,   245,   127,   541,   539,   520,   177,   176,   577,   576
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*NSET, NSET=FIX
1,4,7,8,52,101,123,124,125,126,127,128
129,130,131,132,133,134,135,136,137,138
139,140,141,142,143,144,145,146,147,148
175,176,177,178,179,180
*BOUNDARY
FIX,1,3
*MATERIAL,NAME=EL
*ELASTIC
70000000000,.3
*DENSITY
2700
*SOLID SECTION,ELSET=Eall,MATERIAL=EL
*STEP
*STATIC
*FREQUENCY
4
*NODE PRINT,NSET=Nall
U
*NODE FILE
U
*NODE FILE
U
*NODE FILE
U
*EL FILE
S
*END STEP
