**
** Structure: Simple beam - twistt
** Test objective: C3D8I elements
**
*NODE, NSET=Nall
       1,1.000000000000e+002,1.000000000000e+002,0.000000000000e+000
       2,1.000000000000e+002,7.500000000000e+001,0.000000000000e+000
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*ELEMENT, TYPE=S4, ELSET=Eall1
     1,      1,      2,      3,      4
     2,      4,      3,      5,      6
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*ELEMENT, TYPE=C3D8, ELSET=Eall2
    33,     1,     2,    46,    47,    48,    49,    50,    51
    34,    47,    46,    52,    53,    51,    50,    54,    55
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** Names based on support
*NSET,NSET=Nsupport
68,
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** Names based on rigid
*NSET,NSET=Nrigid
1,
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*MATERIAL, NAME=Steel
*ELASTIC
210000,0.3
*SOLID SECTION, ELSET=Eall2, MATERIAL=Steel
*SHELL SECTION, MATERIAL=Steel, ELSET=Eall1
20.0
*RIGID BODY,NSET=Nrigid
*STEP
*STATIC
*BOUNDARY
Nsupport, 1,3
*CLOAD
36, 3, -1000
27, 3, -1000
17, 3, -1000
45, 3, -500
18, 3, -500
*NODE FILE
U
*EL FILE
S
*END STEP
