**
**   Model debug notes from Robert Whirley, Jan 2016,
**
** Analysis type changed to Static, tweak penalties on contact, chg to node_to_surface contact,
** Added dummy notes 3269, 3270 for ROT_NODE to each body, constrained ROTs to 0 with *BOUNDARY
**
** Further investigation traced root cause of CCX crash with original model to the combination
**   of S3 elements and *DYNAMIC analysis.  Removing either of these characteristics prevents
**   the crash.  I am suspicious of the mass matrix computation for S3 elements but this is
**   unconfirmed.
**
**  Recommend revise mesh to remove all triangular shells.  This should work fine.
**
**
** ABAQUS Input Deck Generated by HyperMesh Version  : 13.0.110.31
** Generated using HyperMesh-Abaqus Template Version : 13.0.110
**
**   Template:  ABAQUS/STANDARD 3D
**
*NODE
         1,  -50.0          ,  2.4999999999998,  50.0
         2,  -45.0          ,  2.4999999999998,  50.0
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**HWCOLOR COMP          3     3
*ELEMENT,TYPE=S3,ELSET=Flasche
      2047,      2271,      2272,      2242
      2081,      2314,      2313,      2290
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**HWCOLOR COMP          3     3
*ELEMENT,TYPE=S4R,ELSET=Flasche
      1601,      1899,      1900,      1895,      1896
      1602,      1900,      1882,      1883,      1895
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**HWCOLOR COMP          1    10
*ELEMENT,TYPE=C3D8R,ELSET=platteo
      1201,      1089,      1074,      1073,      1091,      1324,      1327,      1326,
      1325
      1202,       976,      1315,      1314,       975,      1328,      1331,      1330,
      1329
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**HWCOLOR COMP          2    10
*ELEMENT,TYPE=C3D8R,ELSET=platteu
       401,       254,       241,       242,       253,       442,       445,       444,
       443
       402,       271,        51,        50,       307,       446,       449,       448,
       447
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**HM_PROP_ID          3
**HM_comp_by_property "solprop"    11
*SOLID SECTION, ELSET=platteo, MATERIAL=stahl
**HM_PROP_ID          3
**HM_comp_by_property "solprop"    11
*SOLID SECTION, ELSET=platteu, MATERIAL=stahl
**HM_PROP_ID          4
**HM_comp_by_property "petprop"    11
*SHELL SECTION, ELSET=Flasche, MATERIAL=pet
0.5       ,
**HM_PROP_ID          1
**HM_Rigid_Body "rpo"         11
*RIGID BODY, ELSET = platteo, REF NODE = 1763, ROT NODE = 3269
**HM_PROP_ID          2
**HM_Rigid_Body "rpu"         11
*RIGID BODY, ELSET = platteu, REF NODE = 875, ROT NODE = 3270
*NSET, NSET=rsetu
       875,
*NSET, NSET=rseto
      1763,
*NSET, NSET=fset
      3149,      3150,      3151,      3152,      3153,      3154
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**HMNAME MATS          1 stahl    11
*MATERIAL, NAME=stahl
*DENSITY
7.8000E-09,0.0
*ELASTIC, TYPE = ISOTROPIC
210000.0  ,0.3       ,0.0
**HMNAME MATS          2 pet    11
*MATERIAL, NAME=pet
*DENSITY
1.3800E-09,0.0
*ELASTIC, TYPE = ISOTROPIC
4500.0    ,0.4       ,0.0
**HMNAME PROPERTY          5 sint
*SURFACE INTERACTION, NAME = sint
*SURFACE BEHAVIOR, PRESSURE-OVERCLOSURE = LINEAR
** Small penalty needed for mismatched material E and
**     element type
** penalty reduced from 1e7 to
** 1.0e4
** 1.0e3, 1.0e1
** 1.0e2,  1.0e0
1.0e1,  1.0e-1
**HMNAME GROUPS          3 CP:S:Flasche S:platteo
*CONTACT PAIR, INTERACTION=sint, TYPE=NODE TO SURFACE
S:Flasche, S:platteo
**HMNAME GROUPS          6 CP:S:Flasche:1 S:platteu
*CONTACT PAIR, INTERACTION=sint, TYPE=NODE TO SURFACE
S:Flasche:1, S:platteu
*SURFACE, NAME = S:Flasche, TYPE = ELEMENT
      2986, SPOS
      2987, SPOS
      2990, SPOS
      2991, SPOS
      2994, SPOS
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      3081, SPOS
*SURFACE, NAME = S:platteo, TYPE = ELEMENT
      1204, S1
      1576, S1
      1212, S1
      1220, S1
      1429, S1
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      1479, S1
*SURFACE, NAME = S:Flasche:1, TYPE = ELEMENT
      2081, SPOS
      2124, SPOS
      2129, SPOS
      2161, SPOS
      2884, SPOS
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      2985, SPOS
*SURFACE, NAME = S:platteu, TYPE = ELEMENT
       795, S2
       403, S2
       411, S2
       412, S2
       414, S2
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       748, S2
*AMPLITUDE, NAME =amp, DEFINITION = TABULAR
0.0       ,0.0
0.1       ,1.0
0.3       ,3.0
**HMNAME CURVE          1 amp
**HMNAME LOADSTEP          1 load
*STEP, INC = 500, NLGEOM = YES
** *DYNAMIC
** 1.0000E-03,0.1       ,          ,
**HWNAME LOADCOL          1 bco
**HWCOLOR LOADCOL          1    11
*STATIC
.001, .30, , .001
*BOUNDARY, AMPLITUDE = amp
rseto,1,1,0.0
rseto,2,2,5.0
rseto,3,3,0.0
**HWNAME LOADCOL          2 bcu
**HWCOLOR LOADCOL          2    11
*BOUNDARY
rsetu,1,3,0.0
**HWNAME LOADCOL          3 bcf
**HWCOLOR LOADCOL          3    11
** Constrain rigid body rotational dof's
*BOUNDARY
3269,1,3,0
3270,1,3,0
*BOUNDARY
fset,1,1,0.0
fset,3,3,0.0
*NODE FILE
U
*EL FILE
S, E
** *CONTACT FILE
** CSTRESS,
** CDISP,
*END STEP
*****
