**Generated by: ©K2INP v1.0
**Date & Time : 11 October 2017 @ 12:19:55
**Job name    : tank
**Element     : Quadratic - Reduced
**----------------------------------------------------------------
*NODE, NSET=NALL
1, 3317.13, 3741.21, 10000.0
2, 3741.21, 3317.13, 10000.0
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**----------------------------------------------------------------
*ELEMENT, TYPE=S6, ELSET=S6
116, 173, 83, 81, 10296, 10297, 10298
125, 179, 180, 187, 10299, 10300, 10301
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**----------------------------------------------------------------
*ELEMENT, TYPE=S8R, ELSET=S8R
1, 22, 20, 24, 81, 10777, 10778, 10779, 10780
2, 20, 80, 82, 24, 10781, 10782, 10783, 10778
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**----------------------------------------------------------------
*NSET, NSET=BC
23,71,72,73,74,75
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**----------------------------------------------------------------
*ELSET, ELSET=Kurealt
3283,3284,3285,3286,3287,3288
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*ELSET, ELSET=ayak
1,2,3,4,5,6
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*ELSET, ELSET=kureust
6841,6842,6843,6844,6845,6846
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**----------------------------------------------------------------
*Shell Section, elset=Kurealt, material=Material-1
6.
*Shell Section, elset=Kureust, material=Material-1
6.
*Shell Section, elset=ayak, material=Material-1
6.
*Material, name=Material-1
*Density
7.85e-09,
*Elastic
210000., 0.3
*STEP
*STATIC
*DLOAD
S6,GRAV,9810,0.,0.,-1.
S8R,GRAV,9810,0.,0.,-1.
Kurealt,P,1.
Kureust,P,1.
*BOUNDARY
BC,1,1,0
BC,2,2,0
BC,3,3,0
*NODE FILE, OUTPUT=3D
U
*EL FILE
S,
*END STEP
