*Heading
 same as large_bottle_newRPs, but no assembly used
** Job name: large_bottle_newRPs_no_assembly Model name: large_geometry_newRPs_no_assembly
** Generated by: Abaqus/CAE 6.14-2
** ----------------------------------------------------------------
**
** PART INSTANCE: Bottle-Shell-Small-3X-1
**
*Node
      1,           0.,           0.,        26.25
      2,           0.,           0.,           0.
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*Element, type=S4
  1, 1060, 1109, 1038, 1098
  2, 1071, 1041, 1039, 1073
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*Nset, nset=Bottle-Shell-Small-3X-1_Set-2, generate
    1,  7829,     1
*Elset, elset=Bottle-Shell-Small-3X-1_Set-2, generate
    1,  7827,     1
*Nset, nset=Bottle-Shell-Small-3X-1_Set-3, generate
    1,  7829,     1
*Elset, elset=Bottle-Shell-Small-3X-1_Set-3, generate
    1,  7827,     1
*Nset, nset=Bottle-Shell-Small-3X-1_Set-4, generate
    1,  7829,     1
*Elset, elset=Bottle-Shell-Small-3X-1_Set-4, generate
    1,  7827,     1
** Section: HDPE_Shell
*Shell Section, elset=Bottle-Shell-Small-3X-1_Set-4, material=HDPE_generic, offset=0.5
1.0
** ----------------------------------------------------------------
**
** PART INSTANCE: Part 8 - Rigid-3X-1
**
*Node, nset=right_grip_nodes
7830, 57.0, 225.15, 166.200003
7831, -39.0, 225.15, 166.200003
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*Element, type=S4, elset=right_grip
7828, 7830, 7908, 9643, 8039
7829, 7908, 7909, 9644, 9643
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*Element, type=S3, elset=right_grip
13051, 13797, 13783, 13782
13052, 13788, 13794, 13793
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*Node
18708, 12.22, 202.65, 662.699988
18708, 12.22, 202.65, 662.699988
29588, 12.22, 202.65, 662.699988
*Nset, nset="Part 8 - Rigid-3X-1-RefPt_"
18708,
*Elset, elset="Part 8 - Rigid-3X-1", generate
  7828,  18788,      1
** ----------------------------------------------------------------
**
** PART INSTANCE: Part 13 - Rigid-3X-1
**
*Node, nset=left_grip_nodes
18709, -57.0, 180.15, 166.200003
18710, 39.0, 180.15, 166.200003
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*Element, type=S4, elset=left_grip
18789, 18709, 18787, 20522, 18918
18790, 18787, 18788, 20523, 20522
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*Element, type=S3, elset=left_grip
24012, 24676, 24662, 24661
24013, 24667, 24673, 24672
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*Node
29587, -12.22, 202.65, 662.699988
29587, -12.22, 202.65, 662.699988
29589, -12.22, 202.65, 662.699988
*Nset, nset="Part 13 - Rigid-3X-1-RefPt_"
29587,
*Elset, elset="Part 13 - Rigid-3X-1", generate
 18789,  29749,      1
*Nset, nset=b_Set-8, generate
  7830,  18707,      1
*Nset, nset=b_Set-8, generate
 18709,  29586,      1
*Elset, elset=b_Set-8, generate
  7828,  18788,      1
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*Nset, nset=bottle_bottom
    1,    2,    3,    4,    5,   35
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*Elset, elset=bottle_bottom
    1,    2,    3,    4,    5,    6
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*Nset, nset=grips_ref_node
 18708,
*Nset, nset=grips_ref_node
 29587,
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*Nset, nset=grips_rot_node
 29589,
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*Nset, nset=grips_rot_node
 29588,
*Nset, nset=right_grip_geometry, generate
  7830,  18708,      1
*Elset, elset=right_grip_geometry, generate
  7828,  18788,      1
*Elset, elset=_Bottle_surface_SPOS, generate
    1,  7827,     1
*Surface, type=ELEMENT, name=Bottle_surface
_Bottle_surface_SPOS, SPOS
*Elset, elset=bottle_subset
 1562, 1563, 1564, 1565, 1566, 1567
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*Surface, type=ELEMENT, name=bottle_subset
bottle_subset, SPOS
*Elset, elset=_Left-grip_SPOS
 24098, 24099, 24100, 24101, 24102, 24103
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*Surface, type=ELEMENT, name=Left-grip
_Left-grip_SPOS, SPOS
*Elset, elset=_Right-grip_SPOS
 13137, 13138, 13139, 13140, 13141, 13142
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*Surface, type=ELEMENT, name=Right-grip
_Right-grip_SPOS, SPOS
*Elset, elset=_bottle_bottom_SPOS
    1,    2,    3,    4,    5,    6
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*Surface, type=ELEMENT, name=bottle_bottom
_bottle_bottom_SPOS, SPOS
*Rigid Body, nset=left_grip_nodes, ref node=18708, rot node=29588
*Shell Section, elset="Part 8 - Rigid-3X-1", material=HDPE_generic, offset=0.5
1.0
*Rigid Body, nset=right_grip_nodes, ref node=29587, rot node=29589
*Shell Section, elset="Part 13 - Rigid-3X-1", material=HDPE_generic, offset=0.5
1.0
***Amplitude, name=shake_1_sinusoid, definition=PERIODIC
**1,           62.83,              0.,              0.
**             0.,              1.
***Amplitude, name=shake_2_sinusoids, definition=PERIODIC
**2,           62.83,              0.,              0.
**             0.,              1.,              0.,              1.
***Amplitude, name=vel_smooth_step, definition=SMOOTH STEP
**             0.,              0.,             0.1,              1.,             0.9,              1.,              1.,              0.
*Amplitude, name=QUADRATIC, USER
*Material, name=HDPE_generic
*Density
 1.94e-08
*Elastic
1000., 0.45
*Plastic
  8.618,    0.
 13.064, 0.007
 16.787, 0.025
 18.476, 0.044
 20.337, 0.081
 24.543,  0.28
 26.887,  0.59
**
** INTERACTION PROPERTIES
**
*Surface Interaction, name=exp_fric
*Friction
 0.5, 2000
*Surface Behavior, pressure-overclosure=EXPONENTIAL
0.01, 0.1
**
** BOUNDARY CONDITIONS
**
** Name: bottle_fixed Type: Displacement/Rotation
*Boundary
bottle_bottom, 1, 1
bottle_bottom, 2, 2
bottle_bottom, 3, 3
**** Name: left_grip_squeeze Type: Displacement/Rotation
***Boundary
**left-grip_ref_node, 1, 3
**left-grip_rot_node, 1, 3
**** Name: right_grip_squeeze Type: Displacement/Rotation
***Boundary
**right-grip_ref_node, 1, 3
**right-grip_rot_node, 1, 3
**
** INTERACTIONS
**
** Interaction: left_grip_to_bottle
***Contact Pair, interaction=exp_fric, type=surface to surface
**Bottle_surface, Left-grip
** Interaction: right_grip_to_bottle
***Contact Pair, interaction=exp_fric, type=surface to surface
**Bottle_surface, Right-grip
** Interaction: left_grip_to_bottle
***Contact Pair, interaction=exp_fric, type=surface to surface
**bottle_subset, Left-grip
** Interaction: right_grip_to_bottle
***Contact Pair, interaction=exp_fric, type=surface to surface
**bottle_subset, Right-grip
** ----------------------------------------------------------------
**
** STEP: gripper_translate
**
*Step, nlgeom=YES, inc=1000
*Static
0.01, 0.5
*Amplitude, name=TWO_SINUSOIDS
0.0,-0.023873945567404107
0.0025125628140703518,-0.023282675068750626
0.0050251256281407036,-0.021552672765293743
0.007537688442211055,-0.018811399463151079
0.010050251256281407,-0.015258450363122603
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0.5,-0.023873925072371814
**
** BOUNDARY CONDITIONS
**
*Boundary, amplitude=two_sinusoids
grips_ref_node, 2, 2, -150.
grips_ref_node, 3, 3, -99.
*Boundary
grips_ref_node, 1, 1, 0
grips_rot_node, 1, 3, 0
**
** OUTPUT REQUESTS
**
** FIELD OUTPUT: F-Output-1
**
*restart, write
*Node Output
U,
*Element Output
S, E
*End Step
