*NODE, NSET=Nall
       0,5.000000000000e+001,5.000000000000e+001,3.000000000000e+002
       1,0.000000000000e+000,1.000000000000e+002,0.000000000000e+000
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*ELEMENT, TYPE=S4, ELSET=Eall
     1,      1,      2,      3,      4
     2,      4,      3,      5,      6
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
*NSET,NSET=Nfix
1,
2,
23,
34,
45,
56,
57,
78,
89,
100,
101,
122,
133,
144,
155,
166,
*NSET,NSET=Nload
21,
22,
33,
44,
55,
76,
77,
88,
99,
120,
121,
132,
143,
154,
165,
176,
*MATERIAL, Name=Mat1
*ELASTIC
 210000.,.3
*SHELL SECTION,MATERIAL=Mat1,ELSET=Eall
 5.0
*BOUNDARY
 Nfix,1,3
*STEP
*STATIC
*CLOAD
 Nload,3,100.
*NODE FILE
 U
*EL FILE
 S, E
*END STEP
