CALC PROBLEM=Static Solver=Spooles
*NODE
000001,3.000000E+01,1.836970E-15,1.836970E-15,
000002,2.121320E+01,2.597868E-15,2.121320E+01,
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*ELEMENT,TYPE=S8
000001,000009,000001,000002,000010,000099,000199,000100,000191
000002,000010,000002,000003,000011,000100,000200,000101,000192
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*NSET,NSET=ALLN,GENERATE
000001,000290,1,
*ELSET,ELSET=E1,GENERATE
000001,000096,1,
*SHELLSECTION,ELSET=E1, material=SS302
1.000000E+00,1
**MATERILALPROPERTIESDATA**
*material, name=SS302
*elastic
2.000000E+04,3.100000E-01
*DENSITY
7.390000E-10
*BOUNDARY
000042,1,3,
000083,1,1
000083,3,3
000001,3,3
*STEP
*STATIC,SOLVER=SPOOLES
0.1,0.1
*DLOAD
E1,P,1.000000E-01
*NODE FILE
U
*EL FILE
S
*ENDSTEP
