*HEADING
MODEL: WAVE PROPAGATION IN ELASTIC MEDIUM, ELEMENT TYPE C3D8R

*NODE
      1, -0.0500000007, -0.0500000007,  0.100000001
      2, -0.0500000007, -0.0399999991,  0.100000001
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
*ELEMENT, TYPE=C3D8R
   1,  122,  123,  134,  133,    1,    2,   13,   12
   2,  123,  124,  135,  134,    2,    3,   14,   13
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
*NSET, NSET=SOURCE
 1331,

*NSET, NSET=BOTTOM
    1,    2,    3,    4,    5,    6
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
*NSET, NSET=NALL, GENERATE
 1,  1331,      1

*ELSET, ELSET=EALL, GENERATE
 1,  1000,      1

*MATERIAL,NAME=EL

*DENSITY
1000.,
*ELASTIC
27000., 0.3

*SOLID SECTION, MATERIAL=EL, ELSET=EALL

*AMPLITUDE, NAME=AMPSINEPULSE
 0.0,	0.0
 1E-5,	1.0
 2E-5,	0.0

*BOUNDARY
BOTTOM, 1
*BOUNDARY
BOTTOM, 2
*BOUNDARY
BOTTOM, 3

*STEP

*DYNAMIC, EXPLICIT
1E-6, 0.005

*CLOAD, AMPLITUDE=AMPSINEPULSE
SOURCE, 3, 1E-5

*NODE PRINT,NSET=NALL
U

*END STEP
