**Mesh**********************************************************************************
*NODE
         1,  5.0025025000004,  4.9949999999999,  0.0
         2,  5.0025025000004,  4.9975000000004,  0.0
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*ELEMENT,TYPE=C3D8,ELSET=part_1
         1,      6179,      6178,      6177,      6176,      6175,      6174,      6173,
      6172
         2,      2098,      2099,      1100,      1101,      2094,      2095,      1096,
      1097
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*ELEMENT,TYPE=C3D8,ELSET=part_2
      3889,      5571,      5570,      5569,      5568,      5567,      5566,      5565,
      5564
      3890,      5568,      5569,      4923,      4922,      5564,      5565,      4921,
      4920
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*NSET, NSET=ground
        26,       276,       526,       776,      1026,      1027
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*NSET, NSET=source
         1,         2,         3,         4,         5,         6
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**Sections******************************************************************************
*SOLID SECTION, ELSET=part_2, MATERIAL=part_2
**
*SOLID SECTION, elset=part_1,  MATERIAL=part_1
**Materials******************************************************************************
*MATERIAL, NAME=part_2
*CONDUCTIVITY
1e-16
*MATERIAL, NAME=part_1
*CONDUCTIVITY
500000
**Curves********************************************************************************
*Amplitude, name=load
0.,              1.,
1,               1.,
**Solution controls********************************************************************
*INITIAL CONDITIONS,TYPE=TEMPERATURE
source,11,11,1
ground,11,11,0
**PHYSICAL CONSTANTS,ABSOLUTE ZERO=-273.15,STEFAN BOLTZMANN=5.669E-8
*STEP, NLGEOM
*HEAT TRANSFER,STEADY STATE
**,Solver=Iterative cholesky
1.0, 1.0, 1.0000E-08, 0.05
**Boundaries***************************************************************************
*BOUNDARY, Amplitude = load
source,11,11,1
ground,11,11,0
**Output********************************************************************************
*Node Output
HFL,RFL,NT
*END STEP
