** ***************************************************************************
**   Written by : STARMAP
**   Version    : 4.51
**   From Model : F:\WORK\SEIG\EIG1.MOD
**   Date       : Thu May 01 13:24:59 2014
** ***************************************************************************
**
*NODE, NSET=GLOBAL
       1,          0.,          0.,          0.
       2,          0.,          0.,         7.2
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*ELEMENT, TYPE=B31, ELSET=P1_1
      1,      1,      2
      2,      2,      3
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*ELEMENT, TYPE=B31, ELSET=P1_2
    101,    102,    103
    102,    103,    104
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*ELSET, ELSET=OUT_BEAM, GENERATE
1,132,1
** STARMAP Property 1 and 2 : 8" square
*BEAM SECTION, MATERIAL=M1, ELSET=P1_2, SECTION=RECT
8.0,8.0
1.0, 1.0, 1.0
*BEAM SECTION, MATERIAL=M1, ELSET=P1_1, SECTION=RECT
8.0,8.0
1.0, 1.0, 1.0
** STARMAP Material 1 : AISI 1025 Carbon Steel
*MATERIAL, NAME=M1
*ELASTIC, TYPE=ISOTROPIC
 29000000.,      0.32,       70.
*EXPANSION, TYPE=ISO
     6.E-6,       70.
*DENSITY
0.00073574
*SPECIFIC HEAT
   44.8224,       70.
*CONDUCTIVITY, TYPE=ISO
0.00069444,       70.
** Load Step 1 -------------------------------------------------------
*STEP, INC=1000
dload
*FREQUENCY,  STORAGE=YES
   85, 0.1,    1500.,
*NODE PRINT, NSET=GLOBAL
    U
*EL PRINT, ELSET=OUT_BEAM
    S
*NODE FILE
  U
*EL FILE
    S
*BOUNDARY, OP=NEW
    1,    1
    1,    2
    1,    3
    1,    4
    1,    5
    1,    6
*ELSET, ELSET=EAB, GENERATE
    1,  132
*AMPLITUDE, NAME=ONE
0.0,1.0,  2000.0,1.0
*DLOAD, AMPLITUDE=ONE
EAB, GRAV,     386.4,        0.,        0.,        1.
*CLOAD, OP=NEW
110, 1,0.0
*END STEP
** Load Step 2 -------------------------------------------------------
*STEP
dload
*STEADY STATE DYNAMICS
       0.1,     1500.,   , 3
*AMPLITUDE, NAME=90HZ
0.0,0.0,  89.9,0.0, 90.0,1.0, 91.0,1.0, 91.1,0.0
2000.0, 0.0
*NODE PRINT, NSET=GLOBAL
    U
*EL PRINT, ELSET=OUT_BEAM
    S
*NODE FILE
    U
*EL FILE
    S
*ELSET, GENERATE, ELSET=E_ALL
    1,  132
*CLOAD, OP=NEW, AMPLITUDE=90HZ
110, 1,1000.0
*END STEP
